# OpenSim document version 40600
Model Pose2Sim_scaled:
  gravity: 0 -9.80665 0
  length_units: meters
  force_units: N
  credits:
    Full-body model adapted from Beaucage-Gauvreau et al., with Rajagopal et al. knee angles. Contact spheres and Muscles included. Free pelvis translation, added ball joint between head and torso, locked arm pronation/supination, clamped hip flexion to 150° instead of 120°, hip adduction -60° instead of -50°, hip rotation -70° instead of -40°, knee 155° instead of 120°.
  publications:
    Pagnon, D., Domalain, M., Reveret, L. (2021). Pose2Sim: An End-to-End Workflow for 3D Markerless Sports Kinematics—Part 1: Robustness. Sensors, 21(19), 6530.
  Ground
  BodySet:
    Body pelvis: mass=9.816714 [kg] mass_center=(-0.01897675 0 0) inertia=(0.00752944 0.00752944 0.003477082 0 0 0)
        meshes=(r_pelvis.vtp l_pelvis.vtp)
      WrapCylinder Gmax1_at_pelvis_r: xyz_body_rotation=(-0.6 0.45 0) translation=(-0.02066775 -0.02657282 0.01870949)
          quadrant=-x radius=0.0110968 length=0.04352872
      WrapCylinder Gmax2_at_pelvis_r: xyz_body_rotation=(-0.75 0.39 0) translation=(-0.02147298 -0.02227822 0.02085648)
          quadrant=all radius=0.01116828 length=0.02865894
      WrapCylinder Gmax3_at_pelvis_r: xyz_body_rotation=(-0.1 0 0) translation=(-0.02227822 -0.02362028 0.02085648)
          quadrant=all radius=0.01074467 length=0.03063548
      WrapCylinder Gmax1_at_pelvis_l: xyz_body_rotation=(0.6 -0.45 0) translation=(-0.02066775 -0.02657282 -0.01870949)
          quadrant=-x radius=0.0110968 length=0.04352872
      WrapCylinder Gmax2_at_pelvis_l: xyz_body_rotation=(0.75 -0.39 0)
          translation=(-0.02147298 -0.02227822 -0.02085648) quadrant=all radius=0.01116828 length=0.02865894
      WrapCylinder Gmax3_at_pelvis_l: xyz_body_rotation=(0.1 0 0) translation=(-0.02227822 -0.02362028 -0.02085648)
          quadrant=all radius=0.01074467 length=0.03063548
      WrapCylinder PS_at_brim_r: xyz_body_rotation=(-0.25 -0.27 0.1) translation=(-0.01986251 -0.01610474 0.02012037)
          quadrant=-y radius=0.01355127 length=0.03020816
      WrapCylinder PS_at_brim_l: xyz_body_rotation=(0.25 0.27 0.1) translation=(-0.01986251 -0.01610474 -0.02012037)
          quadrant=-y radius=0.01355127 length=0.03020816
      WrapCylinder IL_at_brim_r: xyz_body_rotation=(-0.32 -0.24 0.9) translation=(-0.01905727 -0.0174468 0.02318749)
          quadrant=-y radius=0.01490301 length=0.03012833
      WrapCylinder IL_at_brim_l: xyz_body_rotation=(0.32 0.24 0.9) translation=(-0.01905727 -0.0174468 -0.02318749)
          quadrant=-y radius=0.01490301 length=0.03012833
    Body sacrum: mass=0 mass_center=(0 0 0) inertia=(0 0 0 0 0 0) meshes=sacrum.vtp
    Body femur_r: mass=7.753179 mass_center=(0 -0.005958264 0) inertia=(0.0001371051 3.594018e-5 0.0001445799 0 0 0)
        meshes=femur_r.vtp
      WrapCylinder Gastroc_at_condyles_r: translation=(0.0001752431 -0.01436993 0) quadrant=all radius=0.0008762153
          length=0.003504861
      WrapCylinder KnExt_at_fem_r: xyz_body_rotation=(-0.0623366 0.0507601 0)
          translation=(0.0001257642 -0.0141152 7.32905e-5) quadrant=all radius=0.0008762153 length=0.003504861
      WrapCylinder AB_at_femshaft_r: xyz_body_rotation=(1.66157 0.186644 0)
          translation=(0.0005132309 -0.003946299 0.0008189108) quadrant=all radius=0.0005783021 length=0.002453403
      WrapCylinder AL_at_femshaft_r: xyz_body_rotation=(1.77711 0.136489 0)
          translation=(0.001077138 -0.008128089 0.0005297142) quadrant=all radius=0.0007044771 length=0.003504861
      WrapCylinder AMprox_at_femshaft_r: xyz_body_rotation=(1.61126 0.18656 0)
          translation=(0.0001816566 -0.002554862 0.0008903399) quadrant=all radius=0.0007395257 length=0.002453403
      WrapCylinder AMmid_at_femshaft_r: xyz_body_rotation=(1.61139 0.13656 0)
          translation=(0.0008065562 -0.005632698 0.0007214476) quadrant=all radius=0.0007500403 length=0.004205833
      WrapCylinder AMdist_at_femshaft_r: xyz_body_rotation=(1.71188 0.186636 0)
          translation=(0.001107764 -0.009138435 0.0003282162) quadrant=all radius=0.0007640598 length=0.007009722
      WrapCylinder AMisch_at_condyles_r: xyz_body_rotation=(1.71115 -0.463363 0)
          translation=(-0.0007938896 -0.0132074 -0.0001105563) quadrant=all radius=0.001401944 length=0.008411667
      WrapCylinder PECT_at_femshaft_r: xyz_body_rotation=(1.81295 0.276344 0)
          translation=(0.0002132964 -0.002961709 0.001066897) quadrant=all radius=0.0005257292 length=0.001752431
    Body patella_r: mass=0.07185198 mass_center=(6.30875e-5 0.0009252834 0)
        inertia=(2.938699e-9 1.342381e-8 1.342381e-8 0 0 0) meshes=r_patella.vtp
    Body tibia_r: mass=3.090385 mass_center=(0 -0.01167011 0) inertia=(0.0001641433 1.660973e-5 0.000166423 0 0 0)
        meshes=(tibia_r.vtp fibula_r.vtp)
      WrapCylinder GasLat_at_shank_r: xyz_body_rotation=(2.96723 -0.279725 -1.47812)
          translation=(-0.0004625538 -0.004625538 -0.000206274) quadrant=-y radius=0.0034379 length=0.006250727
      WrapCylinder GasMed_at_shank_r: xyz_body_rotation=(2.96723 0.0279725 -1.47812)
          translation=(-0.0004625538 -0.004625538 -0.000206274) quadrant=-y radius=0.0034379 length=0.006250727
      WrapCylinder GR_at_condyles_r: xyz_body_rotation=(0 -0.4 0) translation=(-0.0001875218 -0.001250145 0)
          quadrant=all radius=0.002250262 length=0.006250727
      WrapCylinder SM_at_condyles_r: xyz_body_rotation=(0 -0.1 0) translation=(-6.250727e-5 -0.001250145 0)
          quadrant=all radius=0.002200256 length=0.006250727
      WrapCylinder ST_at_condyles_r: xyz_body_rotation=(0 -0.2 0) translation=(-0.0001250145 -0.001281399 0)
          quadrant=all radius=0.002656559 length=0.006250727
      WrapCylinder BF_at_gastroc_r: translation=(-0.003625422 -0.003750436 0) quadrant=y radius=0.001875218
          length=0.00937609
    Body talus_r: mass=0.08335497 mass_center=(0 0 0) inertia=(9.786575e-6 9.786575e-6 9.786575e-6 0 0 0)
        meshes=talus_rv.vtp
    Body calcn_r: mass=1.041937 mass_center=(0.01083552 0.003250655 0)
        inertia=(1.37012e-5 3.816764e-5 4.012496e-5 0 0 0) meshes=foot.vtp
    Body toes_r: mass=0.1805469 mass_center=(0.003749089 0.000650131 -0.001896215)
        inertia=(9.786575e-7 1.957315e-6 9.786575e-6 0 0 0) meshes=bofoot.vtp
    Body femur_l: mass=7.753179 mass_center=(0 -0.01347361 0) inertia=(0.000701104 0.0001837846 0.000739327 0 0 0)
        meshes=femur_l.vtp
      WrapCylinder Gastroc_at_condyles_l: translation=(0.0003962828 -0.03249519 0) quadrant=all radius=0.001981414
          length=0.007925656
      WrapCylinder KnExt_at_fem_l: xyz_body_rotation=(0.0623366 -0.0507601 0)
          translation=(0.0002843947 -0.03191915 -0.0001657342) quadrant=all radius=0.001981414 length=0.007925656
      WrapCylinder AB_at_femshaft_l: xyz_body_rotation=(-1.66157 -0.186644 0)
          translation=(0.001160585 -0.008923892 -0.001851829) quadrant=all radius=0.001307733 length=0.005547959
      WrapCylinder AL_at_femshaft_l: xyz_body_rotation=(-1.77711 -0.136489 0)
          translation=(0.002435768 -0.01838031 -0.00119786) quadrant=all radius=0.001593057 length=0.007925656
      WrapCylinder AMprox_at_femshaft_l: xyz_body_rotation=(-1.61126 -0.18656 0)
          translation=(0.0004107859 -0.005777391 -0.002013354) quadrant=all radius=0.001672313 length=0.005547959
      WrapCylinder AMmid_at_femshaft_l: xyz_body_rotation=(-1.61139 -0.13656 0)
          translation=(0.001823892 -0.0127374 -0.001631433) quadrant=all radius=0.00169609 length=0.009510787
      WrapCylinder AMdist_at_femshaft_l: xyz_body_rotation=(-1.71188 -0.186636 0)
          translation=(0.002505022 -0.02066504 -0.000742206) quadrant=all radius=0.001727793 length=0.01585131
      WrapCylinder AMisch_at_condyles_l: xyz_body_rotation=(-1.71115 0.463363 0)
          translation=(-0.001795248 -0.02986633 0.0002500045) quadrant=all radius=0.003170262 length=0.01902157
      WrapCylinder PECT_at_femshaft_l: xyz_body_rotation=(-1.81295 -0.276344 0)
          translation=(0.000482334 -0.006697409 -0.002412609) quadrant=all radius=0.001188848 length=0.003962828
    Body patella_l: mass=0.07185198 mass_center=(0.0001426618 0.002092373 0)
        inertia=(1.50274e-8 6.864432e-8 6.864432e-8 0 0 0) meshes=l_patella.vtp
    Body tibia_l: mass=3.090385 mass_center=(0 -0.013039 0) inertia=(0.0002049095 2.073489e-5 0.0002077555 0 0 0)
        meshes=(tibia_l.vtp fibula_l.vtp)
      WrapCylinder GasLat_at_shank_l: xyz_body_rotation=(-2.96723 0.279725 -1.47812)
          translation=(-0.0005168111 -0.005168111 0.0002304698) quadrant=-y radius=0.003841163 length=0.006983933
      WrapCylinder GasMed_at_shank_l: xyz_body_rotation=(-2.96723 -0.0279725 -1.47812)
          translation=(-0.0005168111 -0.005168111 0.0002304698) quadrant=-y radius=0.003841163 length=0.006983933
      WrapCylinder GR_at_condyles_l: xyz_body_rotation=(0 0.4 0) translation=(-0.000209518 -0.001396787 0) quadrant=all
          radius=0.002514216 length=0.006983933
      WrapCylinder SM_at_condyles_l: xyz_body_rotation=(0 0.1 0) translation=(-6.983933e-5 -0.001396787 0) quadrant=all
          radius=0.002458345 length=0.006983933
      WrapCylinder ST_at_condyles_l: xyz_body_rotation=(0 0.2 0) translation=(-0.0001396787 -0.001431706 0)
          quadrant=all radius=0.002968172 length=0.006983933
      WrapCylinder BF_at_gastroc_l: translation=(-0.004050681 -0.00419036 0) quadrant=all radius=0.00209518
          length=0.0104759
    Body talus_l: mass=0.08335497 mass_center=(0 0 0) inertia=(9.786575e-6 9.786575e-6 9.786575e-6 0 0 0)
        meshes=talus_lv.vtp
    Body calcn_l: mass=1.041937 mass_center=(0.01083552 0.003250655 0)
        inertia=(1.37012e-5 3.816764e-5 4.012496e-5 0 0 0) meshes=l_foot.vtp
    Body toes_l: mass=0.1805469 mass_center=(0.003749089 0.000650131 0.001896215)
        inertia=(9.786575e-7 1.957315e-6 9.786575e-6 0 0 0) meshes=l_bofoot.vtp
    Body lumbar5: mass=1.520395 mass_center=(0.009160858 0.009701603 0)
        inertia=(0.04504068 0.01167019 0.04504068 0 0 0) meshes=lumbar5.vtp
    Body lumbar4: mass=1.499556 mass_center=(0.009860646 0.01155461 0) inertia=(0.0432402 0.01110718 0.0432402 0 0 0)
        meshes=lumbar4.vtp
    Body lumbar3: mass=1.392028 mass_center=(0.009486312 0.01233848 0) inertia=(0.03995861 0.0106944 0.03995861 0 0 0)
        meshes=lumbar3.vtp
    Body lumbar2: mass=1.407865 mass_center=(0.01338408 0.01071545 0) inertia=(0.04144443 0.01180323 0.04144443 0 0 0)
        meshes=lumbar2.vtp
    Body lumbar1: mass=1.397863 mass_center=(0.01735686 0.01028863 0.001615257)
        inertia=(0.04175967 0.01296131 0.04175967 0 0 0) meshes=lumbar1.vtp
    Body torso: mass=18.77987 mass_center=(0.008605585 0.09554537 0) inertia=(0.4260567 0.375987 0.4260567 0 0 0)
        meshes=(cerv1sm.vtp cerv2sm.vtp cerv3sm.vtp cerv4sm.vtp cerv5sm.vtp cerv6sm.vtp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)
      WrapCylinder Cylinder: translation=(-0.1102696 0.02120569 0) quadrant=all radius=0.09012418 length=0.3160236
      WrapEllipsoid Chest_r: xyz_body_rotation=(0 -0.4 0.2) translation=(0 0.1113299 0.01215475) quadrant=z
          dimensions=(0.05060748 0.09126504 0.1479924)
      WrapEllipsoid Chest_l: xyz_body_rotation=(0 0.4 0.2) translation=(0 0.1113299 -0.01215475) quadrant=-z
          dimensions=(0.05060748 0.09126504 0.1479924)
    Body head: mass=3.565759 mass_center=(0.008517654 0.03101805 0) inertia=(0.003951024 0.00446598 0.003951024 0 0 0)
        meshes=(jaw.vtp skull.vtp)
    Body Abdomen: mass=0.0008335497 mass_center=(0.004241138 0 0) inertia=(5.048263e-7 3.115287e-7 5.048263e-7 0 0 0)
      WrapEllipsoid Abdomen: translation=(0 0 0) quadrant=x dimensions=(0.005301422 0.04241138 0.06077377)
    Body humerus_r: mass=1.69419 mass_center=(0 -0.1360947 0) inertia=(0.006815439 0.002351115 0.00765011 0 0 0)
        meshes=humerus_rv.vtp
    Body ulna_r: mass=0.5063814 mass_center=(0 -0.08832109 0) inertia=(0.00132584 0.000276627 0.001438192 0 0 0)
        meshes=ulna_rv.vtp
    Body radius_r: mass=0.5063814 mass_center=(0 -0.08832109 0) inertia=(0.00132584 0.000276627 0.001438192 0 0 0)
        meshes=radius_rv.vtp
    Body hand_r: mass=0.381349 mass_center=(0 -0.04990022 0) inertia=(0.0003992739 0.0002448462 0.000599806 0 0 0)
        meshes=(pisiform_rvs.vtp lunate_rvs.vtp scaphoid_rvs.vtp triquetrum_rvs.vtp hamate_rvs.vtp capitate_rvs.vtp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)
    Body humerus_l: mass=1.69419 mass_center=(0 -0.1360947 0) inertia=(0.006815439 0.002351115 0.00765011 0 0 0)
        meshes=humerus_lv.vtp
    Body ulna_l: mass=0.5063814 mass_center=(0 -0.08832109 0) inertia=(0.00132584 0.000276627 0.001438192 0 0 0)
        meshes=ulna_lv.vtp
    Body radius_l: mass=0.5063814 mass_center=(0 -0.08832109 0) inertia=(0.00132584 0.000276627 0.001438192 0 0 0)
        meshes=radius_lv.vtp
    Body hand_l: mass=0.381349 mass_center=(0 -0.04990022 0) inertia=(0.0003992739 0.0002448462 0.000599806 0 0 0)
        meshes=(pisiform_lvs.vtp lunate_lvs.vtp scaphoid_lvs.vtp triquetrum_lvs.vtp hamate_lvs.vtp capitate_lvs.vtp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)
  JointSet:
    CustomJoint ground_pelvis: socket_parent_frame=ground_offset socket_child_frame=pelvis_offset
      Coordinate pelvis_tilt: default_value=0 range=(-1.570796 1.570796) clamped=false
      Coordinate pelvis_list: default_value=0 range=(-1.570796 1.570796) clamped=false
      Coordinate pelvis_rotation: default_value=0 range=(-1.570796 1.570796) clamped=false
      Coordinate pelvis_tx: default_value=0 range=(-5 5) clamped=false
      Coordinate pelvis_ty: default_value=0.94 range=(-1 2) clamped=false
      Coordinate pelvis_tz: default_value=0 range=(-3 3) clamped=false
      PhysicalOffsetFrame ground_offset: socket_parent=/ground translation=(0 0 0) [meters]
      PhysicalOffsetFrame pelvis_offset: socket_parent=/bodyset/pelvis translation=(0 0 0)
      SpatialTransform:
        TransformAxis rotation1: coordinates=pelvis_tilt axis=(0 0 1) LinearFunction(coefficients=1 0)
        TransformAxis rotation2: coordinates=pelvis_list axis=(1 0 0) LinearFunction(coefficients=1 0)
        TransformAxis rotation3: coordinates=pelvis_rotation axis=(0 1 0) LinearFunction(coefficients=1 0)
        TransformAxis translation1: coordinates=pelvis_tx axis=(1 0 0) LinearFunction(coefficients=1 0)
        TransformAxis translation2: coordinates=pelvis_ty axis=(0 1 0) LinearFunction(coefficients=1 0)
        TransformAxis translation3: coordinates=pelvis_tz axis=(0 0 1) LinearFunction(coefficients=1 0)
    WeldJoint sacrumjnt: socket_parent_frame=pelvis_offset socket_child_frame=sacrum_offset
      PhysicalOffsetFrame pelvis_offset: socket_parent=/bodyset/pelvis translation=(0.002684123 -0.004563009 0)
      PhysicalOffsetFrame sacrum_offset: socket_parent=/bodyset/sacrum translation=(0 0 0)
    CustomJoint hip_r: socket_parent_frame=pelvis_offset socket_child_frame=femur_r_offset
      Coordinate hip_flexion_r: default_value=1.567005e-9 range=(-0.87 2.61799) clamped=true
      Coordinate hip_adduction_r: default_value=-9.463479e-10 range=(-1.047198 0.5235988) clamped=true
      Coordinate hip_rotation_r: default_value=0 range=(-1.22173 0.6981317) clamped=true
      PhysicalOffsetFrame pelvis_offset: socket_parent=/bodyset/pelvis translation=(-0.01897675 -0.01774205 0.02561053)
      PhysicalOffsetFrame femur_r_offset: socket_parent=/bodyset/femur_r translation=(0 0 0)
      SpatialTransform: axes_held_at_zero=(translation1 translation2 translation3)
        TransformAxis rotation1: coordinates=hip_flexion_r axis=(0 0 1) LinearFunction(coefficients=1 0)
        TransformAxis rotation2: coordinates=hip_adduction_r axis=(1 0 0) LinearFunction(coefficients=1 0)
        TransformAxis rotation3: coordinates=hip_rotation_r axis=(0 1 0) LinearFunction(coefficients=1 0)
    CustomJoint walker_knee_r: socket_parent_frame=femur_r_offset socket_child_frame=tibia_r_offset
      Coordinate knee_angle_r: default_value=7.691617e-5 range=(0 2.70526) clamped=true
      PhysicalOffsetFrame femur_r_offset: socket_parent=/bodyset/femur_r
          translation=(-0.0002835433 -0.01429843 -9.638368e-5) orientation=(-1.64157 1.44618 1.5708) [radians]
      PhysicalOffsetFrame tibia_r_offset: socket_parent=/bodyset/tibia_r
          translation=(-0.000505655 -0.0006585016 -9.280704e-5) orientation=(-1.64157 1.44618 1.5708)
      SpatialTransform: axes_held_at_zero=translation3
        TransformAxis rotation1: coordinates=knee_angle_r axis=(1 0 0) LinearFunction(coefficients=1 0)
        TransformAxis rotation2: coordinates=knee_angle_r axis=(0 0 1)
          SimmSpline: x=(0 0.174533 0.349066 0.523599 0.698132 0.872665 1.0472 1.22173 1.39626 1.5708 1.74533 1.91986 2.0944)
              y=(0 0.0126809 0.0226969 0.0296054 0.0332049 0.0335354 0.0308779 0.0257548 0.0189295 0.011407 0.00443314 -0.00050475 -0.0016782)
        TransformAxis rotation3: coordinates=knee_angle_r axis=(0 1 0)
          SimmSpline: x=(0 0.174533 0.349066 0.523599 0.698132 0.872665 1.0472 1.22173 1.39626 1.5708 1.74533 1.91986 2.0944)
              y=(0 0.059461 0.109399 0.150618 0.18392 0.210107 0.229983 0.24435 0.254012 0.25977 0.262428 0.262788 0.261654)
        TransformAxis translation1: coordinates=knee_angle_r axis=(0 1 0)
          MultiplierFunction: scale=0.03504861
            SimmSpline: x=(0 0.174533 0.349066 0.523599 0.698132 0.872665 1.0472 1.22173 1.39626 1.5708 1.74533 1.91986 2.0944)
                y=(0 0.000479 0.000835 0.001086 0.001251 0.001346 0.001391 0.001403 0.0014 0.0014 0.001421 0.001481 0.001599)
        TransformAxis translation2: coordinates=knee_angle_r axis=(0 0 1)
          MultiplierFunction: scale=0.03504861
            SimmSpline: x=(0 0.174533 0.349066 0.523599 0.698132 0.872665 1.0472 1.22173 1.39626 1.5708 1.74533 1.91986 2.0944)
                y=(0 0.000988 0.001899 0.002734 0.003492 0.004173 0.004777 0.005305 0.005756 0.00613 0.006427 0.006648 0.006792)
    CustomJoint patellofemoral_r: socket_parent_frame=femur_r_offset socket_child_frame=patella_r_offset
      Coordinate knee_angle_r_beta: default_value=7.691617e-5 range=(-99999.9 99999.9) clamped=false
      PhysicalOffsetFrame femur_r_offset: socket_parent=/bodyset/femur_r
          translation=(-0.0002835433 -0.01429843 -9.638368e-5)
      PhysicalOffsetFrame patella_r_offset: socket_parent=/bodyset/patella_r translation=(0 0 0)
      SpatialTransform: axes_held_at_zero=(rotation2 rotation3)
        TransformAxis rotation1: coordinates=knee_angle_r_beta axis=(0 0 1)
          SimmSpline: x=(0 0.174533 0.349066 0.523599 0.698132 0.872665 1.0472 1.22173 1.39626 1.5708 1.74533 1.91986 2.0944)
              y=(0.00113686 -0.00629212 -0.105582 -0.253683 -0.414245 -0.579047 -0.747244 -0.91799 -1.09044 -1.26379 -1.43763 -1.61186 -1.78634)
        TransformAxis translation1: coordinates=knee_angle_r_beta axis=(1 0 0)
          MultiplierFunction: scale=0.03504861
            SimmSpline: x=(0 0.174533 0.349066 0.523599 0.698132 0.872665 1.0472 1.22173 1.39626 1.5708 1.74533 1.91986 2.0944)
                y=(0.0524 0.0488 0.0437 0.0371 0.0296 0.0216 0.0136 0.0057 -0.0019 -0.0088 -0.0148 -0.0196 -0.0227)
        TransformAxis translation2: coordinates=knee_angle_r_beta axis=(0 1 0)
          MultiplierFunction: scale=0.03504861
            SimmSpline: x=(0 0.174533 0.349066 0.523599 0.698132 0.872665 1.0472 1.22173 1.39626 1.5708 1.74533 1.91986 2.0944)
                y=(-0.0108 -0.019 -0.0263 -0.0322 -0.0367 -0.0395 -0.0408 -0.0404 -0.0384 -0.0349 -0.0301 -0.0245 -0.0187)
        TransformAxis translation3: axis=(0 0 1) MultiplierFunction(scale=0.03504861, Constant(value=0.00275))
    CustomJoint ankle_r: socket_parent_frame=tibia_r_offset socket_child_frame=talus_r_offset
      Coordinate ankle_angle_r: default_value=0 range=(-1.047198 1.047198) clamped=true
      PhysicalOffsetFrame tibia_r_offset: socket_parent=/bodyset/tibia_r translation=(0 -0.02687813 0)
      PhysicalOffsetFrame talus_r_offset: socket_parent=/bodyset/talus_r translation=(0 0 0)
      SpatialTransform: axes_held_at_zero=(rotation2 rotation3 translation1 translation2 translation3)
        TransformAxis rotation1: coordinates=ankle_angle_r axis=(-0.1050135 -0.1740224 0.9791263)
            LinearFunction(coefficients=1 0)
    PinJoint subtalar_r: socket_parent_frame=talus_r_offset socket_child_frame=calcn_r_offset
      Coordinate subtalar_angle_r: default_value=0 range=(-0.3490659 0.3490659) clamped=true
      PhysicalOffsetFrame talus_r_offset: socket_parent=/bodyset/talus_r
          translation=(-0.005284481 -0.004545499 0.0008581729) orientation=(-1.76819 0.906223 1.8196)
      PhysicalOffsetFrame calcn_r_offset: socket_parent=/bodyset/calcn_r translation=(0 0 0)
          orientation=(-1.76819 0.906223 1.8196)
    PinJoint mtp_r: socket_parent_frame=calcn_r_offset socket_child_frame=toes_r_offset
      Coordinate mtp_angle_r: default_value=0 range=(-0.5235988 0.5235988) clamped=true
      PhysicalOffsetFrame calcn_r_offset: socket_parent=/bodyset/calcn_r
          translation=(0.0193739 -0.0002167103 0.0001170236) orientation=(-3.14159 0.619901 0)
      PhysicalOffsetFrame toes_r_offset: socket_parent=/bodyset/toes_r translation=(0 0 0)
          orientation=(-3.14159 0.619901 0)
    CustomJoint hip_l: socket_parent_frame=pelvis_offset socket_child_frame=femur_l_offset
      Coordinate hip_flexion_l: default_value=1.567005e-9 range=(-0.87 2.61799) clamped=true
      Coordinate hip_adduction_l: default_value=-9.463479e-10 range=(-1.047198 0.5235988) clamped=true
      Coordinate hip_rotation_l: default_value=0 range=(-1.22173 0.6981317) clamped=true
      PhysicalOffsetFrame pelvis_offset: socket_parent=/bodyset/pelvis
          translation=(-0.01897675 -0.01774205 -0.02561053)
      PhysicalOffsetFrame femur_l_offset: socket_parent=/bodyset/femur_l translation=(0 0 0)
      SpatialTransform: axes_held_at_zero=(translation1 translation2 translation3)
        TransformAxis rotation1: coordinates=hip_flexion_l axis=(0 0 1) LinearFunction(coefficients=1 0)
        TransformAxis rotation2: coordinates=hip_adduction_l axis=(1 0 0) LinearFunction(coefficients=-1 0)
        TransformAxis rotation3: coordinates=hip_rotation_l axis=(0 1 0) LinearFunction(coefficients=-1 0)
    CustomJoint walker_knee_l: socket_parent_frame=femur_l_offset socket_child_frame=tibia_l_offset
      Coordinate knee_angle_l: default_value=7.691617e-5 range=(0 2.70526) clamped=true
      PhysicalOffsetFrame femur_l_offset: socket_parent=/bodyset/femur_l
          translation=(-0.0006411856 -0.03233351 0.0002179555) orientation=(1.64157 -1.44618 1.5708)
      PhysicalOffsetFrame tibia_l_offset: socket_parent=/bodyset/tibia_l
          translation=(-0.0005649681 -0.0007357434 0.0001036933) orientation=(1.64157 -1.44618 1.5708)
      SpatialTransform: axes_held_at_zero=translation3
        TransformAxis rotation1: coordinates=knee_angle_l axis=(-1 0 0) LinearFunction(coefficients=1 0)
        TransformAxis rotation2: coordinates=knee_angle_l axis=(0 0 1)
          SimmSpline: x=(0 0.174533 0.349066 0.523599 0.698132 0.872665 1.0472 1.22173 1.39626 1.5708 1.74533 1.91986 2.0944)
              y=(0 0.0126809 0.0226969 0.0296054 0.0332049 0.0335354 0.0308779 0.0257548 0.0189295 0.011407 0.00443314 -0.00050475 -0.0016782)
        TransformAxis rotation3: coordinates=knee_angle_l axis=(0 1 0)
          SimmSpline: x=(0 0.174533 0.349066 0.523599 0.698132 0.872665 1.0472 1.22173 1.39626 1.5708 1.74533 1.91986 2.0944)
              y=(0 -0.059461 -0.109399 -0.150618 -0.18392 -0.210107 -0.229983 -0.24435 -0.254012 -0.25977 -0.262428 -0.262788 -0.261654)
        TransformAxis translation1: coordinates=knee_angle_l axis=(0 1 0)
          MultiplierFunction: scale=0.07925656
            SimmSpline: x=(0 0.174533 0.349066 0.523599 0.698132 0.872665 1.0472 1.22173 1.39626 1.5708 1.74533 1.91986 2.0944)
                y=(0 0.000479 0.000835 0.001086 0.001251 0.001346 0.001391 0.001403 0.0014 0.0014 0.001421 0.001481 0.001599)
        TransformAxis translation2: coordinates=knee_angle_l axis=(0 0 1)
          MultiplierFunction: scale=0.07925656
            SimmSpline: x=(0 0.174533 0.349066 0.523599 0.698132 0.872665 1.0472 1.22173 1.39626 1.5708 1.74533 1.91986 2.0944)
                y=(0 -0.000988 -0.001899 -0.002734 -0.003492 -0.004173 -0.004777 -0.005305 -0.005756 -0.00613 -0.006427 -0.006648 -0.006792)
    CustomJoint patellofemoral_l: socket_parent_frame=femur_l_offset socket_child_frame=patella_l_offset
      Coordinate knee_angle_l_beta: default_value=7.691617e-5 range=(-99999.9 99999.9) clamped=false
      PhysicalOffsetFrame femur_l_offset: socket_parent=/bodyset/femur_l
          translation=(-0.0006411856 -0.03233351 0.0002179555)
      PhysicalOffsetFrame patella_l_offset: socket_parent=/bodyset/patella_l translation=(0 0 0)
      SpatialTransform: axes_held_at_zero=(rotation2 rotation3)
        TransformAxis rotation1: coordinates=knee_angle_l_beta axis=(0 0 1)
          SimmSpline: x=(0 0.174533 0.349066 0.523599 0.698132 0.872665 1.0472 1.22173 1.39626 1.5708 1.74533 1.91986 2.0944)
              y=(0.00113686 -0.00629212 -0.105582 -0.253683 -0.414245 -0.579047 -0.747244 -0.91799 -1.09044 -1.26379 -1.43763 -1.61186 -1.78634)
        TransformAxis translation1: coordinates=knee_angle_l_beta axis=(1 0 0)
          MultiplierFunction: scale=0.07925656
            SimmSpline: x=(0 0.174533 0.349066 0.523599 0.698132 0.872665 1.0472 1.22173 1.39626 1.5708 1.74533 1.91986 2.0944)
                y=(0.0524 0.0488 0.0437 0.0371 0.0296 0.0216 0.0136 0.0057 -0.0019 -0.0088 -0.0148 -0.0196 -0.0227)
        TransformAxis translation2: coordinates=knee_angle_l_beta axis=(0 1 0)
          MultiplierFunction: scale=0.07925656
            SimmSpline: x=(0 0.174533 0.349066 0.523599 0.698132 0.872665 1.0472 1.22173 1.39626 1.5708 1.74533 1.91986 2.0944)
                y=(-0.0108 -0.019 -0.0263 -0.0322 -0.0367 -0.0395 -0.0408 -0.0404 -0.0384 -0.0349 -0.0301 -0.0245 -0.0187)
        TransformAxis translation3: axis=(0 0 1) MultiplierFunction(scale=0.07925656, Constant(value=-0.00275))
    CustomJoint ankle_l: socket_parent_frame=tibia_l_offset socket_child_frame=talus_l_offset
      Coordinate ankle_angle_l: default_value=0 range=(-1.047198 1.047198) clamped=true
      PhysicalOffsetFrame tibia_l_offset: socket_parent=/bodyset/tibia_l translation=(0 -0.03003091 0)
      PhysicalOffsetFrame talus_l_offset: socket_parent=/bodyset/talus_l translation=(0 0 0)
      SpatialTransform: axes_held_at_zero=(rotation2 rotation3 translation1 translation2 translation3)
        TransformAxis rotation1: coordinates=ankle_angle_l axis=(0.1050135 0.1740224 0.9791263)
            LinearFunction(coefficients=1 0)
    PinJoint subtalar_l: socket_parent_frame=talus_l_offset socket_child_frame=calcn_l_offset
      Coordinate subtalar_angle_l: default_value=0 range=(-0.3490659 0.3490659) clamped=true
      PhysicalOffsetFrame talus_l_offset: socket_parent=/bodyset/talus_l
          translation=(-0.005284481 -0.004545499 -0.0008581729) orientation=(1.76819 -0.906223 1.8196)
      PhysicalOffsetFrame calcn_l_offset: socket_parent=/bodyset/calcn_l translation=(0 0 0)
          orientation=(1.76819 -0.906223 1.8196)
    PinJoint mtp_l: socket_parent_frame=calcn_l_offset socket_child_frame=toes_l_offset
      Coordinate mtp_angle_l: default_value=0 range=(-0.5235988 0.5235988) clamped=true
      PhysicalOffsetFrame calcn_l_offset: socket_parent=/bodyset/calcn_l
          translation=(0.0193739 -0.0002167103 -0.0001170236) orientation=(-3.14159 -0.619901 0)
      PhysicalOffsetFrame toes_l_offset: socket_parent=/bodyset/toes_l translation=(0 0 0)
          orientation=(-3.14159 -0.619901 0)
    CustomJoint L5_S1_IVDjnt: socket_parent_frame=sacrum_offset socket_child_frame=lumbar5_offset
      Coordinate L5_S1_Flex_Ext: default_value=0 range=(-0.1954769 0.06352998) clamped=false
      Coordinate L5_S1_Lat_Bending: default_value=0 range=(-0.03926991 0.03926991) clamped=false
      Coordinate L5_S1_axial_rotation: default_value=0 range=(-0.2618 0.2618) clamped=true
      PhysicalOffsetFrame sacrum_offset: socket_parent=/bodyset/sacrum translation=(-0.05195394 0.0376401 0)
      PhysicalOffsetFrame lumbar5_offset: socket_parent=/bodyset/lumbar5 translation=(0 0 0)
      SpatialTransform: axes_held_at_zero=(translation1 translation2 translation3)
        TransformAxis rotation1: coordinates=L5_S1_Flex_Ext axis=(0 0 1) LinearFunction(coefficients=1 0)
        TransformAxis rotation2: coordinates=L5_S1_Lat_Bending axis=(1 0 0) LinearFunction(coefficients=1 0)
        TransformAxis rotation3: coordinates=L5_S1_axial_rotation axis=(0 1 0) LinearFunction(coefficients=1 0)
    CustomJoint L4_L5_IVDjnt: socket_parent_frame=lumbar5_offset socket_child_frame=lumbar4_offset
      Coordinate L4_L5_Flex_Ext: default_value=0 range=(-99999.9 99999.9) clamped=false
      Coordinate L4_L5_Lat_Bending: default_value=0 range=(-99999.9 99999.9) clamped=false
      Coordinate L4_L5_axial_rotation: default_value=0 range=(-99999.9 99999.9) clamped=false
      PhysicalOffsetFrame lumbar5_offset: socket_parent=/bodyset/lumbar5 translation=(0.005301422 0.01569221 0)
      PhysicalOffsetFrame lumbar4_offset: socket_parent=/bodyset/lumbar4 translation=(0.0005301422 -0.001325356 0)
      SpatialTransform: axes_held_at_zero=(translation1 translation2 translation3)
        TransformAxis rotation1: coordinates=L4_L5_Flex_Ext axis=(0 0 1) LinearFunction(coefficients=1 0)
        TransformAxis rotation2: coordinates=L4_L5_Lat_Bending axis=(1 0 0) LinearFunction(coefficients=1 0)
        TransformAxis rotation3: coordinates=L4_L5_axial_rotation axis=(0 1 0) LinearFunction(coefficients=1 0)
    CustomJoint L3_L4_IVDjnt: socket_parent_frame=lumbar4_offset socket_child_frame=lumbar3_offset
      Coordinate L3_L4_Flex_Ext: default_value=0 range=(-99999.9 99999.9) clamped=false
      Coordinate L3_L4_Lat_Bending: default_value=0 range=(-99999.9 99999.9) clamped=false
      Coordinate L3_L4_axial_rotation: default_value=0 range=(-99999.9 99999.9) clamped=false
      PhysicalOffsetFrame lumbar4_offset: socket_parent=/bodyset/lumbar4 translation=(0 0.01696455 0)
      PhysicalOffsetFrame lumbar3_offset: socket_parent=/bodyset/lumbar3 translation=(-0.0003180853 -0.0006361707 0)
      SpatialTransform: axes_held_at_zero=(translation1 translation2 translation3)
        TransformAxis rotation1: coordinates=L3_L4_Flex_Ext axis=(0 0 1) LinearFunction(coefficients=1 0)
        TransformAxis rotation2: coordinates=L3_L4_Lat_Bending axis=(1 0 0) LinearFunction(coefficients=1 0)
        TransformAxis rotation3: coordinates=L3_L4_axial_rotation axis=(0 1 0) LinearFunction(coefficients=1 0)
    CustomJoint L2_L3_IVD_jnt: socket_parent_frame=lumbar3_offset socket_child_frame=lumbar2_offset
      Coordinate L2_L3_Flex_Ext: default_value=0 range=(-99999.9 99999.9) clamped=false
      Coordinate L2_L3_Lat_Bending: default_value=0 range=(-99999.9 99999.9) clamped=false
      Coordinate L2_L3_axial_rotation: default_value=0 range=(-99999.9 99999.9) clamped=false
      PhysicalOffsetFrame lumbar3_offset: socket_parent=/bodyset/lumbar3 translation=(-0.004241138 0.01654044 0)
      PhysicalOffsetFrame lumbar2_offset: socket_parent=/bodyset/lumbar2 translation=(-0.0006891849 -0.002067555 0)
      SpatialTransform: axes_held_at_zero=(translation1 translation2 translation3)
        TransformAxis rotation1: coordinates=L2_L3_Flex_Ext axis=(0 0 1) LinearFunction(coefficients=1 0)
        TransformAxis rotation2: coordinates=L2_L3_Lat_Bending axis=(1 0 0) LinearFunction(coefficients=1 0)
        TransformAxis rotation3: coordinates=L2_L3_axial_rotation axis=(0 1 0) LinearFunction(coefficients=1 0)
    CustomJoint L1_L2_IVD_jnt: socket_parent_frame=lumbar2_offset socket_child_frame=lumbar1_offset
      Coordinate L1_L2_Flex_Ext: default_value=0 range=(-99999.9 99999.9) clamped=false
      Coordinate L1_L2_Lat_Bending: default_value=0 range=(-99999.9 99999.9) clamped=false
      Coordinate L1_L2_axial_rotation: default_value=0 range=(-99999.9 99999.9) clamped=false
      PhysicalOffsetFrame lumbar2_offset: socket_parent=/bodyset/lumbar2 translation=(-0.005301422 0.01325356 0)
      PhysicalOffsetFrame lumbar1_offset: socket_parent=/bodyset/lumbar1 translation=(0.0007421991 -0.00201454 0)
      SpatialTransform: axes_held_at_zero=(translation1 translation2 translation3)
        TransformAxis rotation1: coordinates=L1_L2_Flex_Ext axis=(0 0 1) LinearFunction(coefficients=1 0)
        TransformAxis rotation2: coordinates=L1_L2_Lat_Bending axis=(1 0 0) LinearFunction(coefficients=1 0)
        TransformAxis rotation3: coordinates=L1_L2_axial_rotation axis=(0 1 0) LinearFunction(coefficients=1 0)
    CustomJoint L1_T12_IVD_jnt: socket_parent_frame=lumbar1_offset socket_child_frame=torso_offset
      Coordinate L1_T12_Flex_Ext: default_value=0 range=(-99999.9 99999.9) clamped=false
      Coordinate L1_T12_Lat_Bending: default_value=0 range=(-99999.9 99999.9) clamped=false
      Coordinate L1_T12_axial_rotation: default_value=0 range=(-1.1 1.1) clamped=false
      PhysicalOffsetFrame lumbar1_offset: socket_parent=/bodyset/lumbar1 translation=(-0.005513479 0.01457891 0)
      PhysicalOffsetFrame torso_offset: socket_parent=/bodyset/torso translation=(-0.006838835 0.06117841 0)
      SpatialTransform: axes_held_at_zero=(translation1 translation2 translation3)
        TransformAxis rotation1: coordinates=L1_T12_Flex_Ext axis=(0 0 1) LinearFunction(coefficients=1 0)
        TransformAxis rotation2: coordinates=L1_T12_Lat_Bending axis=(1 0 0) LinearFunction(coefficients=1 0)
        TransformAxis rotation3: coordinates=L1_T12_axial_rotation axis=(0 1 0) LinearFunction(coefficients=1 0)
    CustomJoint Abdjnt: socket_parent_frame=sacrum_offset socket_child_frame=Abdomen_offset
      Coordinate Abs_r3: default_value=0 range=(-1.7 1.7) clamped=false
      Coordinate Abs_r2: default_value=0 range=(-1.7 1.7) clamped=false
      Coordinate Abs_r1: default_value=0 range=(-1.7 1.7) clamped=false
      Coordinate Abs_t1: default_value=0 range=(-99999.9 99999.9) clamped=false locked=true
      Coordinate Abs_t2: default_value=0 range=(-99999.9 99999.9) clamped=false locked=true
      PhysicalOffsetFrame sacrum_offset: socket_parent=/bodyset/sacrum translation=(-0.05195394 0.0376401 0)
      PhysicalOffsetFrame Abdomen_offset: socket_parent=/bodyset/Abdomen translation=(-0.0477128 -0.0477128 0)
      SpatialTransform: axes_held_at_zero=translation3
        TransformAxis rotation1: coordinates=Abs_r3 axis=(0 0 1) LinearFunction(coefficients=1 0)
        TransformAxis rotation2: coordinates=Abs_r2 axis=(1 0 0) LinearFunction(coefficients=1 0)
        TransformAxis rotation3: coordinates=Abs_r1 axis=(0 1 0) LinearFunction(coefficients=1 0)
        TransformAxis translation1: coordinates=Abs_t1 axis=(1 0 0) LinearFunction(coefficients=1 0)
        TransformAxis translation2: coordinates=Abs_t2 axis=(0 1 0) LinearFunction(coefficients=1 0)
    CustomJoint head_torso: socket_parent_frame=torso_offset socket_child_frame=head_offset
      Coordinate neck_flexion: default_value=5.488091e-11 range=(-0.5 0.5) clamped=true
      Coordinate neck_bending: default_value=0 range=(-1.570796 1.570796) clamped=true
      Coordinate neck_rotation: default_value=3.658914e-10 range=(-0.785398 0.785398) clamped=true
      PhysicalOffsetFrame torso_offset: socket_parent=/bodyset/torso translation=(0 0.2870498 0)
      PhysicalOffsetFrame head_offset: socket_parent=/bodyset/head translation=(0 0.01590427 0)
      SpatialTransform: axes_held_at_zero=(translation1 translation2 translation3)
        TransformAxis rotation1: coordinates=neck_flexion axis=(0 0 1) LinearFunction(coefficients=1 0)
        TransformAxis rotation2: coordinates=neck_bending axis=(1 0 0) LinearFunction(coefficients=1 0)
        TransformAxis rotation3: coordinates=neck_rotation axis=(0 1 0) LinearFunction(coefficients=1 0)
    CustomJoint acromial_r: socket_parent_frame=torso_offset socket_child_frame=humerus_r_offset
      Coordinate arm_flex_r: default_value=0 range=(-1.57 1.57) clamped=false
      Coordinate arm_add_r: default_value=-1.57 range=(-2.09 1.57) clamped=false
      Coordinate arm_rot_r: default_value=0 range=(-1.57 1.57) clamped=false
      PhysicalOffsetFrame torso_offset: socket_parent=/bodyset/torso translation=(0.001672599 0.1969478 0.2066308)
      PhysicalOffsetFrame humerus_r_offset: socket_parent=/bodyset/humerus_r translation=(0 0 0)
      SpatialTransform: axes_held_at_zero=(translation1 translation2 translation3)
        TransformAxis rotation1: coordinates=arm_flex_r axis=(0 0 1) LinearFunction(coefficients=1 0)
        TransformAxis rotation2: coordinates=arm_add_r axis=(1 0 0) LinearFunction(coefficients=1 0)
        TransformAxis rotation3: coordinates=arm_rot_r axis=(0 1 0) LinearFunction(coefficients=1 0)
    PinJoint elbow_r: socket_parent_frame=humerus_r_offset socket_child_frame=ulna_r_offset
      Coordinate elbow_flex_r: default_value=7.691512e-5 range=(0 2.618) clamped=true
      PhysicalOffsetFrame humerus_r_offset: socket_parent=/bodyset/humerus_r
          translation=(0.0108742 -0.2368374 -0.007938069) orientation=(-0.0228627 0.228018 0.0051689)
      PhysicalOffsetFrame ulna_r_offset: socket_parent=/bodyset/ulna_r translation=(0 0 0)
          orientation=(-0.0228627 0.228018 0.0051689)
    PinJoint radioulnar_r: socket_parent_frame=ulna_r_offset socket_child_frame=radius_r_offset
      Coordinate pro_sup_r: default_value=1.57 range=(0 2.09) clamped=true
      PhysicalOffsetFrame ulna_r_offset: socket_parent=/bodyset/ulna_r
          translation=(-0.004929566 -0.009531569 0.0191137) orientation=(-1.56884 0.056428 1.53614)
      PhysicalOffsetFrame radius_r_offset: socket_parent=/bodyset/radius_r translation=(0 0 0)
          orientation=(-1.56884 0.056428 1.53614)
    UniversalJoint radius_hand_r: socket_parent_frame=radius_r_offset socket_child_frame=hand_r_offset
      Coordinate wrist_flex_r: default_value=0 range=(-1.92 1.92) clamped=true
      Coordinate wrist_dev_r: default_value=0 range=(-0.4363323 0.6108652) clamped=true
      PhysicalOffsetFrame radius_r_offset: socket_parent=/bodyset/radius_r
          translation=(-0.006446469 -0.172825 0.00997345) orientation=(-1.5708 0 -1.5708)
      PhysicalOffsetFrame hand_r_offset: socket_parent=/bodyset/hand_r translation=(0 0 0)
          orientation=(-1.5708 0 -1.5708)
    CustomJoint acromial_l: socket_parent_frame=torso_offset socket_child_frame=humerus_l_offset
      Coordinate arm_flex_l: default_value=0 range=(-1.57 1.57) clamped=false
      Coordinate arm_add_l: default_value=-1.57 range=(-2.09 1.57) clamped=false
      Coordinate arm_rot_l: default_value=0 range=(-1.57 1.57) clamped=false
      PhysicalOffsetFrame torso_offset: socket_parent=/bodyset/torso translation=(0.001672599 0.1969478 -0.2066308)
      PhysicalOffsetFrame humerus_l_offset: socket_parent=/bodyset/humerus_l translation=(0 0 0)
      SpatialTransform: axes_held_at_zero=(translation1 translation2 translation3)
        TransformAxis rotation1: coordinates=arm_flex_l axis=(0 0 1) LinearFunction(coefficients=1 0)
        TransformAxis rotation2: coordinates=arm_add_l axis=(-1 0 0) LinearFunction(coefficients=1 0)
        TransformAxis rotation3: coordinates=arm_rot_l axis=(0 -1 0) LinearFunction(coefficients=1 0)
    PinJoint elbow_l: socket_parent_frame=humerus_l_offset socket_child_frame=ulna_l_offset
      Coordinate elbow_flex_l: default_value=7.691512e-5 range=(0 2.618) clamped=true
      PhysicalOffsetFrame humerus_l_offset: socket_parent=/bodyset/humerus_l
          translation=(0.0108742 -0.2368374 0.007938069) orientation=(0.0228627 -0.228018 0.0051689)
      PhysicalOffsetFrame ulna_l_offset: socket_parent=/bodyset/ulna_l translation=(0 0 0)
          orientation=(0.0228627 -0.228018 0.0051689)
    PinJoint radioulnar_l: socket_parent_frame=ulna_l_offset socket_child_frame=radius_l_offset
      Coordinate pro_sup_l: default_value=1.57 range=(0 2.09) clamped=true
      PhysicalOffsetFrame ulna_l_offset: socket_parent=/bodyset/ulna_l
          translation=(-0.004929566 -0.009531569 -0.0191137) orientation=(1.56884 -0.056428 1.53614)
      PhysicalOffsetFrame radius_l_offset: socket_parent=/bodyset/radius_l translation=(0 0 0)
          orientation=(1.56884 -0.056428 1.53614)
    UniversalJoint radius_hand_l: socket_parent_frame=radius_l_offset socket_child_frame=hand_l_offset
      Coordinate wrist_flex_l: default_value=0 range=(-1.92 1.92) clamped=true
      Coordinate wrist_dev_l: default_value=0 range=(-0.4363323 0.6108652) clamped=true
      PhysicalOffsetFrame radius_l_offset: socket_parent=/bodyset/radius_l
          translation=(-0.006446469 -0.172825 -0.00997345) orientation=(1.5708 0 1.5708)
      PhysicalOffsetFrame hand_l_offset: socket_parent=/bodyset/hand_l translation=(0 0 0)
          orientation=(1.5708 0 1.5708)
  ConstraintSet:
    CoordinateCouplerConstraint Abs_r3_con: independent_coordinate_names=L5_S1_Flex_Ext
        dependent_coordinate_name=Abs_r3 scale_factor=1
        coupled_coordinates_function=LinearFunction(coefficients=7.1429 0)
    CoordinateCouplerConstraint Abs_r1_con: independent_coordinate_names=L5_S1_axial_rotation
        dependent_coordinate_name=Abs_r1 scale_factor=1
        coupled_coordinates_function=LinearFunction(coefficients=5.5617 0)
    CoordinateCouplerConstraint Abs_r2_con: independent_coordinate_names=L5_S1_Lat_Bending
        dependent_coordinate_name=Abs_r2 scale_factor=1
        coupled_coordinates_function=LinearFunction(coefficients=11.3122 0)
    CoordinateCouplerConstraint L4_L5_Flex_Ext_con: independent_coordinate_names=L5_S1_Flex_Ext
        dependent_coordinate_name=L4_L5_Flex_Ext scale_factor=1
        coupled_coordinates_function=LinearFunction(coefficients=1.8571 0)
    CoordinateCouplerConstraint L4_L5_axial_rotation_con: independent_coordinate_names=L5_S1_axial_rotation
        dependent_coordinate_name=L4_L5_axial_rotation scale_factor=1
        coupled_coordinates_function=LinearFunction(coefficients=1.0625 0)
    CoordinateCouplerConstraint L4_L5_Lat_Bending_con: independent_coordinate_names=L5_S1_Lat_Bending
        dependent_coordinate_name=L4_L5_Lat_Bending scale_factor=1
        coupled_coordinates_function=LinearFunction(coefficients=1.33 0)
    CoordinateCouplerConstraint L3_L4_Flex_Ext_con: independent_coordinate_names=L5_S1_Flex_Ext
        dependent_coordinate_name=L3_L4_Flex_Ext scale_factor=1
        coupled_coordinates_function=LinearFunction(coefficients=1.6429 0)
    CoordinateCouplerConstraint L3_L4_axial_rotation_con: independent_coordinate_names=L5_S1_axial_rotation
        dependent_coordinate_name=L3_L4_axial_rotation scale_factor=1
        coupled_coordinates_function=LinearFunction(coefficients=1.0625 0)
    CoordinateCouplerConstraint L3_L4_Lat_Bending_con: independent_coordinate_names=L5_S1_Lat_Bending
        dependent_coordinate_name=L3_L4_Lat_Bending scale_factor=1
        coupled_coordinates_function=LinearFunction(coefficients=2.4314 0)
    CoordinateCouplerConstraint L2_L3_Flex_Ext_con: independent_coordinate_names=L5_S1_Flex_Ext
        dependent_coordinate_name=L2_L3_Flex_Ext scale_factor=1
        coupled_coordinates_function=LinearFunction(coefficients=1.1429 0)
    CoordinateCouplerConstraint L2_L3_axial_rotation_con: independent_coordinate_names=L5_S1_axial_rotation
        dependent_coordinate_name=L2_L3_axial_rotation scale_factor=1
        coupled_coordinates_function=LinearFunction(coefficients=0.875 0)
    CoordinateCouplerConstraint L2_L3_Lat_Bending_con: independent_coordinate_names=L5_S1_Lat_Bending
        dependent_coordinate_name=L2_L3_Lat_Bending scale_factor=1
        coupled_coordinates_function=LinearFunction(coefficients=2.4314 0)
    CoordinateCouplerConstraint L1_L2_Flex_Ext_con: independent_coordinate_names=L5_S1_Flex_Ext
        dependent_coordinate_name=L1_L2_Flex_Ext scale_factor=1
        coupled_coordinates_function=LinearFunction(coefficients=0.9286 0)
    CoordinateCouplerConstraint L1_L2_axial_rotation_con: independent_coordinate_names=L5_S1_axial_rotation
        dependent_coordinate_name=L1_L2_axial_rotation scale_factor=1
        coupled_coordinates_function=LinearFunction(coefficients=0.8125 0)
    CoordinateCouplerConstraint L1_L2_Lat_Bending_con: independent_coordinate_names=L5_S1_Lat_Bending
        dependent_coordinate_name=L1_L2_Lat_Bending scale_factor=1
        coupled_coordinates_function=LinearFunction(coefficients=2.0392 0)
    CoordinateCouplerConstraint L1_T12_axial_rotation: independent_coordinate_names=L5_S1_axial_rotation
        dependent_coordinate_name=L1_T12_axial_rotation scale_factor=1
        coupled_coordinates_function=LinearFunction(coefficients=0.75 0)
    CoordinateCouplerConstraint L1_T12_Flex_Ext_con: independent_coordinate_names=L5_S1_Flex_Ext
        dependent_coordinate_name=L1_T12_Flex_Ext scale_factor=1
        coupled_coordinates_function=LinearFunction(coefficients=0.5714 0)
    CoordinateCouplerConstraint L1_T12_Lat_Bending_con: independent_coordinate_names=L5_S1_Lat_Bending
        dependent_coordinate_name=L1_T12_Lat_Bending scale_factor=1
        coupled_coordinates_function=LinearFunction(coefficients=1.549 0)
    CoordinateCouplerConstraint patellofemoral_knee_angle_r_con: independent_coordinate_names=knee_angle_r
        dependent_coordinate_name=knee_angle_r_beta scale_factor=1
        coupled_coordinates_function=LinearFunction(coefficients=1 0)
    CoordinateCouplerConstraint patellofemoral_knee_angle_l_con: independent_coordinate_names=knee_angle_l
        dependent_coordinate_name=knee_angle_l_beta scale_factor=1
        coupled_coordinates_function=LinearFunction(coefficients=1 0)
  ForceSet:
    SmoothSphereHalfSpaceForce [values shared by the 12 below unless stated]: socket_half_space=/contactgeometryset/floor
        stiffness=1000000 [N/m^2] dissipation=2 [s/m] static_friction=0.8 dynamic_friction=0.8 viscous_friction=0.5
        transition_velocity=0.2 [m/s]
    SmoothSphereHalfSpaceForce SmoothSphereHalfSpaceForce_s1_r: socket_sphere=/contactgeometryset/s1_r
    SmoothSphereHalfSpaceForce SmoothSphereHalfSpaceForce_s2_r: socket_sphere=/contactgeometryset/s2_r
    SmoothSphereHalfSpaceForce SmoothSphereHalfSpaceForce_s3_r: socket_sphere=/contactgeometryset/s3_r
    SmoothSphereHalfSpaceForce SmoothSphereHalfSpaceForce_s4_r: socket_sphere=/contactgeometryset/s4_r
    SmoothSphereHalfSpaceForce SmoothSphereHalfSpaceForce_s5_r: socket_sphere=/contactgeometryset/s5_r
    SmoothSphereHalfSpaceForce SmoothSphereHalfSpaceForce_s6_r: socket_sphere=/contactgeometryset/s6_r
    SmoothSphereHalfSpaceForce SmoothSphereHalfSpaceForce_s1_l: socket_sphere=/contactgeometryset/s1_l
    SmoothSphereHalfSpaceForce SmoothSphereHalfSpaceForce_s2_l: socket_sphere=/contactgeometryset/s2_l
    SmoothSphereHalfSpaceForce SmoothSphereHalfSpaceForce_s3_l: socket_sphere=/contactgeometryset/s3_l
    SmoothSphereHalfSpaceForce SmoothSphereHalfSpaceForce_s4_l: socket_sphere=/contactgeometryset/s4_l
    SmoothSphereHalfSpaceForce SmoothSphereHalfSpaceForce_s5_l: socket_sphere=/contactgeometryset/s5_l
    SmoothSphereHalfSpaceForce SmoothSphereHalfSpaceForce_s6_l: socket_sphere=/contactgeometryset/s6_l
    DeGrooteFregly2016Muscle [values shared by the 318 below unless stated]: min_control=0.01 max_control=1
        max_contraction_velocity=10 ignore_tendon_compliance=true active_force_width_scale=1.5
        ignore_passive_fiber_force=true default_activation=0.05
    DeGrooteFregly2016Muscle addbrev_r: max_isometric_force=625.8197 optimal_fiber_length=0.01909786
        tendon_slack_length=0.00656668 pennation_angle_at_optimal=0.1147809 [radians] activation_time_constant=0.01
        deactivation_time_constant=0.04 default_activation=0.01 fiber_damping=0.01
        passive_fiber_strain_at_one_norm_force=0.7 tendon_strain_at_one_norm_force=0.049
      PathPoint P1: pelvis (-0.005126675 -0.02523076 0.004723378)
      PathPoint P2: femur_r (-7.009722e-5 -0.004135736 0.0008727104)
      PathWrap: wrap_object=AB_at_femshaft_r method=hybrid
    DeGrooteFregly2016Muscle addlong_r: max_isometric_force=916.8 optimal_fiber_length=0.01202581
        tendon_slack_length=0.01464874 pennation_angle_at_optimal=0.1377704 activation_time_constant=0.01
        deactivation_time_constant=0.04 default_activation=0.01 fiber_damping=0.01
        passive_fiber_strain_at_one_norm_force=0.7 tendon_strain_at_one_norm_force=0.049
      PathPoint P1: pelvis (-0.002034565 -0.02386185 0.005790739)
      PathPoint P2: femur_r (0.0003946474 -0.008389586 0.0005548195)
      PathWrap: wrap_object=AL_at_femshaft_r method=hybrid
    DeGrooteFregly2016Muscle addmagDist_r: max_isometric_force=597.2951 optimal_fiber_length=0.01333007
        tendon_slack_length=0.006573309 pennation_angle_at_optimal=0.194705 activation_time_constant=0.01
        deactivation_time_constant=0.04 default_activation=0.01 fiber_damping=0.01
        passive_fiber_strain_at_one_norm_force=0.7 tendon_strain_at_one_norm_force=0.049
      PathPoint P1: pelvis (-0.01987325 -0.0342682 0.01221331)
      PathPoint P2: femur_r (0.0003942969 -0.009200261 0.0006764382)
      PathWrap: wrap_object=AMdist_at_femshaft_r method=hybrid
    DeGrooteFregly2016Muscle addmagIsch_r: max_isometric_force=597.2951 optimal_fiber_length=0.006362811
        tendon_slack_length=0.008812739 pennation_angle_at_optimal=0.1680443 activation_time_constant=0.01
        deactivation_time_constant=0.04 default_activation=0.01 fiber_damping=0.01
        passive_fiber_strain_at_one_norm_force=0.7 tendon_strain_at_one_norm_force=0.049
      PathPoint P1: pelvis (-0.02405511 -0.03482918 0.01279299)
      PathPoint P2: femur_r (0.0001685838 -0.01359781 -0.001147141)
      PathWrap: wrap_object=AMisch_at_condyles_r method=hybrid
    DeGrooteFregly2016Muscle addmagMid_r: max_isometric_force=597.2951 optimal_fiber_length=0.02047464
        tendon_slack_length=0.006933081 pennation_angle_at_optimal=0.2073076 activation_time_constant=0.01
        deactivation_time_constant=0.04 default_activation=0.01 fiber_damping=0.01
        passive_fiber_strain_at_one_norm_force=0.7 tendon_strain_at_one_norm_force=0.049
      PathPoint P1: pelvis (-0.01413459 -0.03241079 0.008753586)
      PathPoint P2: femur_r (8.481764e-5 -0.005691895 0.00102412)
      PathWrap: wrap_object=AMmid_at_femshaft_r method=hybrid
    DeGrooteFregly2016Muscle addmagProx_r: max_isometric_force=597.2951 optimal_fiber_length=0.02274849
        tendon_slack_length=0.00868667 pennation_angle_at_optimal=0.3114833 activation_time_constant=0.01
        deactivation_time_constant=0.04 default_activation=0.01 fiber_damping=0.01
        passive_fiber_strain_at_one_norm_force=0.7 tendon_strain_at_one_norm_force=0.049
      PathPoint P1: pelvis (-0.008315413 -0.02886774 0.004186631)
      PathPoint P2: femur_r (-0.0005351923 -0.002763934 0.001122257)
      PathWrap: wrap_object=AMprox_at_femshaft_r method=hybrid
    DeGrooteFregly2016Muscle bflh_r: max_isometric_force=1313.184 optimal_fiber_length=0.003088355
        tendon_slack_length=0.01029114 pennation_angle_at_optimal=0.1759182 activation_time_constant=0.01
        deactivation_time_constant=0.04 default_activation=0.01 fiber_damping=0.01
        passive_fiber_strain_at_one_norm_force=0.7 tendon_strain_at_one_norm_force=0.049
      PathPoint P1: pelvis (-0.02791488 -0.03196791 0.01797338)
      PathPoint P2: tibia_r (-0.002106495 -0.002187754 0.001581434)
      PathPoint P3: tibia_r (-0.001793959 -0.002844081 0.00189397)
    DeGrooteFregly2016Muscle bfsh_r: max_isometric_force=557.1148 optimal_fiber_length=0.004355641
        tendon_slack_length=0.004178621 pennation_angle_at_optimal=0.2642232 activation_time_constant=0.01
        deactivation_time_constant=0.04 default_activation=0.01 fiber_damping=0.01
        passive_fiber_strain_at_one_norm_force=0.7 tendon_strain_at_one_norm_force=0.049
      PathPoint P1: femur_r (0.0001752431 -0.007398762 0.0008201375)
      PathPoint P2: tibia_r (-0.001881469 -0.002619055 0.001987731)
      PathWrap: wrap_object=BF_at_gastroc_r method=hybrid
    DeGrooteFregly2016Muscle edl_r: max_isometric_force=603.4982 optimal_fiber_length=0.005480431
        tendon_slack_length=0.02917165 pennation_angle_at_optimal=0.2182582 activation_time_constant=0.01
        deactivation_time_constant=0.04 default_activation=0.01 fiber_damping=0.01
        passive_fiber_strain_at_one_norm_force=0.7 tendon_strain_at_one_norm_force=0.049
      PathPoint P1: tibia_r (-0.001000116 -0.007232091 0.001281399)
      PathPoint P2: tibia_r (0.001025119 -0.02350273 0.0007000814)
      PathPoint P3: calcn_r (0.00995784 0.003900786 8.668413e-5)
      PathPoint P4: calcn_r (0.01751019 0.0005959534 0.001408617)
      PathPoint P5: toes_r (3.250655e-5 0.0005092693 0.001657834)
      PathPoint P6: toes_r (0.004800134 -4.334207e-5 0.002708879)
    DeGrooteFregly2016Muscle ehl_r: max_isometric_force=285.8675 optimal_fiber_length=0.006072361
        tendon_slack_length=0.02652966 pennation_angle_at_optimal=0.1972681 activation_time_constant=0.01
        deactivation_time_constant=0.04 default_activation=0.01 fiber_damping=0.01
        passive_fiber_strain_at_one_norm_force=0.7 tendon_strain_at_one_norm_force=0.049
      PathPoint P1: tibia_r (-0.0008751017 -0.009688626 0.001181387)
      PathPoint P2: tibia_r (0.0004438016 -0.01818336 0.001025119)
      PathPoint P3: tibia_r (0.001250145 -0.02308393 -0.0001750203)
      PathPoint P4: calcn_r (0.01051045 0.004215016 -0.002286294)
      PathPoint P5: calcn_r (0.01401032 0.003348175 -0.002784728)
      PathPoint P6: calcn_r (0.01878879 0.001506137 -0.003033945)
      PathPoint P7: toes_r (0.003228984 0.0004442562 -0.002654702)
      PathPoint P8: toes_r (0.006100396 0.0003684076 -0.002015406)
    DeGrooteFregly2016Muscle fdl_r: max_isometric_force=423.177 optimal_fiber_length=0.003724307
        tendon_slack_length=0.03162929 pennation_angle_at_optimal=0.2248391 activation_time_constant=0.01
        deactivation_time_constant=0.04 default_activation=0.01 fiber_damping=0.01
        passive_fiber_strain_at_one_norm_force=0.7 tendon_strain_at_one_norm_force=0.049
      PathPoint P1: tibia_r (-0.0001437667 -0.01145133 -0.0001125131)
      PathPoint P2: tibia_r (-0.001100128 -0.0227839 -0.0007750901)
      PathPoint P3: calcn_r (0.004724285 0.003413188 -0.003033945)
      PathPoint P4: calcn_r (0.007671546 0.001907051 -0.002849741)
      PathPoint P5: calcn_r (0.01796529 -0.0008776768 0.00125692)
      PathPoint P6: toes_r (-0.0002058748 -0.0008451703 0.001592821)
      PathPoint P7: toes_r (0.003088122 -0.0007693217 0.002329636)
      PathPoint P8: toes_r (0.004778463 -0.000650131 0.002622195)
    DeGrooteFregly2016Muscle fhl_r: max_isometric_force=907.8393 optimal_fiber_length=0.004508287
        tendon_slack_length=0.03031243 pennation_angle_at_optimal=0.2580255 activation_time_constant=0.01
        deactivation_time_constant=0.04 default_activation=0.01 fiber_damping=0.01
        passive_fiber_strain_at_one_norm_force=0.7 tendon_strain_at_one_norm_force=0.049
      PathPoint P1: tibia_r (-0.001937725 -0.01352032 0.001250145)
      PathPoint P2: tibia_r (-0.001512676 -0.02294642 -0.0004750552)
      PathPoint P3: calcn_r (0.004052483 0.002990603 -0.002611359)
      PathPoint P4: calcn_r (0.01124727 0.0007368151 -0.002773892)
      PathPoint P5: calcn_r (0.0187021 -0.0005742824 -0.002914754)
      PathPoint P6: toes_r (0.001679505 -0.0006934731 -0.002871412)
      PathPoint P7: toes_r (0.00608956 -0.001105223 -0.001961228)
    DeGrooteFregly2016Muscle gaslat_r: max_isometric_force=1575.059 optimal_fiber_length=0.003681344
        tendon_slack_length=0.02354496 pennation_angle_at_optimal=0.2102268 activation_time_constant=0.01
        deactivation_time_constant=0.04 default_activation=0.01 fiber_damping=0.01
        passive_fiber_strain_at_one_norm_force=0.7 tendon_strain_at_one_norm_force=0.049
      PathPoint P1: femur_r (-0.0001051458 -0.01336754 0.0009708466)
      PathPoint P2: calcn_r (0.0004767627 0.00335901 -0.0005742824)
      PathWrap shank: wrap_object=GasLat_at_shank_r method=hybrid
      PathWrap condyles: wrap_object=Gastroc_at_condyles_r method=hybrid
    DeGrooteFregly2016Muscle gasmed_r: max_isometric_force=3115.515 optimal_fiber_length=0.003166127
        tendon_slack_length=0.02475267 pennation_angle_at_optimal=0.1656816 activation_time_constant=0.01
        deactivation_time_constant=0.04 default_activation=0.01 fiber_damping=0.01
        passive_fiber_strain_at_one_norm_force=0.7 tendon_strain_at_one_norm_force=0.049
      PathPoint P1: femur_r (0.0002803889 -0.01327641 -0.0007290111)
      PathPoint P2: calcn_r (0.0004767627 0.00335901 -0.0005742824)
      PathWrap shank: wrap_object=GasMed_at_shank_r method=hybrid
      PathWrap condyles: wrap_object=Gastroc_at_condyles_r method=hybrid
    DeGrooteFregly2016Muscle glmax1_r: max_isometric_force=983.7836 optimal_fiber_length=0.02995362
        tendon_slack_length=0.009952117 pennation_angle_at_optimal=0.3540118 activation_time_constant=0.01
        deactivation_time_constant=0.04 default_activation=0.01 fiber_damping=0.01
        passive_fiber_strain_at_one_norm_force=0.7 tendon_strain_at_one_norm_force=0.049
      PathPoint P1: pelvis (-0.03304155 0.009260225 0.01726794)
      PathPoint P2: pelvis (-0.03373943 -0.006495578 0.02389293)
      PathPoint P3: femur_r (-0.001556158 -0.001142585 0.001058468)
      PathPoint P4: femur_r (-0.0009708466 -0.001983751 0.001647285)
      PathWrap: wrap_object=Gmax1_at_pelvis_r method=hybrid
    DeGrooteFregly2016Muscle glmax2_r: max_isometric_force=1406.046 optimal_fiber_length=0.0302896
        tendon_slack_length=0.01309729 pennation_angle_at_optimal=0.3673821 activation_time_constant=0.01
        deactivation_time_constant=0.04 default_activation=0.01 fiber_damping=0.01
        passive_fiber_strain_at_one_norm_force=0.7 tendon_strain_at_one_norm_force=0.049
      PathPoint P1: pelvis (-0.0353499 0.002335187 0.01417014)
      PathPoint P2: pelvis (-0.03607461 -0.01634631 0.02493576)
      PathPoint P3: femur_r (-0.001577188 -0.002046839 0.000883225)
      PathPoint P4: femur_r (-0.0005467584 -0.003560939 0.001468537)
      PathWrap: wrap_object=Gmax2_at_pelvis_r method=hybrid
    DeGrooteFregly2016Muscle glmax3_r: max_isometric_force=947.7541 optimal_fiber_length=0.03763444
        tendon_slack_length=0.01571105 pennation_angle_at_optimal=0.3824161 activation_time_constant=0.01
        deactivation_time_constant=0.04 default_activation=0.01 fiber_damping=0.01
        passive_fiber_strain_at_one_norm_force=0.7 tendon_strain_at_one_norm_force=0.049
      PathPoint P1: pelvis (-0.0348936 -0.01409165 0.002760416)
      PathPoint P2: pelvis (-0.03416889 -0.03390047 0.01334201)
      PathPoint P3: femur_r (-0.000984866 -0.003942969 0.000329457)
      PathPoint P4: femur_r (-0.0002102917 -0.004973398 0.001440498)
      PathWrap: wrap_object=Gmax3_at_pelvis_r method=hybrid
    DeGrooteFregly2016Muscle glmed1_r: max_isometric_force=1093.467 optimal_fiber_length=0.01728643
        tendon_slack_length=0.01321745 pennation_angle_at_optimal=0.3165559 activation_time_constant=0.01
        deactivation_time_constant=0.04 default_activation=0.01 fiber_damping=0.01
        passive_fiber_strain_at_one_norm_force=0.7 tendon_strain_at_one_norm_force=0.049
      PathPoint P1: pelvis (-0.01194435 0.006576101 0.03594675)
      PathPoint P2: femur_r (-0.0007640598 -0.0004100688 0.001945198)
    DeGrooteFregly2016Muscle glmed2_r: max_isometric_force=765.0917 optimal_fiber_length=0.01605275
        tendon_slack_length=0.01434825 pennation_angle_at_optimal=0.3165559 activation_time_constant=0.01
        deactivation_time_constant=0.04 default_activation=0.01 fiber_damping=0.01
        passive_fiber_strain_at_one_norm_force=0.7 tendon_strain_at_one_norm_force=0.049
      PathPoint P1: pelvis (-0.02281505 0.008481829 0.02070312)
      PathPoint P2: femur_r (-0.0009042542 -0.000203282 0.001847062)
    DeGrooteFregly2016Muscle glmed3_r: max_isometric_force=871.1993 optimal_fiber_length=0.01552101
        tendon_slack_length=0.009617253 pennation_angle_at_optimal=0.3165559 activation_time_constant=0.01
        deactivation_time_constant=0.04 default_activation=0.01 fiber_damping=0.01
        passive_fiber_strain_at_one_norm_force=0.7 tendon_strain_at_one_norm_force=0.049
      PathPoint P1: pelvis (-0.0309211 -0.00195941 0.0161331)
      PathPoint P2: femur_r (-0.001083002 -0.0001647285 0.001815518)
    DeGrooteFregly2016Muscle glmin1_r: max_isometric_force=374.0459 optimal_fiber_length=0.0142289
        tendon_slack_length=0.003376806 pennation_angle_at_optimal=0.1745329 activation_time_constant=0.01
        deactivation_time_constant=0.04 default_activation=0.01 fiber_damping=0.01
        passive_fiber_strain_at_one_norm_force=0.7 tendon_strain_at_one_norm_force=0.049
      PathPoint P1: pelvis (-0.01245433 -0.003999343 0.03195948)
      PathPoint P2: femur_r (-0.00025235 -0.0003645056 0.001962722)
    DeGrooteFregly2016Muscle glmin2_r: max_isometric_force=394.8197 optimal_fiber_length=0.0106232
        tendon_slack_length=0.00495099 pennation_angle_at_optimal=0 activation_time_constant=0.01
        deactivation_time_constant=0.04 default_activation=0.01 fiber_damping=0.01
        passive_fiber_strain_at_one_norm_force=0.7 tendon_strain_at_one_norm_force=0.049
      PathPoint P1: pelvis (-0.0165342 -0.003811455 0.02978182)
      PathPoint P2: femur_r (-0.0003364667 -0.0003645056 0.001962722)
    DeGrooteFregly2016Muscle glmin3_r: max_isometric_force=446.7738 optimal_fiber_length=0.006526623
        tendon_slack_length=0.008737516 pennation_angle_at_optimal=0.01745329 activation_time_constant=0.01
        deactivation_time_constant=0.04 default_activation=0.01 fiber_damping=0.01
        passive_fiber_strain_at_one_norm_force=0.7 tendon_strain_at_one_norm_force=0.049
      PathPoint P1: pelvis (-0.02117773 -0.004160391 0.02447569)
      PathPoint P2: femur_r (-0.0004731563 -0.0002909035 0.001927674)
    DeGrooteFregly2016Muscle grac_r: max_isometric_force=281.3115 optimal_fiber_length=0.01071133
        tendon_slack_length=0.00808822 pennation_angle_at_optimal=0.1720016 activation_time_constant=0.01
        deactivation_time_constant=0.04 default_activation=0.01 fiber_damping=0.01
        passive_fiber_strain_at_one_norm_force=0.7 tendon_strain_at_one_norm_force=0.049
      PathPoint P1: pelvis (-0.01271201 -0.03471108 0.007532869)
      PathPoint P2: tibia_r (-0.001151384 -0.002972221 -0.00185084)
      PathPoint P3: tibia_r (0.0001112629 -0.004351756 -0.0009832393)
      PathWrap: wrap_object=GR_at_condyles_r method=hybrid
    DeGrooteFregly2016Muscle iliacus_r: max_isometric_force=1021.141 optimal_fiber_length=0.02187572
        tendon_slack_length=0.01972524 pennation_angle_at_optimal=0.279914 activation_time_constant=0.01
        deactivation_time_constant=0.04 default_activation=0.01 fiber_damping=0.01
        passive_fiber_strain_at_one_norm_force=0.7 tendon_strain_at_one_norm_force=0.049
      PathPoint P1: pelvis (-0.01623894 0.00829394 0.0258559)
      PathPoint P2: pelvis (-0.003623566 -0.01495057 0.02318749)
      PathPoint P3: femur_r (-8.061181e-5 -0.001980247 0.0004871757)
      PathPoint P4: femur_r (-0.0004275931 -0.002232597 0.0006869528)
      PathWrap: wrap_object=IL_at_brim_r method=hybrid range=(2 3)
    DeGrooteFregly2016Muscle perbrev_r: max_isometric_force=521.2016 optimal_fiber_length=0.003250438
        tendon_slack_length=0.01056231 pennation_angle_at_optimal=0.2052361 activation_time_constant=0.01
        deactivation_time_constant=0.04 default_activation=0.01 fiber_damping=0.01
        passive_fiber_strain_at_one_norm_force=0.7 tendon_strain_at_one_norm_force=0.049
      PathPoint P1: tibia_r (-0.001518927 -0.01582684 0.001568932)
      PathPoint P2: tibia_r (-0.002118996 -0.02433408 0.001556431)
      PathPoint P3: tibia_r (-0.001781457 -0.02502791 0.001593935)
      PathPoint P4: calcn_r (0.005103528 0.002925589 0.002524675)
      PathPoint P5: calcn_r (0.007335645 0.002372978 0.003716582)
    DeGrooteFregly2016Muscle perlong_r: max_isometric_force=1115.371 optimal_fiber_length=0.003857095
        tendon_slack_length=0.02522455 pennation_angle_at_optimal=0.2479525 activation_time_constant=0.01
        deactivation_time_constant=0.04 default_activation=0.01 fiber_damping=0.01
        passive_fiber_strain_at_one_norm_force=0.7 tendon_strain_at_one_norm_force=0.049
      PathPoint P1: tibia_r (-0.001250145 -0.008582248 0.001762705)
      PathPoint P2: tibia_r (-0.00198148 -0.02437783 0.001481422)
      PathPoint P3: tibia_r (-0.001700198 -0.02509042 0.001500174)
      PathPoint P4: calcn_r (0.004745956 0.002492169 0.002394649)
      PathPoint P5: calcn_r (0.007378987 0.001148565 0.003077287)
      PathPoint P6: calcn_r (0.00923186 0.0007476506 0.001278591)
      PathPoint P7: calcn_r (0.01303513 0.0009210189 -0.001993735)
    DeGrooteFregly2016Muscle piri_r: max_isometric_force=1029.787 optimal_fiber_length=0.006106613
        tendon_slack_length=0.026988 pennation_angle_at_optimal=0.1745329 activation_time_constant=0.01
        deactivation_time_constant=0.04 default_activation=0.01 fiber_damping=0.01
        passive_fiber_strain_at_one_norm_force=0.7 tendon_strain_at_one_norm_force=0.049
      PathPoint P1: pelvis (-0.02732706 -0.001752732 0.004143691)
      PathPoint P2: pelvis (-0.02738342 -0.008229521 0.01868495)
      PathPoint P3: femur_r (-0.0005187195 -0.000126175 0.001531624)
    DeGrooteFregly2016Muscle psoas_r: max_isometric_force=1426.79 optimal_fiber_length=0.02600971
        tendon_slack_length=0.0221479 pennation_angle_at_optimal=0.2155251 activation_time_constant=0.01
        deactivation_time_constant=0.04 default_activation=0.01 fiber_damping=0.01
        passive_fiber_strain_at_one_norm_force=0.7 tendon_strain_at_one_norm_force=0.049
      PathPoint P1: pelvis (-0.01626579 0.01664156 0.0119618)
      PathPoint P2: pelvis (-0.005502452 -0.01755416 0.02012037)
      PathPoint P3: femur_r (-0.0004626417 -0.00163677 0.0001612236)
      PathPoint P4: femur_r (-0.0008236424 -0.001836547 0.0003084278)
      PathWrap: wrap_object=PS_at_brim_r method=hybrid range=(2 3)
    DeGrooteFregly2016Muscle recfem_r: max_isometric_force=2191.741 optimal_fiber_length=0.004287835
        tendon_slack_length=0.02533684 pennation_angle_at_optimal=0.2170149 activation_time_constant=0.01
        deactivation_time_constant=0.04 default_activation=0.01 fiber_damping=0.01
        passive_fiber_strain_at_one_norm_force=0.7 tendon_strain_at_one_norm_force=0.049
      PathPoint P1: pelvis (-0.006441895 -0.0104144 0.02861631)
      PathPoint P2: patella_r (0.0003504861 0.001717382 2.453403e-5)
      PathPoint P3: patella_r (0.0004240882 0.001531624 -3.504861e-5)
      PathPoint P4: patella_r (0.0001752431 8.657007e-5 1.051458e-6)
      PathPoint P5: tibia_r (0.002037737 -0.003945459 -2.937842e-5)
      PathWrap: wrap_object=KnExt_at_fem_r method=hybrid
    DeGrooteFregly2016Muscle sart_r: max_isometric_force=249.4131 optimal_fiber_length=0.0275645
        tendon_slack_length=0.008481374 pennation_angle_at_optimal=0.02613542 activation_time_constant=0.01
        deactivation_time_constant=0.04 default_activation=0.01 fiber_damping=0.01
        passive_fiber_strain_at_one_norm_force=0.7 tendon_strain_at_one_norm_force=0.049
      PathPoint P1: pelvis (-0.00523404 -0.004187232 0.03238888)
      PathPoint P2: femur_r (-0.0001051458 -0.01250534 -0.001475547)
      PathPoint P3: tibia_r (-0.001568932 -0.002506541 -0.002281515)
      PathPoint P4: tibia_r (-0.0009938656 -0.003744185 -0.001650192)
      PathPoint P5: tibia_r (0.0008500988 -0.005063089 -0.0001625189)
    DeGrooteFregly2016Muscle semimem_r: max_isometric_force=2200.987 optimal_fiber_length=0.001548237
        tendon_slack_length=0.007799207 pennation_angle_at_optimal=0.2545615 activation_time_constant=0.01
        deactivation_time_constant=0.04 default_activation=0.01 fiber_damping=0.01
        passive_fiber_strain_at_one_norm_force=0.7 tendon_strain_at_one_norm_force=0.049
      PathPoint P1: pelvis (-0.02649229 -0.030599 0.01883217)
      PathPoint P2: tibia_r (-0.001812711 -0.002606553 -0.001225142)
      PathWrap: wrap_object=SM_at_condyles_r method=hybrid
    DeGrooteFregly2016Muscle semiten_r: max_isometric_force=591.2951 optimal_fiber_length=0.006127006
        tendon_slack_length=0.007847614 pennation_angle_at_optimal=0.241295 activation_time_constant=0.01
        deactivation_time_constant=0.04 default_activation=0.01 fiber_damping=0.01
        passive_fiber_strain_at_one_norm_force=0.7 tendon_strain_at_one_norm_force=0.049
      PathPoint P1: pelvis (-0.0278612 -0.03363206 0.01579571)
      PathPoint P2: tibia_r (-0.001950227 -0.003175369 -0.001431416)
      PathPoint P3: tibia_r (0.0001187638 -0.004831812 -0.000731335)
      PathWrap: wrap_object=ST_at_condyles_r method=hybrid
    DeGrooteFregly2016Muscle soleus_r: max_isometric_force=6194.843 optimal_fiber_length=0.002849938
        tendon_slack_length=0.01792584 pennation_angle_at_optimal=0.3814289 activation_time_constant=0.01
        deactivation_time_constant=0.04 default_activation=0.01 fiber_damping=0.01
        passive_fiber_strain_at_one_norm_force=0.7 tendon_strain_at_one_norm_force=0.049
      PathPoint P1: tibia_r (-0.0004750552 -0.005725666 0.0006125712)
      PathPoint P2: calcn_r (0.0004767627 0.00335901 -0.0005742824)
    DeGrooteFregly2016Muscle tfl_r: max_isometric_force=411.2066 optimal_fiber_length=0.007817797
        tendon_slack_length=0.03699028 pennation_angle_at_optimal=0.05235988 activation_time_constant=0.01
        deactivation_time_constant=0.04 default_activation=0.01 fiber_damping=0.01
        passive_fiber_strain_at_one_norm_force=0.7 tendon_strain_at_one_norm_force=0.049
      PathPoint P1: pelvis (-0.008347623 0.005744023 0.03806307)
      PathPoint P2: femur_r (0.001030429 -0.003487337 0.002092402)
      PathPoint P3: femur_r (0.0003750202 -0.01419469 0.001135575)
      PathPoint P4: tibia_r (0.0006750785 -0.002562798 0.002162751)
    DeGrooteFregly2016Muscle tibant_r: max_isometric_force=1227.452 optimal_fiber_length=0.004838345
        tendon_slack_length=0.01703416 pennation_angle_at_optimal=0.1951828 activation_time_constant=0.01
        deactivation_time_constant=0.04 default_activation=0.01 fiber_damping=0.01
        passive_fiber_strain_at_one_norm_force=0.7 tendon_strain_at_one_norm_force=0.049
      PathPoint P1: tibia_r (0.0009626119 -0.008200953 0.001012618)
      PathPoint P2: tibia_r (0.001568932 -0.01191389 0.000800093)
      PathPoint P3: tibia_r (0.001456419 -0.02287141 -0.0008250959)
      PathPoint P4: calcn_r (0.01263421 0.001928722 -0.003304833)
    DeGrooteFregly2016Muscle tibpost_r: max_isometric_force=1730.154 optimal_fiber_length=0.002611237
        tendon_slack_length=0.01939635 pennation_angle_at_optimal=0.2264891 activation_time_constant=0.01
        deactivation_time_constant=0.04 default_activation=0.01 fiber_damping=0.01
        passive_fiber_strain_at_one_norm_force=0.7 tendon_strain_at_one_norm_force=0.049
      PathPoint P1: tibia_r (-0.0002562798 -0.008150948 0.0006438249)
      PathPoint P2: tibia_r (-0.001025119 -0.02284641 -0.001093877)
      PathPoint P3: calcn_r (0.00451841 0.003619063 -0.003098958)
      PathPoint P4: calcn_r (0.008365019 0.001722847 -0.00304478)
    DeGrooteFregly2016Muscle vasint_r: max_isometric_force=1697.361 optimal_fiber_length=0.003979747
        tendon_slack_length=0.008104203 pennation_angle_at_optimal=0.06309973 activation_time_constant=0.01
        deactivation_time_constant=0.04 default_activation=0.01 fiber_damping=0.01
        passive_fiber_strain_at_one_norm_force=0.7 tendon_strain_at_one_norm_force=0.049
      PathPoint P1: femur_r (0.00101641 -0.006743353 0.001086507)
      PathPoint P2: femur_r (0.001174129 -0.007304131 0.0009988855)
      PathPoint P3: patella_r (0.000203282 0.001682333 -2.102917e-5)
      PathPoint P4: patella_r (0.0001752431 8.657007e-5 -1.366896e-5)
      PathPoint P5: tibia_r (0.002035862 -0.003950459 2.687813e-5)
      PathWrap: wrap_object=KnExt_at_fem_r method=hybrid
    DeGrooteFregly2016Muscle vaslat_r: max_isometric_force=5148.767 optimal_fiber_length=0.003960354
        tendon_slack_length=0.008789328 pennation_angle_at_optimal=0.2528673 activation_time_constant=0.01
        deactivation_time_constant=0.04 default_activation=0.01 fiber_damping=0.01
        passive_fiber_strain_at_one_norm_force=0.7 tendon_strain_at_one_norm_force=0.049
      PathPoint P1: femur_r (0.0001682333 -0.006498013 0.001223197)
      PathPoint P2: femur_r (0.0009428077 -0.009081095 0.001433488)
      PathPoint P3: patella_r (0.0003610007 0.001482556 0.0004941854)
      PathPoint P4: patella_r (0.0001752431 8.657007e-5 0.0002569063)
      PathPoint P5: tibia_r (0.002033986 -0.003961711 0.0003194121)
      PathWrap: wrap_object=KnExt_at_fem_r method=hybrid
    DeGrooteFregly2016Muscle vasmed_r: max_isometric_force=2747.823 optimal_fiber_length=0.003900698
        tendon_slack_length=0.008055436 pennation_angle_at_optimal=0.4222225 activation_time_constant=0.01
        deactivation_time_constant=0.04 default_activation=0.01 fiber_damping=0.01
        passive_fiber_strain_at_one_norm_force=0.7 tendon_strain_at_one_norm_force=0.049
      PathPoint P1: femur_r (0.0004906806 -0.007356704 0.0006589139)
      PathPoint P2: femur_r (0.001247731 -0.009704961 3.154375e-5)
      PathPoint P3: patella_r (0.0002208063 0.001559663 -0.0005958264)
      PathPoint P4: patella_r (0.0001752431 8.657007e-5 -0.0002979132)
      PathPoint P5: tibia_r (0.001993982 -0.003973587 -0.0004237993)
      PathWrap: wrap_object=KnExt_at_fem_r method=hybrid
    DeGrooteFregly2016Muscle addbrev_l: max_isometric_force=625.8197 optimal_fiber_length=0.019718
        tendon_slack_length=0.006779911 pennation_angle_at_optimal=0.1147809 activation_time_constant=0.01
        deactivation_time_constant=0.04 default_activation=0.01 fiber_damping=0.01
        passive_fiber_strain_at_one_norm_force=0.7 tendon_strain_at_one_norm_force=0.049
      PathPoint P1: pelvis (-0.005126675 -0.02523076 -0.004723378)
      PathPoint P2: femur_l (-0.0001585131 -0.009352274 -0.001973488)
      PathWrap: wrap_object=AB_at_femshaft_l method=hybrid
    DeGrooteFregly2016Muscle addlong_l: max_isometric_force=916.8 optimal_fiber_length=0.01345817
        tendon_slack_length=0.01639352 pennation_angle_at_optimal=0.1377704 activation_time_constant=0.01
        deactivation_time_constant=0.04 default_activation=0.01 fiber_damping=0.01
        passive_fiber_strain_at_one_norm_force=0.7 tendon_strain_at_one_norm_force=0.049
      PathPoint P1: pelvis (-0.002034565 -0.02386185 -0.005790739)
      PathPoint P2: femur_l (0.0008924288 -0.01897164 -0.001254631)
      PathWrap: wrap_object=AL_at_femshaft_l method=hybrid
    DeGrooteFregly2016Muscle addmagDist_l: max_isometric_force=597.2951 optimal_fiber_length=0.01309286
        tendon_slack_length=0.00645634 pennation_angle_at_optimal=0.194705 activation_time_constant=0.01
        deactivation_time_constant=0.04 default_activation=0.01 fiber_damping=0.01
        passive_fiber_strain_at_one_norm_force=0.7 tendon_strain_at_one_norm_force=0.049
      PathPoint P1: pelvis (-0.01987325 -0.0342682 -0.01221331)
      PathPoint P2: femur_l (0.0008916363 -0.02080485 -0.001529652)
      PathWrap: wrap_object=AMdist_at_femshaft_l method=hybrid
    DeGrooteFregly2016Muscle addmagIsch_l: max_isometric_force=597.2951 optimal_fiber_length=0.008595058
        tendon_slack_length=0.01190449 pennation_angle_at_optimal=0.1680443 activation_time_constant=0.01
        deactivation_time_constant=0.04 default_activation=0.01 fiber_damping=0.01
        passive_fiber_strain_at_one_norm_force=0.7 tendon_strain_at_one_norm_force=0.049
      PathPoint P1: pelvis (-0.02405511 -0.03482918 -0.01279299)
      PathPoint P2: femur_l (0.000381224 -0.03074917 0.002594067)
      PathWrap: wrap_object=AMisch_at_condyles_l method=hybrid
    DeGrooteFregly2016Muscle addmagMid_l: max_isometric_force=597.2951 optimal_fiber_length=0.01974856
        tendon_slack_length=0.006687218 pennation_angle_at_optimal=0.2073076 activation_time_constant=0.01
        deactivation_time_constant=0.04 default_activation=0.01 fiber_damping=0.01
        passive_fiber_strain_at_one_norm_force=0.7 tendon_strain_at_one_norm_force=0.049
      PathPoint P1: pelvis (-0.01413459 -0.03241079 -0.008753586)
      PathPoint P2: femur_l (0.0001918009 -0.01287127 -0.002315877)
      PathWrap: wrap_object=AMmid_at_femshaft_l method=hybrid
    DeGrooteFregly2016Muscle addmagProx_l: max_isometric_force=597.2951 optimal_fiber_length=0.02334701
        tendon_slack_length=0.008915221 pennation_angle_at_optimal=0.3114833 activation_time_constant=0.01
        deactivation_time_constant=0.04 default_activation=0.01 fiber_damping=0.01
        passive_fiber_strain_at_one_norm_force=0.7 tendon_strain_at_one_norm_force=0.049
      PathPoint P1: pelvis (-0.008315413 -0.02886774 -0.004186631)
      PathPoint P2: femur_l (-0.001210248 -0.006250172 -0.002537795)
      PathWrap: wrap_object=AMprox_at_femshaft_l method=hybrid
    DeGrooteFregly2016Muscle bflh_l: max_isometric_force=1313.184 optimal_fiber_length=0.005856848
        tendon_slack_length=0.01951642 pennation_angle_at_optimal=0.1759182 activation_time_constant=0.01
        deactivation_time_constant=0.04 default_activation=0.01 fiber_damping=0.01
        passive_fiber_strain_at_one_norm_force=0.7 tendon_strain_at_one_norm_force=0.049
      PathPoint P1: pelvis (-0.02791488 -0.03196791 -0.01797338)
      PathPoint P2: tibia_l (-0.002353586 -0.002444377 -0.001766935)
      PathPoint P3: tibia_l (-0.002004389 -0.00317769 -0.002116132)
    DeGrooteFregly2016Muscle bfsh_l: max_isometric_force=557.1148 optimal_fiber_length=0.008584585
        tendon_slack_length=0.008235693 pennation_angle_at_optimal=0.2642232 activation_time_constant=0.01
        deactivation_time_constant=0.04 default_activation=0.01 fiber_damping=0.01
        passive_fiber_strain_at_one_norm_force=0.7 tendon_strain_at_one_norm_force=0.049
      PathPoint P1: femur_l (0.0003962828 -0.01673106 -0.001854603)
      PathPoint P2: tibia_l (-0.002102164 -0.002926268 -0.002220891)
      PathWrap: wrap_object=BF_at_gastroc_l method=hybrid
    DeGrooteFregly2016Muscle edl_l: max_isometric_force=603.4982 optimal_fiber_length=0.005797628
        tendon_slack_length=0.03086005 pennation_angle_at_optimal=0.2182582 activation_time_constant=0.01
        deactivation_time_constant=0.04 default_activation=0.01 fiber_damping=0.01
        passive_fiber_strain_at_one_norm_force=0.7 tendon_strain_at_one_norm_force=0.049
      PathPoint P1: tibia_l (-0.001117429 -0.008080411 -0.001431706)
      PathPoint P2: tibia_l (0.001145365 -0.02625959 -0.0007822005)
      PathPoint P3: calcn_l (0.00995784 0.003900786 -8.668413e-5)
      PathPoint P4: calcn_l (0.01751019 0.0005959534 -0.001408617)
      PathPoint P5: toes_l (3.250655e-5 0.0005092693 -0.001657834)
      PathPoint P6: toes_l (0.004800134 -4.334207e-5 -0.002708879)
    DeGrooteFregly2016Muscle ehl_l: max_isometric_force=285.8675 optimal_fiber_length=0.006387122
        tendon_slack_length=0.02790483 pennation_angle_at_optimal=0.1972681 activation_time_constant=0.01
        deactivation_time_constant=0.04 default_activation=0.01 fiber_damping=0.01
        passive_fiber_strain_at_one_norm_force=0.7 tendon_strain_at_one_norm_force=0.049
      PathPoint P1: tibia_l (-0.0009777507 -0.0108251 -0.001319963)
      PathPoint P2: tibia_l (0.0004958593 -0.02031626 -0.001145365)
      PathPoint P3: tibia_l (0.001396787 -0.02579167 0.0001955501)
      PathPoint P4: calcn_l (0.01051045 0.004215016 0.002286294)
      PathPoint P5: calcn_l (0.01401032 0.003348175 0.002784728)
      PathPoint P6: calcn_l (0.01878879 0.001506137 0.003033945)
      PathPoint P7: toes_l (0.003228984 0.0004442562 0.002654702)
      PathPoint P8: toes_l (0.006100396 0.0003684076 0.002015406)
    DeGrooteFregly2016Muscle fdl_l: max_isometric_force=423.177 optimal_fiber_length=0.003900065
        tendon_slack_length=0.03312194 pennation_angle_at_optimal=0.2248391 activation_time_constant=0.01
        deactivation_time_constant=0.04 default_activation=0.01 fiber_damping=0.01
        passive_fiber_strain_at_one_norm_force=0.7 tendon_strain_at_one_norm_force=0.049
      PathPoint P1: tibia_l (-0.0001606305 -0.01279457 0.0001257108)
      PathPoint P2: tibia_l (-0.001229172 -0.02545644 0.0008660077)
      PathPoint P3: calcn_l (0.004724285 0.003413188 0.003033945)
      PathPoint P4: calcn_l (0.007671546 0.001907051 0.002849741)
      PathPoint P5: calcn_l (0.01796529 -0.0008776768 -0.00125692)
      PathPoint P6: toes_l (-0.0002058748 -0.0008451703 -0.001592821)
      PathPoint P7: toes_l (0.003088122 -0.0007693217 -0.002329636)
      PathPoint P8: toes_l (0.004778463 -0.000650131 -0.002622195)
    DeGrooteFregly2016Muscle fhl_l: max_isometric_force=907.8393 optimal_fiber_length=0.004698803
        tendon_slack_length=0.0315934 pennation_angle_at_optimal=0.2580255 activation_time_constant=0.01
        deactivation_time_constant=0.04 default_activation=0.01 fiber_damping=0.01
        passive_fiber_strain_at_one_norm_force=0.7 tendon_strain_at_one_norm_force=0.049
      PathPoint P1: tibia_l (-0.002165019 -0.01510625 -0.001396787)
      PathPoint P2: tibia_l (-0.001690112 -0.02563802 0.0005307789)
      PathPoint P3: calcn_l (0.004052483 0.002990603 0.002611359)
      PathPoint P4: calcn_l (0.01124727 0.0007368151 0.002773892)
      PathPoint P5: calcn_l (0.0187021 -0.0005742824 0.002914754)
      PathPoint P6: toes_l (0.001679505 -0.0006934731 0.002871412)
      PathPoint P7: toes_l (0.00608956 -0.001105223 0.001961228)
    DeGrooteFregly2016Muscle gaslat_l: max_isometric_force=1575.059 optimal_fiber_length=0.004177903
        tendon_slack_length=0.02672083 pennation_angle_at_optimal=0.2102268 activation_time_constant=0.01
        deactivation_time_constant=0.04 default_activation=0.01 fiber_damping=0.01
        passive_fiber_strain_at_one_norm_force=0.7 tendon_strain_at_one_norm_force=0.049
      PathPoint P1: femur_l (-0.0002377697 -0.03022845 -0.002195407)
      PathPoint P2: calcn_l (0.0004767627 0.00335901 0.0005742824)
      PathWrap shank: wrap_object=GasLat_at_shank_l method=hybrid
      PathWrap condyles: wrap_object=Gastroc_at_condyles_l method=hybrid
    DeGrooteFregly2016Muscle gasmed_l: max_isometric_force=3115.515 optimal_fiber_length=0.00363115
        tendon_slack_length=0.02838821 pennation_angle_at_optimal=0.1656816 activation_time_constant=0.01
        deactivation_time_constant=0.04 default_activation=0.01 fiber_damping=0.01
        passive_fiber_strain_at_one_norm_force=0.7 tendon_strain_at_one_norm_force=0.049
      PathPoint P1: femur_l (0.0006340525 -0.03002238 0.001648536)
      PathPoint P2: calcn_l (0.0004767627 0.00335901 0.0005742824)
      PathWrap shank: wrap_object=GasMed_at_shank_l method=hybrid
      PathWrap condyles: wrap_object=Gastroc_at_condyles_l method=hybrid
    DeGrooteFregly2016Muscle glmax1_l: max_isometric_force=983.7836 optimal_fiber_length=0.03115083
        tendon_slack_length=0.01034989 pennation_angle_at_optimal=0.3540118 activation_time_constant=0.01
        deactivation_time_constant=0.04 default_activation=0.01 fiber_damping=0.01
        passive_fiber_strain_at_one_norm_force=0.7 tendon_strain_at_one_norm_force=0.049
      PathPoint P1: pelvis (-0.03304155 0.009260225 -0.01726794)
      PathPoint P2: pelvis (-0.03373943 -0.006495578 -0.02389293)
      PathPoint P3: femur_l (-0.003518991 -0.002583764 -0.002393548)
      PathPoint P4: femur_l (-0.002195407 -0.004485921 -0.003725058)
      PathWrap: wrap_object=Gmax1_at_pelvis_l method=hybrid
    DeGrooteFregly2016Muscle glmax2_l: max_isometric_force=1406.046 optimal_fiber_length=0.03144226
        tendon_slack_length=0.0135957 pennation_angle_at_optimal=0.3673821 activation_time_constant=0.01
        deactivation_time_constant=0.04 default_activation=0.01 fiber_damping=0.01
        passive_fiber_strain_at_one_norm_force=0.7 tendon_strain_at_one_norm_force=0.049
      PathPoint P1: pelvis (-0.0353499 0.002335187 -0.01417014)
      PathPoint P2: pelvis (-0.03607461 -0.01634631 -0.02493576)
      PathPoint P3: femur_l (-0.003566545 -0.004628583 -0.001997265)
      PathPoint P4: femur_l (-0.001236402 -0.008052466 -0.00332085)
      PathWrap: wrap_object=Gmax2_at_pelvis_l method=hybrid
    DeGrooteFregly2016Muscle glmax3_l: max_isometric_force=947.7541 optimal_fiber_length=0.03708225
        tendon_slack_length=0.01548053 pennation_angle_at_optimal=0.3824161 activation_time_constant=0.01
        deactivation_time_constant=0.04 default_activation=0.01 fiber_damping=0.01
        passive_fiber_strain_at_one_norm_force=0.7 tendon_strain_at_one_norm_force=0.049
      PathPoint P1: pelvis (-0.0348936 -0.01409165 -0.002760416)
      PathPoint P2: pelvis (-0.03416889 -0.03390047 -0.01334201)
      PathPoint P3: femur_l (-0.002227109 -0.008916363 -0.0007450116)
      PathPoint P4: femur_l (-0.0004755393 -0.01124651 -0.003257445)
      PathWrap: wrap_object=Gmax3_at_pelvis_l method=hybrid
    DeGrooteFregly2016Muscle glmed1_l: max_isometric_force=1093.467 optimal_fiber_length=0.01736363
        tendon_slack_length=0.01327648 pennation_angle_at_optimal=0.3165559 activation_time_constant=0.01
        deactivation_time_constant=0.04 default_activation=0.01 fiber_damping=0.01
        passive_fiber_strain_at_one_norm_force=0.7 tendon_strain_at_one_norm_force=0.049
      PathPoint P1: pelvis (-0.01194435 0.006576101 -0.03594675)
      PathPoint P2: femur_l (-0.001727793 -0.0009273017 -0.004398739)
    DeGrooteFregly2016Muscle glmed2_l: max_isometric_force=765.0917 optimal_fiber_length=0.01652699
        tendon_slack_length=0.01477214 pennation_angle_at_optimal=0.3165559 activation_time_constant=0.01
        deactivation_time_constant=0.04 default_activation=0.01 fiber_damping=0.01
        passive_fiber_strain_at_one_norm_force=0.7 tendon_strain_at_one_norm_force=0.049
      PathPoint P1: pelvis (-0.02281505 0.008481829 -0.02070312)
      PathPoint P2: femur_l (-0.002044819 -0.000459688 -0.004176821)
    DeGrooteFregly2016Muscle glmed3_l: max_isometric_force=871.1993 optimal_fiber_length=0.01606767
        tendon_slack_length=0.009955976 pennation_angle_at_optimal=0.3165559 activation_time_constant=0.01
        deactivation_time_constant=0.04 default_activation=0.01 fiber_damping=0.01
        passive_fiber_strain_at_one_norm_force=0.7 tendon_strain_at_one_norm_force=0.049
      PathPoint P1: pelvis (-0.0309211 -0.00195941 -0.0161331)
      PathPoint P2: femur_l (-0.002449028 -0.0003725058 -0.00410549)
    DeGrooteFregly2016Muscle glmin1_l: max_isometric_force=374.0459 optimal_fiber_length=0.0142829
        tendon_slack_length=0.003389621 pennation_angle_at_optimal=0.1745329 activation_time_constant=0.01
        deactivation_time_constant=0.04 default_activation=0.01 fiber_damping=0.01
        passive_fiber_strain_at_one_norm_force=0.7 tendon_strain_at_one_norm_force=0.049
      PathPoint P1: pelvis (-0.01245433 -0.003999343 -0.03195948)
      PathPoint P2: femur_l (-0.0005706472 -0.0008242682 -0.004438367)
    DeGrooteFregly2016Muscle glmin2_l: max_isometric_force=394.8197 optimal_fiber_length=0.0108913
        tendon_slack_length=0.005075938 pennation_angle_at_optimal=0 activation_time_constant=0.01
        deactivation_time_constant=0.04 default_activation=0.01 fiber_damping=0.01
        passive_fiber_strain_at_one_norm_force=0.7 tendon_strain_at_one_norm_force=0.049
      PathPoint P1: pelvis (-0.0165342 -0.003811455 -0.02978182)
      PathPoint P2: femur_l (-0.000760863 -0.0008242682 -0.004438367)
    DeGrooteFregly2016Muscle glmin3_l: max_isometric_force=446.7738 optimal_fiber_length=0.006979554
        tendon_slack_length=0.009343878 pennation_angle_at_optimal=0.01745329 activation_time_constant=0.01
        deactivation_time_constant=0.04 default_activation=0.01 fiber_damping=0.01
        passive_fiber_strain_at_one_norm_force=0.7 tendon_strain_at_one_norm_force=0.049
      PathPoint P1: pelvis (-0.02117773 -0.004160391 -0.02447569)
      PathPoint P2: femur_l (-0.001069964 -0.0006578294 -0.004359111)
    DeGrooteFregly2016Muscle grac_l: max_isometric_force=281.3115 optimal_fiber_length=0.01494316
        tendon_slack_length=0.01128371 pennation_angle_at_optimal=0.1720016 activation_time_constant=0.01
        deactivation_time_constant=0.04 default_activation=0.01 fiber_damping=0.01
        passive_fiber_strain_at_one_norm_force=0.7 tendon_strain_at_one_norm_force=0.049
      PathPoint P1: pelvis (-0.01271201 -0.03471108 -0.007532869)
      PathPoint P2: tibia_l (-0.001286441 -0.00332086 0.002067943)
      PathPoint P3: tibia_l (0.000124314 -0.004862214 0.001098573)
      PathWrap: wrap_object=GR_at_condyles_l method=hybrid
    DeGrooteFregly2016Muscle iliacus_l: max_isometric_force=1021.141 optimal_fiber_length=0.02272765
        tendon_slack_length=0.02049341 pennation_angle_at_optimal=0.279914 activation_time_constant=0.01
        deactivation_time_constant=0.04 default_activation=0.01 fiber_damping=0.01
        passive_fiber_strain_at_one_norm_force=0.7 tendon_strain_at_one_norm_force=0.049
      PathPoint P1: pelvis (-0.01623894 0.00829394 -0.0258559)
      PathPoint P2: pelvis (-0.003623566 -0.01495057 -0.02318749)
      PathPoint P3: femur_l (-0.0001822901 -0.004477996 -0.001101666)
      PathPoint P4: femur_l (-0.00096693 -0.005048643 -0.001553429)
      PathWrap: wrap_object=IL_at_brim_l method=hybrid range=(2 3)
    DeGrooteFregly2016Muscle perbrev_l: max_isometric_force=521.2016 optimal_fiber_length=0.003508718
        tendon_slack_length=0.0114016 pennation_angle_at_optimal=0.2052361 activation_time_constant=0.01
        deactivation_time_constant=0.04 default_activation=0.01 fiber_damping=0.01
        passive_fiber_strain_at_one_norm_force=0.7 tendon_strain_at_one_norm_force=0.049
      PathPoint P1: tibia_l (-0.001697096 -0.01768332 -0.001752967)
      PathPoint P2: tibia_l (-0.002367553 -0.02718845 -0.001738999)
      PathPoint P3: tibia_l (-0.001990421 -0.02796367 -0.001780903)
      PathPoint P4: calcn_l (0.005103528 0.002925589 -0.002524675)
      PathPoint P5: calcn_l (0.007335645 0.002372978 -0.003716582)
    DeGrooteFregly2016Muscle perlong_l: max_isometric_force=1115.371 optimal_fiber_length=0.004115753
        tendon_slack_length=0.02691611 pennation_angle_at_optimal=0.2479525 activation_time_constant=0.01
        deactivation_time_constant=0.04 default_activation=0.01 fiber_damping=0.01
        passive_fiber_strain_at_one_norm_force=0.7 tendon_strain_at_one_norm_force=0.049
      PathPoint P1: tibia_l (-0.001396787 -0.009588941 -0.001969469)
      PathPoint P2: tibia_l (-0.002213907 -0.02723734 -0.001655192)
      PathPoint P3: tibia_l (-0.00189963 -0.02803351 -0.001676144)
      PathPoint P4: calcn_l (0.004745956 0.002492169 -0.002394649)
      PathPoint P5: calcn_l (0.007378987 0.001148565 -0.003077287)
      PathPoint P6: calcn_l (0.00923186 0.0007476506 -0.001278591)
      PathPoint P7: calcn_l (0.01303513 0.0009210189 0.001993735)
    DeGrooteFregly2016Muscle piri_l: max_isometric_force=1029.787 optimal_fiber_length=0.006294538
        tendon_slack_length=0.02781853 pennation_angle_at_optimal=0.1745329 activation_time_constant=0.01
        deactivation_time_constant=0.04 default_activation=0.01 fiber_damping=0.01
        passive_fiber_strain_at_one_norm_force=0.7 tendon_strain_at_one_norm_force=0.049
      PathPoint P1: pelvis (-0.02732706 -0.001752732 -0.004143691)
      PathPoint P2: pelvis (-0.02738342 -0.008229521 -0.01868495)
      PathPoint P3: femur_l (-0.001172997 -0.0002853236 -0.003463512)
    DeGrooteFregly2016Muscle psoas_l: max_isometric_force=1426.79 optimal_fiber_length=0.02677246
        tendon_slack_length=0.0227974 pennation_angle_at_optimal=0.2155251 activation_time_constant=0.01
        deactivation_time_constant=0.04 default_activation=0.01 fiber_damping=0.01
        passive_fiber_strain_at_one_norm_force=0.7 tendon_strain_at_one_norm_force=0.049
      PathPoint P1: pelvis (-0.01626579 0.01664156 -0.0119618)
      PathPoint P2: pelvis (-0.005502452 -0.01755416 -0.02012037)
      PathPoint P3: femur_l (-0.001046187 -0.003701281 -0.0003645802)
      PathPoint P4: femur_l (-0.001862529 -0.004153044 -0.0006974577)
      PathWrap: wrap_object=PS_at_brim_l method=hybrid range=(2 3)
    DeGrooteFregly2016Muscle recfem_l: max_isometric_force=2191.741 optimal_fiber_length=0.006924131
        tendon_slack_length=0.04091473 pennation_angle_at_optimal=0.2170149 activation_time_constant=0.01
        deactivation_time_constant=0.04 default_activation=0.01 fiber_damping=0.01
        passive_fiber_strain_at_one_norm_force=0.7 tendon_strain_at_one_norm_force=0.049
      PathPoint P1: pelvis (-0.006441895 -0.0104144 -0.02861631)
      PathPoint P2: patella_l (0.0007925656 0.003883571 -5.547959e-5)
      PathPoint P3: patella_l (0.0009590044 0.003463512 7.925656e-5)
      PathPoint P4: patella_l (0.0003962828 0.0001957637 -2.377697e-6)
      PathPoint P5: tibia_l (0.002276762 -0.004408259 3.282449e-5)
      PathWrap: wrap_object=KnExt_at_fem_l method=hybrid
    DeGrooteFregly2016Muscle sart_l: max_isometric_force=249.4131 optimal_fiber_length=0.04002242
        tendon_slack_length=0.01231457 pennation_angle_at_optimal=0.02613542 activation_time_constant=0.01
        deactivation_time_constant=0.04 default_activation=0.01 fiber_damping=0.01
        passive_fiber_strain_at_one_norm_force=0.7 tendon_strain_at_one_norm_force=0.049
      PathPoint P1: pelvis (-0.00523404 -0.004187232 -0.03238888)
      PathPoint P2: femur_l (-0.0002377697 -0.02827874 0.003336701)
      PathPoint P3: tibia_l (-0.001752967 -0.002800557 0.002549136)
      PathPoint P4: tibia_l (-0.001110445 -0.004183376 0.001843758)
      PathPoint P5: tibia_l (0.0009498149 -0.005656986 0.0001815823)
    DeGrooteFregly2016Muscle semimem_l: max_isometric_force=2200.987 optimal_fiber_length=0.004037376
        tendon_slack_length=0.02033819 pennation_angle_at_optimal=0.2545615 activation_time_constant=0.01
        deactivation_time_constant=0.04 default_activation=0.01 fiber_damping=0.01
        passive_fiber_strain_at_one_norm_force=0.7 tendon_strain_at_one_norm_force=0.049
      PathPoint P1: pelvis (-0.02649229 -0.030599 -0.01883217)
      PathPoint P2: tibia_l (-0.002025341 -0.0029123 0.001368851)
      PathWrap: wrap_object=SM_at_condyles_l method=hybrid
    DeGrooteFregly2016Muscle semiten_l: max_isometric_force=591.2951 optimal_fiber_length=0.01109091
        tendon_slack_length=0.0142055 pennation_angle_at_optimal=0.241295 activation_time_constant=0.01
        deactivation_time_constant=0.04 default_activation=0.01 fiber_damping=0.01
        passive_fiber_strain_at_one_norm_force=0.7 tendon_strain_at_one_norm_force=0.049
      PathPoint P1: pelvis (-0.0278612 -0.03363206 -0.01579571)
      PathPoint P2: tibia_l (-0.002178987 -0.003547838 0.001599321)
      PathPoint P3: tibia_l (0.0001326947 -0.005398581 0.0008171202)
      PathWrap: wrap_object=ST_at_condyles_l method=hybrid
    DeGrooteFregly2016Muscle soleus_l: max_isometric_force=6194.843 optimal_fiber_length=0.003154435
        tendon_slack_length=0.0198411 pennation_angle_at_optimal=0.3814289 activation_time_constant=0.01
        deactivation_time_constant=0.04 default_activation=0.01 fiber_damping=0.01
        passive_fiber_strain_at_one_norm_force=0.7 tendon_strain_at_one_norm_force=0.049
      PathPoint P1: tibia_l (-0.0005307789 -0.006397283 -0.0006844255)
      PathPoint P2: calcn_l (0.0004767627 0.00335901 0.0005742824)
    DeGrooteFregly2016Muscle tfl_l: max_isometric_force=411.2066 optimal_fiber_length=0.01079258
        tendon_slack_length=0.05106562 pennation_angle_at_optimal=0.05235988 activation_time_constant=0.01
        deactivation_time_constant=0.04 default_activation=0.01 fiber_damping=0.01
        passive_fiber_strain_at_one_norm_force=0.7 tendon_strain_at_one_norm_force=0.049
      PathPoint P1: pelvis (-0.008347623 0.005744023 -0.03806307)
      PathPoint P2: femur_l (0.002330143 -0.007886028 -0.004731617)
      PathPoint P3: femur_l (0.0008480452 -0.03209891 -0.002567912)
      PathPoint P4: tibia_l (0.0007542648 -0.002863413 -0.002416441)
    DeGrooteFregly2016Muscle tibant_l: max_isometric_force=1227.452 optimal_fiber_length=0.005237683
        tendon_slack_length=0.0184401 pennation_angle_at_optimal=0.1951828 activation_time_constant=0.01
        deactivation_time_constant=0.04 default_activation=0.01 fiber_damping=0.01
        passive_fiber_strain_at_one_norm_force=0.7 tendon_strain_at_one_norm_force=0.049
      PathPoint P1: tibia_l (0.001075526 -0.009162921 -0.001131397)
      PathPoint P2: tibia_l (0.001752967 -0.01331138 -0.0008939435)
      PathPoint P3: tibia_l (0.001627256 -0.02555421 0.0009218792)
      PathPoint P4: calcn_l (0.01263421 0.001928722 0.003304833)
    DeGrooteFregly2016Muscle tibpost_l: max_isometric_force=1730.154 optimal_fiber_length=0.002846573
        tendon_slack_length=0.02114443 pennation_angle_at_optimal=0.2264891 activation_time_constant=0.01
        deactivation_time_constant=0.04 default_activation=0.01 fiber_damping=0.01
        passive_fiber_strain_at_one_norm_force=0.7 tendon_strain_at_one_norm_force=0.049
      PathPoint P1: tibia_l (-0.0002863413 -0.009107049 -0.0007193451)
      PathPoint P2: tibia_l (-0.001145365 -0.02552628 0.001222188)
      PathPoint P3: calcn_l (0.00451841 0.003619063 0.003098958)
      PathPoint P4: calcn_l (0.008365019 0.001722847 0.00304478)
    DeGrooteFregly2016Muscle vasint_l: max_isometric_force=1697.361 optimal_fiber_length=0.007766629
        tendon_slack_length=0.01581566 pennation_angle_at_optimal=0.06309973 activation_time_constant=0.01
        deactivation_time_constant=0.04 default_activation=0.01 fiber_damping=0.01
        passive_fiber_strain_at_one_norm_force=0.7 tendon_strain_at_one_norm_force=0.049
      PathPoint P1: femur_l (0.00229844 -0.01524896 -0.002456953)
      PathPoint P2: femur_l (0.002655095 -0.01651707 -0.002258812)
      PathPoint P3: patella_l (0.000459688 0.003804315 4.755393e-5)
      PathPoint P4: patella_l (0.0003962828 0.0001957637 3.091006e-5)
      PathPoint P5: tibia_l (0.002274667 -0.004413846 -3.003091e-5)
      PathWrap: wrap_object=KnExt_at_fem_l method=hybrid
    DeGrooteFregly2016Muscle vaslat_l: max_isometric_force=5148.767 optimal_fiber_length=0.007780654
        tendon_slack_length=0.01726783 pennation_angle_at_optimal=0.2528673 activation_time_constant=0.01
        deactivation_time_constant=0.04 default_activation=0.01 fiber_damping=0.01
        passive_fiber_strain_at_one_norm_force=0.7 tendon_strain_at_one_norm_force=0.049
      PathPoint P1: femur_l (0.0003804315 -0.01469417 -0.002766054)
      PathPoint P2: femur_l (0.002132001 -0.02053537 -0.003241593)
      PathPoint P3: patella_l (0.0008163425 0.003352552 -0.001117517)
      PathPoint P4: patella_l (0.0003962828 0.0001957637 -0.0005809506)
      PathPoint P5: tibia_l (0.002272572 -0.004426417 -0.000356879)
      PathWrap: wrap_object=KnExt_at_fem_l method=hybrid
    DeGrooteFregly2016Muscle vasmed_l: max_isometric_force=2747.823 optimal_fiber_length=0.007566507
        tendon_slack_length=0.0156258 pennation_angle_at_optimal=0.4222225 activation_time_constant=0.01
        deactivation_time_constant=0.04 default_activation=0.01 fiber_damping=0.01
        passive_fiber_strain_at_one_norm_force=0.7 tendon_strain_at_one_norm_force=0.049
      PathPoint P1: femur_l (0.001109592 -0.01663595 -0.001490023)
      PathPoint P2: femur_l (0.002821533 -0.02194614 -7.13309e-5)
      PathPoint P3: patella_l (0.0004993163 0.003526917 0.001347361)
      PathPoint P4: patella_l (0.0003962828 0.0001957637 0.0006736807)
      PathPoint P5: tibia_l (0.002227875 -0.004439686 0.0004735107)
      PathWrap: wrap_object=KnExt_at_fem_l method=hybrid
    DeGrooteFregly2016Muscle rect_abd_r: max_isometric_force=662 optimal_fiber_length=0.1518955
        tendon_slack_length=0.04130315 pennation_angle_at_optimal=0 activation_time_constant=0.01
        deactivation_time_constant=0.04 fiber_damping=0 passive_fiber_strain_at_one_norm_force=0.6
        tendon_strain_at_one_norm_force=0.033
      PathPoint rect_abd_r_P1: pelvis (-0.00697872 -0.01878886 0.003373842)
      PathPoint rect_abd_r_P2: torso (0.04877309 0.117682 0.03767974)
    DeGrooteFregly2016Muscle rect_abd_l: max_isometric_force=662 optimal_fiber_length=0.1518898
        tendon_slack_length=0.04130161 pennation_angle_at_optimal=0 activation_time_constant=0.01
        deactivation_time_constant=0.04 fiber_damping=0 passive_fiber_strain_at_one_norm_force=0.6
        tendon_strain_at_one_norm_force=0.033
      PathPoint rect_abd_l_P1: pelvis (-0.00697872 -0.01878886 -0.003373842)
      PathPoint rect_abd_l_P2: torso (0.04877309 0.1175129 -0.03767974)
    DeGrooteFregly2016Muscle Ps_L1_VB_r: max_isometric_force=267.4139 optimal_fiber_length=0.09589107
        tendon_slack_length=0.02848004 pennation_angle_at_optimal=0.18675 activation_time_constant=0.015
        deactivation_time_constant=0.05 fiber_damping=0 passive_fiber_strain_at_one_norm_force=0.6
        tendon_strain_at_one_norm_force=0.04
      PathPoint Ps_L1_VB_r_P1: lumbar1 (-0.00538598 0.01233641 0.02430951)
      PathPoint Ps_L1_VB_r_P2: pelvis (-0.006388213 -0.0152995 0.02327951)
    DeGrooteFregly2016Muscle Ps_L1_TP_r: max_isometric_force=77.19164 optimal_fiber_length=0.09502701
        tendon_slack_length=0.02820414 pennation_angle_at_optimal=0.18675 activation_time_constant=0.015
        deactivation_time_constant=0.05 fiber_damping=0 passive_fiber_strain_at_one_norm_force=0.6
        tendon_strain_at_one_norm_force=0.04
      PathPoint Ps_L1_TP_r_P1: lumbar1 (-0.01232581 0.007771037 0.02750038)
      PathPoint Ps_L1_TP_r_P2: pelvis (-0.006388213 -0.0152995 0.02327951)
    DeGrooteFregly2016Muscle Ps_L1_L2_IVD_r: max_isometric_force=147.1507 optimal_fiber_length=0.08764492
        tendon_slack_length=0.02605261 pennation_angle_at_optimal=0.1867502 activation_time_constant=0.015
        deactivation_time_constant=0.05 fiber_damping=0 passive_fiber_strain_at_one_norm_force=0.6
        tendon_strain_at_one_norm_force=0.04
      PathPoint Ps_L1_L2_IVD_r_P1: lumbar1 (-0.0006645969 0.001859728 0.02514016)
      PathPoint Ps_L1_L2_IVD_r_P2: pelvis (-0.006388213 -0.0152995 0.02327951)
    DeGrooteFregly2016Muscle Ps_L2_TP_r: max_isometric_force=258.58 optimal_fiber_length=0.08166677
        tendon_slack_length=0.0242833 pennation_angle_at_optimal=0.1867502 activation_time_constant=0.015
        deactivation_time_constant=0.05 fiber_damping=0 passive_fiber_strain_at_one_norm_force=0.6
        tendon_strain_at_one_norm_force=0.04
      PathPoint Ps_L2_TP_r_P1: lumbar2 (-0.01146242 0.007733185 0.02704311)
      PathPoint Ps_L2_TP_r_P2: pelvis (-0.006388213 -0.0152995 0.02327951)
    DeGrooteFregly2016Muscle Ps_L2_L3_IVD_r: max_isometric_force=150.5407 optimal_fiber_length=0.07409135
        tendon_slack_length=0.02201931 pennation_angle_at_optimal=0.1867502 activation_time_constant=0.015
        deactivation_time_constant=0.05 fiber_damping=0 passive_fiber_strain_at_one_norm_force=0.6
        tendon_strain_at_one_norm_force=0.04
      PathPoint Ps_L2_L3_IVD_r_P1: lumbar2 (0.001040415 0.001794632 0.0260694)
      PathPoint Ps_L2_L3_IVD_r_P2: pelvis (-0.006388213 -0.0152995 0.02327951)
    DeGrooteFregly2016Muscle Ps_L3_TP_r: max_isometric_force=127.7698 optimal_fiber_length=0.07063025
        tendon_slack_length=0.02097684 pennation_angle_at_optimal=0.1867502 activation_time_constant=0.015
        deactivation_time_constant=0.05 fiber_damping=0 passive_fiber_strain_at_one_norm_force=0.6
        tendon_strain_at_one_norm_force=0.04
      PathPoint Ps_L3_TP_r_P1: lumbar3 (-0.01299193 0.01098895 0.03434921)
      PathPoint Ps_L3_TP_r_P2: pelvis (-0.006388213 -0.0152995 0.02327951)
    DeGrooteFregly2016Muscle Ps_L3_L4_IVD_r: max_isometric_force=45.35878 optimal_fiber_length=0.06102891
        tendon_slack_length=0.01814245 pennation_angle_at_optimal=0.1867502 activation_time_constant=0.015
        deactivation_time_constant=0.05 fiber_damping=0 passive_fiber_strain_at_one_norm_force=0.6
        tendon_strain_at_one_norm_force=0.04
      PathPoint Ps_L3_L4_IVD_r_P1: lumbar3 (0.0006106867 0.003292517 0.02571132)
      PathPoint Ps_L3_L4_IVD_r_P2: pelvis (-0.006388213 -0.0152995 0.02327951)
    DeGrooteFregly2016Muscle Ps_L4_TP_r: max_isometric_force=202.6902 optimal_fiber_length=0.05937492
        tendon_slack_length=0.01764283 pennation_angle_at_optimal=0.1867502 activation_time_constant=0.015
        deactivation_time_constant=0.05 fiber_damping=0 passive_fiber_strain_at_one_norm_force=0.6
        tendon_strain_at_one_norm_force=0.04
      PathPoint Ps_L4_TP_r_P1: lumbar4 (-0.008296196 0.01322514 0.03145262)
      PathPoint Ps_L4_TP_r_P2: pelvis (-0.006388213 -0.0152995 0.02327951)
    DeGrooteFregly2016Muscle Ps_L4_L5_IVD_r: max_isometric_force=85.10187 optimal_fiber_length=0.0483805
        tendon_slack_length=0.0143709 pennation_angle_at_optimal=0.1867502 activation_time_constant=0.015
        deactivation_time_constant=0.05 fiber_damping=0 passive_fiber_strain_at_one_norm_force=0.6
        tendon_strain_at_one_norm_force=0.04
      PathPoint Ps_L4_L5_IVD_r_P1: lumbar4 (0.002873175 0.002092758 0.02503466)
      PathPoint Ps_L4_L5_IVD_r_P2: pelvis (-0.006388213 -0.0152995 0.02327951)
    DeGrooteFregly2016Muscle Ps_L5_TP_r: max_isometric_force=186.3623 optimal_fiber_length=0.04960911
        tendon_slack_length=0.0147292 pennation_angle_at_optimal=0.1867502 activation_time_constant=0.015
        deactivation_time_constant=0.05 fiber_damping=0 passive_fiber_strain_at_one_norm_force=0.6
        tendon_strain_at_one_norm_force=0.04
      PathPoint Ps_L5_TP_r_P1: lumbar5 (-0.002979405 0.01544824 0.03073706)
      PathPoint Ps_L5_TP_r_P2: pelvis (-0.006388213 -0.0152995 0.02327951)
    DeGrooteFregly2016Muscle Ps_L5_VB_r: max_isometric_force=232.8923 optimal_fiber_length=0.04109114
        tendon_slack_length=0.01219538 pennation_angle_at_optimal=0.1867502 activation_time_constant=0.015
        deactivation_time_constant=0.05 fiber_damping=0 passive_fiber_strain_at_one_norm_force=0.6
        tendon_strain_at_one_norm_force=0.04
      PathPoint Ps_L5_VB_r_P1: lumbar5 (0.005301422 0.006579065 0.02309403)
      PathPoint Ps_L5_VB_r_P2: pelvis (-0.006388213 -0.0152995 0.02327951)
    DeGrooteFregly2016Muscle Ps_L1_VB_l: max_isometric_force=267.4139 optimal_fiber_length=0.09589107
        tendon_slack_length=0.02848004 pennation_angle_at_optimal=0.18675 activation_time_constant=0.015
        deactivation_time_constant=0.05 fiber_damping=0 passive_fiber_strain_at_one_norm_force=0.6
        tendon_strain_at_one_norm_force=0.04
      PathPoint Ps_L1_VB_l_P1: lumbar1 (-0.00538598 0.01233641 -0.02430951)
      PathPoint Ps_L1_VB_l_P2: pelvis (-0.006388213 -0.0152995 -0.02327951)
    DeGrooteFregly2016Muscle Ps_L1_TP_l: max_isometric_force=77.19164 optimal_fiber_length=0.09502745
        tendon_slack_length=0.02820427 pennation_angle_at_optimal=0.18675 activation_time_constant=0.015
        deactivation_time_constant=0.05 fiber_damping=0 passive_fiber_strain_at_one_norm_force=0.6
        tendon_strain_at_one_norm_force=0.04
      PathPoint Ps_L1_TP_l_P1: lumbar1 (-0.01232581 0.007771037 -0.02750621)
      PathPoint Ps_L1_TP_l_P2: pelvis (-0.006388213 -0.0152995 -0.02327951)
    DeGrooteFregly2016Muscle Ps_L1_L2_IVD_l: max_isometric_force=147.1507 optimal_fiber_length=0.08764463
        tendon_slack_length=0.02605253 pennation_angle_at_optimal=0.1867502 activation_time_constant=0.015
        deactivation_time_constant=0.05 fiber_damping=0 passive_fiber_strain_at_one_norm_force=0.6
        tendon_strain_at_one_norm_force=0.04
      PathPoint Ps_L1_L2_IVD_l_P1: lumbar1 (-0.0006645969 0.001859728 -0.02513603)
      PathPoint Ps_L1_L2_IVD_l_P2: pelvis (-0.006388213 -0.0152995 -0.02327951)
    DeGrooteFregly2016Muscle Ps_L2_TP_l: max_isometric_force=258.58 optimal_fiber_length=0.08166686
        tendon_slack_length=0.02428333 pennation_angle_at_optimal=0.1867502 activation_time_constant=0.015
        deactivation_time_constant=0.05 fiber_damping=0 passive_fiber_strain_at_one_norm_force=0.6
        tendon_strain_at_one_norm_force=0.04
      PathPoint Ps_L2_TP_l_P1: lumbar2 (-0.01146242 0.007733185 -0.02704433)
      PathPoint Ps_L2_TP_l_P2: pelvis (-0.006388213 -0.0152995 -0.02327951)
    DeGrooteFregly2016Muscle Ps_L2_L3_IVD_l: max_isometric_force=150.5407 optimal_fiber_length=0.07409155
        tendon_slack_length=0.02201937 pennation_angle_at_optimal=0.1867502 activation_time_constant=0.015
        deactivation_time_constant=0.05 fiber_damping=0 passive_fiber_strain_at_one_norm_force=0.6
        tendon_strain_at_one_norm_force=0.04
      PathPoint Ps_L2_L3_IVD_l_P1: lumbar2 (0.001040415 0.001794632 -0.02607195)
      PathPoint Ps_L2_L3_IVD_l_P2: pelvis (-0.006388213 -0.0152995 -0.02327951)
    DeGrooteFregly2016Muscle Ps_L3_TP_l: max_isometric_force=127.7698 optimal_fiber_length=0.07063026
        tendon_slack_length=0.02097684 pennation_angle_at_optimal=0.1867502 activation_time_constant=0.015
        deactivation_time_constant=0.05 fiber_damping=0 passive_fiber_strain_at_one_norm_force=0.6
        tendon_strain_at_one_norm_force=0.04
      PathPoint Ps_L3_TP_l_P1: lumbar3 (-0.01299193 0.01098895 -0.03434934)
      PathPoint Ps_L3_TP_l_P2: pelvis (-0.006388213 -0.0152995 -0.02327951)
    DeGrooteFregly2016Muscle Ps_L3_L4_IVD_l: max_isometric_force=45.35878 optimal_fiber_length=0.06102856
        tendon_slack_length=0.01814234 pennation_angle_at_optimal=0.1867502 activation_time_constant=0.015
        deactivation_time_constant=0.05 fiber_damping=0 passive_fiber_strain_at_one_norm_force=0.6
        tendon_strain_at_one_norm_force=0.04
      PathPoint Ps_L3_L4_IVD_l_P1: lumbar3 (0.0006106867 0.003292517 -0.02570731)
      PathPoint Ps_L3_L4_IVD_l_P2: pelvis (-0.006388213 -0.0152995 -0.02327951)
    DeGrooteFregly2016Muscle Ps_L4_TP_l: max_isometric_force=202.6902 optimal_fiber_length=0.05937541
        tendon_slack_length=0.01764298 pennation_angle_at_optimal=0.1867502 activation_time_constant=0.015
        deactivation_time_constant=0.05 fiber_damping=0 passive_fiber_strain_at_one_norm_force=0.6
        tendon_strain_at_one_norm_force=0.04
      PathPoint Ps_L4_TP_l_P1: lumbar4 (-0.008296196 0.01322514 -0.0314565)
      PathPoint Ps_L4_TP_l_P2: pelvis (-0.006388213 -0.0152995 -0.02327951)
    DeGrooteFregly2016Muscle Ps_L4_L5_IVD_l: max_isometric_force=85.10187 optimal_fiber_length=0.0483809
        tendon_slack_length=0.01437102 pennation_angle_at_optimal=0.1867502 activation_time_constant=0.015
        deactivation_time_constant=0.05 fiber_damping=0 passive_fiber_strain_at_one_norm_force=0.6
        tendon_strain_at_one_norm_force=0.04
      PathPoint Ps_L4_L5_IVD_l_P1: lumbar4 (0.002873175 0.002092758 -0.02503879)
      PathPoint Ps_L4_L5_IVD_l_P2: pelvis (-0.006388213 -0.0152995 -0.02327951)
    DeGrooteFregly2016Muscle Ps_L5_TP_l: max_isometric_force=186.3623 optimal_fiber_length=0.04960942
        tendon_slack_length=0.0147293 pennation_angle_at_optimal=0.1867502 activation_time_constant=0.015
        deactivation_time_constant=0.05 fiber_damping=0 passive_fiber_strain_at_one_norm_force=0.6
        tendon_strain_at_one_norm_force=0.04
      PathPoint Ps_L5_TP_l_P1: lumbar5 (-0.002979405 0.01544824 -0.03073937)
      PathPoint Ps_L5_TP_l_P2: pelvis (-0.006388213 -0.0152995 -0.02327951)
    DeGrooteFregly2016Muscle Ps_L5_VB_l: max_isometric_force=232.8923 optimal_fiber_length=0.04109114
        tendon_slack_length=0.01219538 pennation_angle_at_optimal=0.1867502 activation_time_constant=0.015
        deactivation_time_constant=0.05 fiber_damping=0 passive_fiber_strain_at_one_norm_force=0.6
        tendon_strain_at_one_norm_force=0.04
      PathPoint Ps_L5_VB_l_P1: lumbar5 (0.005301422 0.006579065 -0.02309403)
      PathPoint Ps_L5_VB_l_P2: pelvis (-0.006388213 -0.0152995 -0.02327951)
    DeGrooteFregly2016Muscle QL_post_I_1_L3_r: max_isometric_force=75.59353 optimal_fiber_length=0.04343429
        tendon_slack_length=0.03645729 pennation_angle_at_optimal=0.1291544 activation_time_constant=0.015
        deactivation_time_constant=0.05 fiber_damping=0 passive_fiber_strain_at_one_norm_force=0.6
        tendon_strain_at_one_norm_force=0.04
      PathPoint I_1_r_P1: pelvis (-0.03006218 0.02066775 0.01809606)
      PathPoint L3_TP_r_P2: lumbar3 (-0.01537412 0.01040669 0.03682891)
    DeGrooteFregly2016Muscle QL_post_I_2_L4_r: max_isometric_force=156.4149 optimal_fiber_length=0.02973586
        tendon_slack_length=0.02503454 pennation_angle_at_optimal=0.1291544 activation_time_constant=0.015
        deactivation_time_constant=0.05 fiber_damping=0 passive_fiber_strain_at_one_norm_force=0.6
        tendon_strain_at_one_norm_force=0.04
      PathPoint I_2_r_P1: pelvis (-0.0284517 0.0217414 0.01932291)
      PathPoint L4_TP_r_P2: lumbar4 (-0.01166313 0.01381021 0.03682891)
    DeGrooteFregly2016Muscle QL_post_I_2_L3_r: max_isometric_force=58.56422 optimal_fiber_length=0.0397038
        tendon_slack_length=0.03338728 pennation_angle_at_optimal=0.1291544 activation_time_constant=0.015
        deactivation_time_constant=0.05 fiber_damping=0 passive_fiber_strain_at_one_norm_force=0.6
        tendon_strain_at_one_norm_force=0.04
      PathPoint I_2_r_P1: pelvis (-0.0284517 0.0217414 0.01932291)
      PathPoint L3_TP_r_P2: lumbar3 (-0.01537412 0.01040669 0.03682891)
    DeGrooteFregly2016Muscle QL_post_I_2_L2_r: max_isometric_force=36.55072 optimal_fiber_length=0.05046722
        tendon_slack_length=0.04242428 pennation_angle_at_optimal=0.1291544 activation_time_constant=0.015
        deactivation_time_constant=0.05 fiber_damping=0 passive_fiber_strain_at_one_norm_force=0.6
        tendon_strain_at_one_norm_force=0.04
      PathPoint I_2_r_P1: pelvis (-0.0284517 0.0217414 0.01932291)
      PathPoint L2_TP_r_P2: lumbar2 (-0.01643441 0.006361707 0.03682891)
    DeGrooteFregly2016Muscle QL_post_I_3_L1_r: max_isometric_force=77.19129 optimal_fiber_length=0.06453775
        tendon_slack_length=0.05421171 pennation_angle_at_optimal=0.1291544 activation_time_constant=0.015
        deactivation_time_constant=0.05 fiber_damping=0 passive_fiber_strain_at_one_norm_force=0.6
        tendon_strain_at_one_norm_force=0.04
      PathPoint L1_TP_P1: lumbar1 (-0.01696455 0.007421991 0.03889521)
      PathPoint I_3_r_P1: pelvis (-0.02630441 0.0238887 0.02024305)
    DeGrooteFregly2016Muscle QL_post_I_3_L2_r: max_isometric_force=56.48747 optimal_fiber_length=0.0520295
        tendon_slack_length=0.04364953 pennation_angle_at_optimal=0.1291544 activation_time_constant=0.015
        deactivation_time_constant=0.05 fiber_damping=0 passive_fiber_strain_at_one_norm_force=0.6
        tendon_strain_at_one_norm_force=0.04
      PathPoint L2_TP_r_P2: lumbar2 (-0.01643441 0.006361707 0.03682891)
      PathPoint I_3_r_P1: pelvis (-0.02630441 0.0238887 0.02024305)
    DeGrooteFregly2016Muscle QL_post_I_3_L3_r: max_isometric_force=96.36098 optimal_fiber_length=0.04223204
        tendon_slack_length=0.03545798 pennation_angle_at_optimal=0.1291544 activation_time_constant=0.015
        deactivation_time_constant=0.05 fiber_damping=0 passive_fiber_strain_at_one_norm_force=0.6
        tendon_strain_at_one_norm_force=0.04
      PathPoint L3_TP_r_P2: lumbar3 (-0.01537412 0.01040669 0.03682891)
      PathPoint I_3_r_P1: pelvis (-0.02630441 0.0238887 0.02024305)
    DeGrooteFregly2016Muscle QL_post_I_1_L3_l: max_isometric_force=75.59353 optimal_fiber_length=0.04448641
        tendon_slack_length=0.0373404 pennation_angle_at_optimal=0.1291544 activation_time_constant=0.015
        deactivation_time_constant=0.05 fiber_damping=0 passive_fiber_strain_at_one_norm_force=0.6
        tendon_strain_at_one_norm_force=0.04
      PathPoint I.1_l_P1: pelvis (-0.03048546 0.02133864 -0.0178498)
      PathPoint L3_TP_l_P2: lumbar3 (-0.01537412 0.01060284 -0.03682891)
    DeGrooteFregly2016Muscle QL_post_I_2_L4_l: max_isometric_force=156.4149 optimal_fiber_length=0.02952931
        tendon_slack_length=0.02486064 pennation_angle_at_optimal=0.1291544 activation_time_constant=0.015
        deactivation_time_constant=0.05 fiber_damping=0 passive_fiber_strain_at_one_norm_force=0.6
        tendon_strain_at_one_norm_force=0.04
      PathPoint I_2_l_P1: pelvis (-0.0284517 0.0217414 -0.01932291)
      PathPoint L4_TP_l_P2: lumbar4 (-0.01166313 0.01381021 -0.03646426)
    DeGrooteFregly2016Muscle QL_post_I_2_L3_l: max_isometric_force=58.56422 optimal_fiber_length=0.0397038
        tendon_slack_length=0.03338728 pennation_angle_at_optimal=0.1291544 activation_time_constant=0.015
        deactivation_time_constant=0.05 fiber_damping=0 passive_fiber_strain_at_one_norm_force=0.6
        tendon_strain_at_one_norm_force=0.04
      PathPoint I_2_l_P1: pelvis (-0.0284517 0.0217414 -0.01932291)
      PathPoint L3_TP_l_P2: lumbar3 (-0.01537412 0.01040669 -0.03682891)
    DeGrooteFregly2016Muscle QL_post_I_2_L2_l: max_isometric_force=36.55072 optimal_fiber_length=0.05046722
        tendon_slack_length=0.04242428 pennation_angle_at_optimal=0.1291544 activation_time_constant=0.015
        deactivation_time_constant=0.05 fiber_damping=0 passive_fiber_strain_at_one_norm_force=0.6
        tendon_strain_at_one_norm_force=0.04
      PathPoint I_2_l_P1: pelvis (-0.0284517 0.0217414 -0.01932291)
      PathPoint L2_TP_l_P2: lumbar2 (-0.01643441 0.006361707 -0.03682891)
    DeGrooteFregly2016Muscle QL_post_I_3_L1_l: max_isometric_force=77.19129 optimal_fiber_length=0.06446949
        tendon_slack_length=0.05415438 pennation_angle_at_optimal=0.1291544 activation_time_constant=0.015
        deactivation_time_constant=0.05 fiber_damping=0 passive_fiber_strain_at_one_norm_force=0.6
        tendon_strain_at_one_norm_force=0.04
      PathPoint L1_TP_l_P1: lumbar1 (-0.01689537 0.007595984 -0.03889521)
      PathPoint I_3_l_P1: pelvis (-0.02630441 0.0238887 -0.02024305)
    DeGrooteFregly2016Muscle QL_post_I_3_L2_l: max_isometric_force=56.48747 optimal_fiber_length=0.0520295
        tendon_slack_length=0.04364953 pennation_angle_at_optimal=0.1291544 activation_time_constant=0.015
        deactivation_time_constant=0.05 fiber_damping=0 passive_fiber_strain_at_one_norm_force=0.6
        tendon_strain_at_one_norm_force=0.04
      PathPoint L2_TP_l_P2: lumbar2 (-0.01643441 0.006361707 -0.03682891)
      PathPoint I_3_l_P1: pelvis (-0.02630441 0.0238887 -0.02024305)
    DeGrooteFregly2016Muscle QL_post_I_3_L3_l: max_isometric_force=96.36098 optimal_fiber_length=0.04223204
        tendon_slack_length=0.03545798 pennation_angle_at_optimal=0.1291544 activation_time_constant=0.015
        deactivation_time_constant=0.05 fiber_damping=0 passive_fiber_strain_at_one_norm_force=0.6
        tendon_strain_at_one_norm_force=0.04
      PathPoint L3_TP_l_P2: lumbar3 (-0.01537412 0.01040669 -0.03682891)
      PathPoint I_3_l_P1: pelvis (-0.02630441 0.0238887 -0.02024305)
    DeGrooteFregly2016Muscle QL_mid_L3_12_3_r: max_isometric_force=41.93463 optimal_fiber_length=0.03778881
        tendon_slack_length=0.01963055 pennation_angle_at_optimal=0.1291544 activation_time_constant=0.015
        deactivation_time_constant=0.05 fiber_damping=0 passive_fiber_strain_at_one_norm_force=0.6
        tendon_strain_at_one_norm_force=0.04
      PathPoint quadratus_lumb_mid_L3_1_r_P1: torso (-0.02221906 0.05957208 0.06279146)
      PathPoint quadratus_lumb_mid_L3_1_r_P2: lumbar3 (-0.01556582 0.01152036 0.03692614)
    DeGrooteFregly2016Muscle QL_mid_L3_12_2_r: max_isometric_force=47.71871 optimal_fiber_length=0.03713137
        tendon_slack_length=0.01926364 pennation_angle_at_optimal=0.1291544 activation_time_constant=0.015
        deactivation_time_constant=0.05 fiber_damping=0 passive_fiber_strain_at_one_norm_force=0.6
        tendon_strain_at_one_norm_force=0.04
      PathPoint quadratus_lumb_mid_L3_2_r_P2: torso (-0.02251949 0.06320462 0.05249638)
      PathPoint quadratus_lumb_mid_L3_2_r_P3: lumbar3 (-0.01556498 0.01151999 0.03692614)
    DeGrooteFregly2016Muscle QL_mid_L3_12_1_r: max_isometric_force=79.53119 optimal_fiber_length=0.03616238
        tendon_slack_length=0.0187705 pennation_angle_at_optimal=0.1291544 activation_time_constant=0.015
        deactivation_time_constant=0.05 fiber_damping=0 passive_fiber_strain_at_one_norm_force=0.6
        tendon_strain_at_one_norm_force=0.04
      PathPoint quadratus_lumb_mid_L3_3_r_P2: torso (-0.02188666 0.06796423 0.03791068)
      PathPoint quadratus_lumb_mid_L3_3_r_P3: lumbar3 (-0.01556498 0.01151999 0.03692614)
    DeGrooteFregly2016Muscle QL_mid_L2_12_1_r: max_isometric_force=156.0861 optimal_fiber_length=0.02510109
        tendon_slack_length=0.01303742 pennation_angle_at_optimal=0.1291544 activation_time_constant=0.015
        deactivation_time_constant=0.05 fiber_damping=0 passive_fiber_strain_at_one_norm_force=0.6
        tendon_strain_at_one_norm_force=0.04
      PathPoint QL_mid_L2-12_1_l_P1: torso (-0.02188427 0.06796423 0.03791068)
      PathPoint QL_mid_L2-12_1_l_P2: lumbar2 (-0.01543848 0.00895723 0.03114048)
    DeGrooteFregly2016Muscle QL_mid_L4_12_3_r: max_isometric_force=42.09638 optimal_fiber_length=0.04544014
        tendon_slack_length=0.02357465 pennation_angle_at_optimal=0.1291544 activation_time_constant=0.015
        deactivation_time_constant=0.05 fiber_damping=0 passive_fiber_strain_at_one_norm_force=0.6
        tendon_strain_at_one_norm_force=0.04
      PathPoint quadratus_lumb_mid_L4_1_r_P1: torso (-0.02215067 0.05954346 0.06280362)
      PathPoint quadratus_lumb_mid_L4_1_r_P2: lumbar4 (-0.01133577 0.01627537 0.03410624)
    DeGrooteFregly2016Muscle QL_mid_L3_12_3_l: max_isometric_force=41.93463 optimal_fiber_length=0.03778881
        tendon_slack_length=0.01963055 pennation_angle_at_optimal=0.1291544 activation_time_constant=0.015
        deactivation_time_constant=0.05 fiber_damping=0 passive_fiber_strain_at_one_norm_force=0.6
        tendon_strain_at_one_norm_force=0.04
      PathPoint quadratus_lumb_mid_L3_1_l_P1: torso (-0.02221906 0.05957208 -0.06279146)
      PathPoint quadratus_lumb_mid_L3_1_l_P2: lumbar3 (-0.01556582 0.01152036 -0.03692614)
    DeGrooteFregly2016Muscle QL_mid_L3_12_2_l: max_isometric_force=47.71871 optimal_fiber_length=0.03713137
        tendon_slack_length=0.01926364 pennation_angle_at_optimal=0.1291544 activation_time_constant=0.015
        deactivation_time_constant=0.05 fiber_damping=0 passive_fiber_strain_at_one_norm_force=0.6
        tendon_strain_at_one_norm_force=0.04
      PathPoint quadratus_lumb_mid_L3_2_l_P2: torso (-0.02251949 0.06320462 -0.05249638)
      PathPoint quadratus_lumb_mid_L3_2_l_P3: lumbar3 (-0.01556498 0.01151999 -0.03692614)
    DeGrooteFregly2016Muscle QL_mid_L3_12_1_l: max_isometric_force=79.53119 optimal_fiber_length=0.03616238
        tendon_slack_length=0.0187705 pennation_angle_at_optimal=0.1291544 activation_time_constant=0.015
        deactivation_time_constant=0.05 fiber_damping=0 passive_fiber_strain_at_one_norm_force=0.6
        tendon_strain_at_one_norm_force=0.04
      PathPoint quadratus_lumb_mid_L3_3_l_P2: torso (-0.02188666 0.06796423 -0.03791068)
      PathPoint quadratus_lumb_mid_L3_3_l_P3: lumbar3 (-0.01556498 0.01151999 -0.03692614)
    DeGrooteFregly2016Muscle QL_mid_L2_12_1_l: max_isometric_force=156.0861 optimal_fiber_length=0.02510109
        tendon_slack_length=0.01303742 pennation_angle_at_optimal=0.1291544 activation_time_constant=0.015
        deactivation_time_constant=0.05 fiber_damping=0 passive_fiber_strain_at_one_norm_force=0.6
        tendon_strain_at_one_norm_force=0.04
      PathPoint QL_mid_L2-12_1_l_P1: torso (-0.02188427 0.06796423 -0.03791068)
      PathPoint QL_mid_L2-12_1_l_P2: lumbar2 (-0.01543848 0.00895723 -0.03114048)
    DeGrooteFregly2016Muscle QL_mid_L4_12_3_l: max_isometric_force=42.09638 optimal_fiber_length=0.04544014
        tendon_slack_length=0.02357465 pennation_angle_at_optimal=0.1291544 activation_time_constant=0.015
        deactivation_time_constant=0.05 fiber_damping=0 passive_fiber_strain_at_one_norm_force=0.6
        tendon_strain_at_one_norm_force=0.04
      PathPoint quadratus_lumb_mid_L4_1_l_P1: torso (-0.02215067 0.05954346 -0.06280362)
      PathPoint quadratus_lumb_mid_L4_1_l_P2: lumbar4 (-0.01133577 0.01627537 -0.03410624)
    DeGrooteFregly2016Muscle QL_ant_I_2_T12_r: max_isometric_force=45.39083 optimal_fiber_length=0.08187115
        tendon_slack_length=0.04249909 pennation_angle_at_optimal=0.1291544 activation_time_constant=0.015
        deactivation_time_constant=0.05 fiber_damping=0 passive_fiber_strain_at_one_norm_force=0.6
        tendon_strain_at_one_norm_force=0.04
      PathPoint I_2_r_P1: pelvis (-0.0284517 0.0217414 0.01932291)
      PathPoint T12_r_P2: torso (-0.007528444 0.06891849 0.02430951)
    DeGrooteFregly2016Muscle QL_ant_I_3_T12_r: max_isometric_force=85.28362 optimal_fiber_length=0.08227063
        tendon_slack_length=0.04273139 pennation_angle_at_optimal=0.1291544 activation_time_constant=0.015
        deactivation_time_constant=0.05 fiber_damping=0 passive_fiber_strain_at_one_norm_force=0.6
        tendon_strain_at_one_norm_force=0.04
      PathPoint I_3_r_P1: pelvis (-0.02630441 0.0238887 0.02024305)
      PathPoint T12_r_P2: torso (-0.005301422 0.06944863 0.02309403)
    DeGrooteFregly2016Muscle QL_ant_I_2_12_1_r: max_isometric_force=28.08042 optimal_fiber_length=0.08677879
        tendon_slack_length=0.04505353 pennation_angle_at_optimal=0.1291544 activation_time_constant=0.015
        deactivation_time_constant=0.05 fiber_damping=0 passive_fiber_strain_at_one_norm_force=0.6
        tendon_strain_at_one_norm_force=0.04
      PathPoint I_2_r_P2: pelvis (-0.0284517 0.0217414 0.01932291)
      PathPoint T12_1_r_P3: torso (-0.02173583 0.06255678 0.05226544)
    DeGrooteFregly2016Muscle QL_ant_I_3_12_1_r: max_isometric_force=53.17357 optimal_fiber_length=0.0844469
        tendon_slack_length=0.04386436 pennation_angle_at_optimal=0.1291544 activation_time_constant=0.015
        deactivation_time_constant=0.05 fiber_damping=0 passive_fiber_strain_at_one_norm_force=0.6
        tendon_strain_at_one_norm_force=0.04
      PathPoint I_3_r_P1: pelvis (-0.02630441 0.0238887 0.02024305)
      PathPoint T12_1_r_P2: torso (-0.0213545 0.06595022 0.04551956)
    DeGrooteFregly2016Muscle QL_ant_I_3_12_2_r: max_isometric_force=35.24989 optimal_fiber_length=0.08529918
        tendon_slack_length=0.04430136 pennation_angle_at_optimal=0.1291544 activation_time_constant=0.015
        deactivation_time_constant=0.05 fiber_damping=0 passive_fiber_strain_at_one_norm_force=0.6
        tendon_strain_at_one_norm_force=0.04
      PathPoint I_3_r_P1: pelvis (-0.02630441 0.0238887 0.02024305)
      PathPoint T12_2_r_P2: torso (-0.02133292 0.06248256 0.05600911)
    DeGrooteFregly2016Muscle QL_ant_I_3_12_3_r: max_isometric_force=40.627 optimal_fiber_length=0.07906382
        tendon_slack_length=0.04106977 pennation_angle_at_optimal=0.1291544 activation_time_constant=0.015
        deactivation_time_constant=0.05 fiber_damping=0 passive_fiber_strain_at_one_norm_force=0.6
        tendon_strain_at_one_norm_force=0.04
      PathPoint I_3_r_P2: pelvis (-0.02630441 0.0238887 0.02024305)
      PathPoint T12_3_r_P3: torso (-0.02015071 0.05903611 0.06626772)
    DeGrooteFregly2016Muscle QL_ant_I_2_T12_l: max_isometric_force=45.39083 optimal_fiber_length=0.08106802
        tendon_slack_length=0.04208219 pennation_angle_at_optimal=0.1291544 activation_time_constant=0.015
        deactivation_time_constant=0.05 fiber_damping=0 passive_fiber_strain_at_one_norm_force=0.6
        tendon_strain_at_one_norm_force=0.04
      PathPoint I_2_l_P1: pelvis (-0.0284517 0.0217414 -0.01932291)
      PathPoint T12_l_P2: torso (-0.005301422 0.06944863 -0.02309403)
    DeGrooteFregly2016Muscle QL_ant_I_3_T12_l: max_isometric_force=85.28362 optimal_fiber_length=0.08227063
        tendon_slack_length=0.04273139 pennation_angle_at_optimal=0.1291544 activation_time_constant=0.015
        deactivation_time_constant=0.05 fiber_damping=0 passive_fiber_strain_at_one_norm_force=0.6
        tendon_strain_at_one_norm_force=0.04
      PathPoint I_3_l_P1: pelvis (-0.02630441 0.0238887 -0.02024305)
      PathPoint T12_l_P2: torso (-0.005301422 0.06944863 -0.02309403)
    DeGrooteFregly2016Muscle QL_ant_I_2_12_1_l: max_isometric_force=28.08042 optimal_fiber_length=0.08677879
        tendon_slack_length=0.04505353 pennation_angle_at_optimal=0.1291544 activation_time_constant=0.015
        deactivation_time_constant=0.05 fiber_damping=0 passive_fiber_strain_at_one_norm_force=0.6
        tendon_strain_at_one_norm_force=0.04
      PathPoint I_2_l_P2: pelvis (-0.0284517 0.0217414 -0.01932291)
      PathPoint T12_1_l_P3: torso (-0.02173583 0.06255678 -0.05226544)
    DeGrooteFregly2016Muscle QL_ant_I_3_12_1_l: max_isometric_force=53.17357 optimal_fiber_length=0.08438064
        tendon_slack_length=0.04382994 pennation_angle_at_optimal=0.1291544 activation_time_constant=0.015
        deactivation_time_constant=0.05 fiber_damping=0 passive_fiber_strain_at_one_norm_force=0.6
        tendon_strain_at_one_norm_force=0.04
      PathPoint I_3_l_P1: pelvis (-0.02630441 0.0238887 -0.02024305)
      PathPoint T12_1_l_P2: torso (-0.02120569 0.06573764 -0.04497259)
    DeGrooteFregly2016Muscle QL_ant_I_3_12_2_l: max_isometric_force=35.24989 optimal_fiber_length=0.08529918
        tendon_slack_length=0.04430136 pennation_angle_at_optimal=0.1291544 activation_time_constant=0.015
        deactivation_time_constant=0.05 fiber_damping=0 passive_fiber_strain_at_one_norm_force=0.6
        tendon_strain_at_one_norm_force=0.04
      PathPoint I_3_l_P1: pelvis (-0.02630441 0.0238887 -0.02024305)
      PathPoint T12_2_l_P2: torso (-0.02133292 0.06248256 -0.05600911)
    DeGrooteFregly2016Muscle QL_ant_I_3_12_3_l: max_isometric_force=40.627 optimal_fiber_length=0.07937709
        tendon_slack_length=0.04123249 pennation_angle_at_optimal=0.1291544 activation_time_constant=0.015
        deactivation_time_constant=0.05 fiber_damping=0 passive_fiber_strain_at_one_norm_force=0.6
        tendon_strain_at_one_norm_force=0.04
      PathPoint I_3_l_P2: pelvis (-0.02630441 0.0238887 -0.02024305)
      PathPoint T12_3_l_P3: torso (-0.0201454 0.05884579 -0.06685115)
    DeGrooteFregly2016Muscle MF_m1s_r: max_isometric_force=81.19739 optimal_fiber_length=0.03186049
        tendon_slack_length=0.01324537 pennation_angle_at_optimal=0 activation_time_constant=0.015
        deactivation_time_constant=0.05 fiber_damping=0 passive_fiber_strain_at_one_norm_force=0.6
        tendon_strain_at_one_norm_force=0.04
      PathPoint MF_m1s_r_P1: lumbar4 (-0.01749469 0.01717401 0.0212397)
      PathPoint MF_m1s_r_P2: lumbar1 (-0.01961526 -0.006891849 0.003646426)
    DeGrooteFregly2016Muscle MF_m1t_1_r: max_isometric_force=71.96337 optimal_fiber_length=0.04946991
        tendon_slack_length=0.01483533 pennation_angle_at_optimal=0 activation_time_constant=0.015
        deactivation_time_constant=0.05 fiber_damping=0 passive_fiber_strain_at_one_norm_force=0.6
        tendon_strain_at_one_norm_force=0.04
      PathPoint MF_m1t_1_r_P1: lumbar5 (-0.01060284 0.02067555 0.0213858)
      PathPoint MF_m1t_1_r_P2: lumbar1 (-0.02332626 -0.008484714 0.00376355)
    DeGrooteFregly2016Muscle MF_m1t_2_r: max_isometric_force=59.72683 optimal_fiber_length=0.06063825
        tendon_slack_length=0.01819147 pennation_angle_at_optimal=0 activation_time_constant=0.015
        deactivation_time_constant=0.05 fiber_damping=0 passive_fiber_strain_at_one_norm_force=0.6
        tendon_strain_at_one_norm_force=0.04
      PathPoint MF_m1t_2_r_P1: sacrum (-0.06437199 0.04451954 0.02552498)
      PathPoint MF_m1t_2_r_P2: lumbar1 (-0.02332626 -0.008482276 0.003767974)
    DeGrooteFregly2016Muscle MF_m1t_3_r: max_isometric_force=99.76112 optimal_fiber_length=0.08676686
        tendon_slack_length=0.02603006 pennation_angle_at_optimal=0 activation_time_constant=0.015
        deactivation_time_constant=0.05 fiber_damping=0 passive_fiber_strain_at_one_norm_force=0.6
        tendon_strain_at_one_norm_force=0.04
      PathPoint MF_m1t_3_r_P1: pelvis (-0.03546585 0.01458008 0.01472225)
      PathPoint MF_m1t_3_r_P2: lumbar1 (-0.02332626 -0.008482276 0.003767974)
    DeGrooteFregly2016Muscle MF_m2s_r: max_isometric_force=54.47881 optimal_fiber_length=0.03206885
        tendon_slack_length=0.01241939 pennation_angle_at_optimal=0 activation_time_constant=0.015
        deactivation_time_constant=0.05 fiber_damping=0 passive_fiber_strain_at_one_norm_force=0.6
        tendon_strain_at_one_norm_force=0.04
      PathPoint MF_m2s_r_P1: lumbar5 (-0.01060284 0.02120569 0.01921946)
      PathPoint MF_m2s_r_P2: lumbar2 (-0.02173583 -0.006233996 0.004861902)
    DeGrooteFregly2016Muscle MF_m2t_1_r: max_isometric_force=57.47237 optimal_fiber_length=0.04367267
        tendon_slack_length=0.01328914 pennation_angle_at_optimal=0 activation_time_constant=0.015
        deactivation_time_constant=0.05 fiber_damping=0 passive_fiber_strain_at_one_norm_force=0.6
        tendon_strain_at_one_norm_force=0.04
      PathPoint MF_m2t_1_r_P1: sacrum (-0.06401892 0.04517771 0.02483873)
      PathPoint MF_m2t_1_r_P2: lumbar2 (-0.0238564 -0.009749316 0.004861902)
    DeGrooteFregly2016Muscle MF_m2t_2_r: max_isometric_force=145.8914 optimal_fiber_length=0.07046885
        tendon_slack_length=0.02142736 pennation_angle_at_optimal=0 activation_time_constant=0.015
        deactivation_time_constant=0.05 fiber_damping=0 passive_fiber_strain_at_one_norm_force=0.6
        tendon_strain_at_one_norm_force=0.04
      PathPoint MF_m2t_2_r_P1: pelvis (-0.03596725 0.0131522 0.01441551)
      PathPoint MF_m2t_2_r_P2: lumbar2 (-0.0238564 -0.009749316 0.004424331)
    DeGrooteFregly2016Muscle MF_m2t_3_r: max_isometric_force=161.1852 optimal_fiber_length=0.07280515
        tendon_slack_length=0.02217628 pennation_angle_at_optimal=0 activation_time_constant=0.015
        deactivation_time_constant=0.05 fiber_damping=0 passive_fiber_strain_at_one_norm_force=0.6
        tendon_strain_at_one_norm_force=0.04
      PathPoint MF_m2t_3_r_P1: pelvis (-0.03677249 0.009662843 0.01380208)
      PathPoint MF_m2t_3_r_P2: lumbar2 (-0.02332626 -0.009933964 0.002875013)
    DeGrooteFregly2016Muscle MF_m3s_r: max_isometric_force=83.72206 optimal_fiber_length=0.03010245
        tendon_slack_length=0.01252671 pennation_angle_at_optimal=0 activation_time_constant=0.015
        deactivation_time_constant=0.05 fiber_damping=0 passive_fiber_strain_at_one_norm_force=0.6
        tendon_strain_at_one_norm_force=0.04
      PathPoint MF_m3s_r_P1: sacrum (-0.06467735 0.04453195 0.02309403)
      PathPoint MF_m3s_r_P2: lumbar3 (-0.02226597 -0.003421156 0.003533788)
    DeGrooteFregly2016Muscle MF_m3t_1_r: max_isometric_force=90.97846 optimal_fiber_length=0.06879945
        tendon_slack_length=0.02287216 pennation_angle_at_optimal=0 activation_time_constant=0.015
        deactivation_time_constant=0.05 fiber_damping=0 passive_fiber_strain_at_one_norm_force=0.6
        tendon_strain_at_one_norm_force=0.04
      PathPoint MF_m3t_1_r_P1: pelvis (-0.04130731 0.0005606059 0.005018191)
      PathPoint MF_m3t_1_r_P2: lumbar3 (-0.02544683 -0.00542081 0.00202029)
    DeGrooteFregly2016Muscle MF_m3t_2_r: max_isometric_force=90.97846 optimal_fiber_length=0.06605253
        tendon_slack_length=0.02199431 pennation_angle_at_optimal=0 activation_time_constant=0.015
        deactivation_time_constant=0.05 fiber_damping=0 passive_fiber_strain_at_one_norm_force=0.6
        tendon_strain_at_one_norm_force=0.04
      PathPoint MF_m3t_2_r_P1: pelvis (-0.03947083 0.005724376 0.006782066)
      PathPoint MF_m3t_2_r_P2: lumbar3 (-0.02544683 -0.005423355 0.003233165)
    DeGrooteFregly2016Muscle MF_m3t_3_r: max_isometric_force=90.97846 optimal_fiber_length=0.06593987
        tendon_slack_length=0.0219568 pennation_angle_at_optimal=0 activation_time_constant=0.015
        deactivation_time_constant=0.05 fiber_damping=0 passive_fiber_strain_at_one_norm_force=0.6
        tendon_strain_at_one_norm_force=0.04
      PathPoint MF_m3t_3_r_P1: pelvis (-0.03945661 0.005636658 0.006747684)
      PathPoint MF_m3t_3_r_P2: lumbar3 (-0.02544683 -0.005423355 0.003233165)
    DeGrooteFregly2016Muscle MF_m4s_r: max_isometric_force=101.066 optimal_fiber_length=0.02654367
        tendon_slack_length=0.01676768 pennation_angle_at_optimal=0 activation_time_constant=0.015
        deactivation_time_constant=0.05 fiber_damping=0 passive_fiber_strain_at_one_norm_force=0.6
        tendon_strain_at_one_norm_force=0.04
      PathPoint MF_m4s_r_P1: sacrum (-0.07617561 0.02900403 0.02187856)
      PathPoint MF_m4s_r_P2: lumbar4 (-0.01908512 -0.0001140972 0.002726117)
    DeGrooteFregly2016Muscle MF_m4t_1_r: max_isometric_force=90.11722 optimal_fiber_length=0.03498531
        tendon_slack_length=0.01416478 pennation_angle_at_optimal=0 activation_time_constant=0.015
        deactivation_time_constant=0.05 fiber_damping=0 passive_fiber_strain_at_one_norm_force=0.6
        tendon_strain_at_one_norm_force=0.04
      PathPoint MF_m4t_1_r_P1: sacrum (-0.08070514 0.02201495 0.01866812)
      PathPoint MF_m4t_1_r_P2: lumbar4 (-0.02279612 8.917523e-5 0.003500788)
    DeGrooteFregly2016Muscle MF_m4t_2_r: max_isometric_force=90.11722 optimal_fiber_length=0.05266977
        tendon_slack_length=0.02134374 pennation_angle_at_optimal=0 activation_time_constant=0.015
        deactivation_time_constant=0.05 fiber_damping=0 passive_fiber_strain_at_one_norm_force=0.6
        tendon_strain_at_one_norm_force=0.04
      PathPoint MF_m4t_2_r_P1: pelvis (-0.04053026 0.002147298 0.004907406)
      PathPoint MF_m4t_2_r_P2: lumbar4 (-0.02332626 9.012418e-5 0.003500569)
    DeGrooteFregly2016Muscle MF_m4t_3_r: max_isometric_force=90.11722 optimal_fiber_length=0.05363754
        tendon_slack_length=0.02170069 pennation_angle_at_optimal=0 activation_time_constant=0.015
        deactivation_time_constant=0.05 fiber_damping=0 passive_fiber_strain_at_one_norm_force=0.6
        tendon_strain_at_one_norm_force=0.04
      PathPoint MF_m4t_3_r_P1: pelvis (-0.04294597 -0.001073649 0.00429398)
      PathPoint MF_m4t_3_r_P2: lumbar4 (-0.0238564 9.012418e-5 0.003500569)
    DeGrooteFregly2016Muscle MF_m5s_r: max_isometric_force=34.87635 optimal_fiber_length=0.009588926
        tendon_slack_length=0.006066463 pennation_angle_at_optimal=0 activation_time_constant=0.015
        deactivation_time_constant=0.05 fiber_damping=0 passive_fiber_strain_at_one_norm_force=0.6
        tendon_strain_at_one_norm_force=0.04
      PathPoint MF_m5s_r_P1: sacrum (-0.06915971 0.03513268 0.01458571)
      PathPoint MF_m5s_r_P2: lumbar5 (-0.01643441 0.009012418 0.004776016)
    DeGrooteFregly2016Muscle MF_m5t_1_r: max_isometric_force=34.87635 optimal_fiber_length=0.04079581
        tendon_slack_length=0.01647936 pennation_angle_at_optimal=0 activation_time_constant=0.015
        deactivation_time_constant=0.05 fiber_damping=0 passive_fiber_strain_at_one_norm_force=0.6
        tendon_strain_at_one_norm_force=0.04
      PathPoint MF_m5t_1_r_P1: sacrum (-0.09228027 0.00277223 0.01219499)
      PathPoint MF_m5t_1_r_P2: lumbar5 (-0.01882535 0.008939789 0.003556384)
    DeGrooteFregly2016Muscle MF_m5t_2_r: max_isometric_force=34.87635 optimal_fiber_length=0.03116711
        tendon_slack_length=0.01262048 pennation_angle_at_optimal=0 activation_time_constant=0.015
        deactivation_time_constant=0.05 fiber_damping=0 passive_fiber_strain_at_one_norm_force=0.6
        tendon_strain_at_one_norm_force=0.04
      PathPoint MF_m5t_2_r_P1: sacrum (-0.08647468 0.0136044 0.01423079)
      PathPoint MF_m5t_2_r_P2: lumbar5 (-0.01831726 0.008444477 0.003368654)
    DeGrooteFregly2016Muscle MF_m5t_3_r: max_isometric_force=34.87635 optimal_fiber_length=0.02313173
        tendon_slack_length=0.009377728 pennation_angle_at_optimal=0 activation_time_constant=0.015
        deactivation_time_constant=0.05 fiber_damping=0 passive_fiber_strain_at_one_norm_force=0.6
        tendon_strain_at_one_norm_force=0.04
      PathPoint MF_m5t_3_r_P1: sacrum (-0.08072794 0.02257579 0.0140955)
      PathPoint MF_m5t_3_r_P2: lumbar5 (-0.01740075 0.008083079 0.002820912)
    DeGrooteFregly2016Muscle MF_m1_laminar_r: max_isometric_force=39.05418 optimal_fiber_length=0.02237649
        tendon_slack_length=0.008489726 pennation_angle_at_optimal=0 activation_time_constant=0.015
        deactivation_time_constant=0.05 fiber_damping=0 passive_fiber_strain_at_one_norm_force=0.6
        tendon_strain_at_one_norm_force=0.04
      PathPoint MF_m1_laminar_r_P1: lumbar3 (-0.02120569 0.01325356 0.02187856)
      PathPoint MF_m1_laminar_r_P2: lumbar1 (-0.01855498 -0.00297158 0.009723804)
    DeGrooteFregly2016Muscle MF_m2_laminar_r: max_isometric_force=30.97457 optimal_fiber_length=0.01970271
        tendon_slack_length=0.007475627 pennation_angle_at_optimal=0 activation_time_constant=0.015
        deactivation_time_constant=0.05 fiber_damping=0 passive_fiber_strain_at_one_norm_force=0.6
        tendon_strain_at_one_norm_force=0.04
      PathPoint MF_m2_laminar_r_P1: lumbar4 (-0.01749469 0.01802484 0.02059015)
      PathPoint MF_m2_laminar_r_P2: lumbar2 (-0.01908512 -0.003180853 0.008508328)
    DeGrooteFregly2016Muscle MF_m3_laminar_r: max_isometric_force=35.77736 optimal_fiber_length=0.02119967
        tendon_slack_length=0.008069966 pennation_angle_at_optimal=0 activation_time_constant=0.015
        deactivation_time_constant=0.05 fiber_damping=0 passive_fiber_strain_at_one_norm_force=0.6
        tendon_strain_at_one_norm_force=0.04
      PathPoint MF_m3_laminar_r_P1: lumbar5 (-0.01166313 0.02067555 0.01944761)
      PathPoint MF_m3_laminar_r_P2: lumbar3 (-0.0201454 0.0003660367 0.007718269)
    DeGrooteFregly2016Muscle MF_m4_laminar_r: max_isometric_force=25.94666 optimal_fiber_length=0.02234682
        tendon_slack_length=0.008516123 pennation_angle_at_optimal=0 activation_time_constant=0.015
        deactivation_time_constant=0.05 fiber_damping=0 passive_fiber_strain_at_one_norm_force=0.6
        tendon_strain_at_one_norm_force=0.04
      PathPoint MF_m4_laminar_r_P1: sacrum (-0.06785821 0.04107961 0.02187856)
      PathPoint MF_m4_laminar_r_P2: lumbar4 (-0.01802484 0.00308195 0.0084354)
    DeGrooteFregly2016Muscle MF_m5_laminar_r: max_isometric_force=55.93696 optimal_fiber_length=0.03038078
        tendon_slack_length=0.01151147 pennation_angle_at_optimal=0 activation_time_constant=0.015
        deactivation_time_constant=0.05 fiber_damping=0 passive_fiber_strain_at_one_norm_force=0.6
        tendon_strain_at_one_norm_force=0.04
      PathPoint MF_m5_laminar_r_P1: pelvis (-0.0370409 0.01207855 0.003680555)
      PathPoint MF_m5_laminar_r_P2: lumbar5 (-0.01537412 0.00954256 0.006855282)
    DeGrooteFregly2016Muscle MF_m1s_l: max_isometric_force=81.19739 optimal_fiber_length=0.03161779
        tendon_slack_length=0.01314448 pennation_angle_at_optimal=0 activation_time_constant=0.015
        deactivation_time_constant=0.05 fiber_damping=0 passive_fiber_strain_at_one_norm_force=0.6
        tendon_strain_at_one_norm_force=0.04
      PathPoint MF_m1s_l_P1: lumbar4 (-0.01749469 0.01696455 -0.02066308)
      PathPoint MF_m1s_l_P2: lumbar1 (-0.01961526 -0.006891849 -0.003646426)
    DeGrooteFregly2016Muscle MF_m1t_1_l: max_isometric_force=71.96337 optimal_fiber_length=0.04930713
        tendon_slack_length=0.01478652 pennation_angle_at_optimal=0 activation_time_constant=0.015
        deactivation_time_constant=0.05 fiber_damping=0 passive_fiber_strain_at_one_norm_force=0.6
        tendon_strain_at_one_norm_force=0.04
      PathPoint MF_m1t_1_l_P1: lumbar5 (-0.009879041 0.0195992 -0.02138021)
      PathPoint MF_m1t_1_l_P2: lumbar1 (-0.02332626 -0.008484714 -0.003767974)
    DeGrooteFregly2016Muscle MF_m1t_2_l: max_isometric_force=59.72683 optimal_fiber_length=0.06063825
        tendon_slack_length=0.01819147 pennation_angle_at_optimal=0 activation_time_constant=0.015
        deactivation_time_constant=0.05 fiber_damping=0 passive_fiber_strain_at_one_norm_force=0.6
        tendon_strain_at_one_norm_force=0.04
      PathPoint MF_m1t_2_l_P1: sacrum (-0.06437199 0.04451954 -0.02552498)
      PathPoint MF_m1t_2_l_P2: lumbar1 (-0.02332626 -0.008482276 -0.003767974)
    DeGrooteFregly2016Muscle MF_m1t_3_l: max_isometric_force=99.76112 optimal_fiber_length=0.08663837
        tendon_slack_length=0.02599151 pennation_angle_at_optimal=0 activation_time_constant=0.015
        deactivation_time_constant=0.05 fiber_damping=0 passive_fiber_strain_at_one_norm_force=0.6
        tendon_strain_at_one_norm_force=0.04
      PathPoint MF_m1t_3_l_P1: pelvis (-0.03543042 0.01449426 -0.01472222)
      PathPoint MF_m1t_3_l_P2: lumbar1 (-0.02332626 -0.008482276 -0.003767974)
    DeGrooteFregly2016Muscle MF_m2s_l: max_isometric_force=54.47881 optimal_fiber_length=0.03209093
        tendon_slack_length=0.01242794 pennation_angle_at_optimal=0 activation_time_constant=0.015
        deactivation_time_constant=0.05 fiber_damping=0 passive_fiber_strain_at_one_norm_force=0.6
        tendon_strain_at_one_norm_force=0.04
      PathPoint MF_m2s_l_P1: lumbar5 (-0.01060284 0.02120569 -0.01921667)
      PathPoint MF_m2s_l_P2: lumbar2 (-0.02173583 -0.006361707 -0.004861902)
    DeGrooteFregly2016Muscle MF_m2t_1_l: max_isometric_force=57.47237 optimal_fiber_length=0.0445756
        tendon_slack_length=0.01356389 pennation_angle_at_optimal=0 activation_time_constant=0.015
        deactivation_time_constant=0.05 fiber_damping=0 passive_fiber_strain_at_one_norm_force=0.6
        tendon_strain_at_one_norm_force=0.04
      PathPoint MF_m2t_1_l_P1: sacrum (-0.06401892 0.04517771 -0.02674046)
      PathPoint MF_m2t_1_l_P2: lumbar2 (-0.0238564 -0.009749316 -0.004424331)
    DeGrooteFregly2016Muscle MF_m2t_2_l: max_isometric_force=145.8914 optimal_fiber_length=0.07046885
        tendon_slack_length=0.02142736 pennation_angle_at_optimal=0 activation_time_constant=0.015
        deactivation_time_constant=0.05 fiber_damping=0 passive_fiber_strain_at_one_norm_force=0.6
        tendon_strain_at_one_norm_force=0.04
      PathPoint MF_m2t_2_l_P1: pelvis (-0.03596725 0.0131522 -0.01441551)
      PathPoint MF_m2t_2_l_P2: lumbar2 (-0.0238564 -0.009749316 -0.004424331)
    DeGrooteFregly2016Muscle MF_m2t_3_l: max_isometric_force=161.1852 optimal_fiber_length=0.07293682
        tendon_slack_length=0.02221639 pennation_angle_at_optimal=0 activation_time_constant=0.015
        deactivation_time_constant=0.05 fiber_damping=0 passive_fiber_strain_at_one_norm_force=0.6
        tendon_strain_at_one_norm_force=0.04
      PathPoint MF_m2t_3_l_P1: pelvis (-0.03677249 0.009662843 -0.01380208)
      PathPoint MF_m2t_3_l_P2: lumbar2 (-0.02332626 -0.009933964 -0.004424331)
    DeGrooteFregly2016Muscle MF_m3s_l: max_isometric_force=83.72206 optimal_fiber_length=0.03002861
        tendon_slack_length=0.01249598 pennation_angle_at_optimal=0 activation_time_constant=0.015
        deactivation_time_constant=0.05 fiber_damping=0 passive_fiber_strain_at_one_norm_force=0.6
        tendon_strain_at_one_norm_force=0.04
      PathPoint MF_m3s_l_P1: sacrum (-0.06441811 0.04433887 -0.02309403)
      PathPoint MF_m3s_l_P2: lumbar3 (-0.01908512 -0.003180853 -0.003646426)
    DeGrooteFregly2016Muscle MF_m3t_1_l: max_isometric_force=90.97846 optimal_fiber_length=0.06881181
        tendon_slack_length=0.02287627 pennation_angle_at_optimal=0 activation_time_constant=0.015
        deactivation_time_constant=0.05 fiber_damping=0 passive_fiber_strain_at_one_norm_force=0.6
        tendon_strain_at_one_norm_force=0.04
      PathPoint MF_m3t_1_l_P1: pelvis (-0.04133549 0.0005368246 -0.004907406)
      PathPoint MF_m3t_1_l_P2: lumbar3 (-0.02544683 -0.00542081 -0.003537034)
    DeGrooteFregly2016Muscle MF_m3t_2_l: max_isometric_force=90.97846 optimal_fiber_length=0.06595959
        tendon_slack_length=0.02196336 pennation_angle_at_optimal=0 activation_time_constant=0.015
        deactivation_time_constant=0.05 fiber_damping=0 passive_fiber_strain_at_one_norm_force=0.6
        tendon_strain_at_one_norm_force=0.04
      PathPoint MF_m3t_2_l_P1: pelvis (-0.03945661 0.005636658 -0.006701677)
      PathPoint MF_m3t_2_l_P2: lumbar3 (-0.02544683 -0.005423355 -0.003233165)
    DeGrooteFregly2016Muscle MF_m3t_3_l: max_isometric_force=90.97846 optimal_fiber_length=0.06595959
        tendon_slack_length=0.02196336 pennation_angle_at_optimal=0 activation_time_constant=0.015
        deactivation_time_constant=0.05 fiber_damping=0 passive_fiber_strain_at_one_norm_force=0.6
        tendon_strain_at_one_norm_force=0.04
      PathPoint MF_m3t_3_l_P1: pelvis (-0.03945661 0.005636658 -0.006701677)
      PathPoint MF_m3t_3_l_P2: lumbar3 (-0.02544683 -0.005423355 -0.003233165)
    DeGrooteFregly2016Muscle MF_m4s_l: max_isometric_force=101.066 optimal_fiber_length=0.02664349
        tendon_slack_length=0.01683073 pennation_angle_at_optimal=0 activation_time_constant=0.015
        deactivation_time_constant=0.05 fiber_damping=0 passive_fiber_strain_at_one_norm_force=0.6
        tendon_strain_at_one_norm_force=0.04
      PathPoint MF_m4s_l_P1: sacrum (-0.07617561 0.02900403 -0.02187856)
      PathPoint MF_m4s_l_P2: lumbar4 (-0.01908512 -0.0001140972 -0.002430951)
    DeGrooteFregly2016Muscle MF_m4t_1_l: max_isometric_force=90.11722 optimal_fiber_length=0.03486173
        tendon_slack_length=0.01411475 pennation_angle_at_optimal=0 activation_time_constant=0.015
        deactivation_time_constant=0.05 fiber_damping=0 passive_fiber_strain_at_one_norm_force=0.6
        tendon_strain_at_one_norm_force=0.04
      PathPoint MF_m4t_1_l_P1: sacrum (-0.08058162 0.02226597 -0.01823213)
      PathPoint MF_m4t_1_l_P2: lumbar4 (-0.02279612 0 -0.003646426)
    DeGrooteFregly2016Muscle MF_m4t_2_l: max_isometric_force=90.11722 optimal_fiber_length=0.05266977
        tendon_slack_length=0.02134374 pennation_angle_at_optimal=0 activation_time_constant=0.015
        deactivation_time_constant=0.05 fiber_damping=0 passive_fiber_strain_at_one_norm_force=0.6
        tendon_strain_at_one_norm_force=0.04
      PathPoint MF_m4t_2_l_P1: pelvis (-0.04053026 0.002147298 -0.004907406)
      PathPoint MF_m4t_2_l_P2: lumbar4 (-0.02332626 9.012418e-5 -0.003500569)
    DeGrooteFregly2016Muscle MF_m4t_3_l: max_isometric_force=90.11722 optimal_fiber_length=0.05326374
        tendon_slack_length=0.02154945 pennation_angle_at_optimal=0 activation_time_constant=0.015
        deactivation_time_constant=0.05 fiber_damping=0 passive_fiber_strain_at_one_norm_force=0.6
        tendon_strain_at_one_norm_force=0.04
      PathPoint MF_m4t_3_l_P1: pelvis (-0.04294597 -0.001073649 -0.00429398)
      PathPoint MF_m4t_3_l_P2: lumbar4 (-0.02337927 9.012418e-5 -0.003646426)
    DeGrooteFregly2016Muscle MF_m5s_l: max_isometric_force=34.87635 optimal_fiber_length=0.009563891
        tendon_slack_length=0.006050625 pennation_angle_at_optimal=0 activation_time_constant=0.015
        deactivation_time_constant=0.05 fiber_damping=0 passive_fiber_strain_at_one_norm_force=0.6
        tendon_strain_at_one_norm_force=0.04
      PathPoint MF_m5s_l_P1: sacrum (-0.06915971 0.03513268 -0.01458571)
      PathPoint MF_m5s_l_P2: lumbar5 (-0.01643441 0.009012418 -0.004861902)
    DeGrooteFregly2016Muscle MF_m5t_1_l: max_isometric_force=34.87635 optimal_fiber_length=0.04079481
        tendon_slack_length=0.01647895 pennation_angle_at_optimal=0 activation_time_constant=0.015
        deactivation_time_constant=0.05 fiber_damping=0 passive_fiber_strain_at_one_norm_force=0.6
        tendon_strain_at_one_norm_force=0.04
      PathPoint MF_m5t_1_l_P1: sacrum (-0.09228027 0.00277223 -0.01219122)
      PathPoint MF_m5t_1_l_P2: lumbar5 (-0.01882535 0.008939789 -0.003561343)
    DeGrooteFregly2016Muscle MF_m5t_2_l: max_isometric_force=34.87635 optimal_fiber_length=0.03113166
        tendon_slack_length=0.01260613 pennation_angle_at_optimal=0 activation_time_constant=0.015
        deactivation_time_constant=0.05 fiber_damping=0 passive_fiber_strain_at_one_norm_force=0.6
        tendon_strain_at_one_norm_force=0.04
      PathPoint MF_m5t_2_l_P1: sacrum (-0.08647468 0.0136044 -0.01423322)
      PathPoint MF_m5t_2_l_P2: lumbar5 (-0.01831726 0.008444477 -0.003561343)
    DeGrooteFregly2016Muscle MF_m5t_3_l: max_isometric_force=34.87635 optimal_fiber_length=0.02299483
        tendon_slack_length=0.009322229 pennation_angle_at_optimal=0 activation_time_constant=0.015
        deactivation_time_constant=0.05 fiber_damping=0 passive_fiber_strain_at_one_norm_force=0.6
        tendon_strain_at_one_norm_force=0.04
      PathPoint MF_m5t_3_l_P1: sacrum (-0.08072794 0.02257579 -0.01409952)
      PathPoint MF_m5t_3_l_P2: lumbar5 (-0.01740075 0.008083079 -0.003366867)
    DeGrooteFregly2016Muscle MF_m1_laminar_l: max_isometric_force=39.05418 optimal_fiber_length=0.02241113
        tendon_slack_length=0.008502869 pennation_angle_at_optimal=0 activation_time_constant=0.015
        deactivation_time_constant=0.05 fiber_damping=0 passive_fiber_strain_at_one_norm_force=0.6
        tendon_strain_at_one_norm_force=0.04
      PathPoint MF_m1_laminar_l_P1: lumbar3 (-0.02120569 0.01339669 -0.02187856)
      PathPoint MF_m1_laminar_l_P2: lumbar1 (-0.01855498 -0.00297158 -0.009723804)
    DeGrooteFregly2016Muscle MF_m2_laminar_l: max_isometric_force=30.97457 optimal_fiber_length=0.01961976
        tendon_slack_length=0.007444153 pennation_angle_at_optimal=0 activation_time_constant=0.015
        deactivation_time_constant=0.05 fiber_damping=0 passive_fiber_strain_at_one_norm_force=0.6
        tendon_strain_at_one_norm_force=0.04
      PathPoint MF_m2_laminar_l_P1: lumbar4 (-0.01749469 0.01776173 -0.02059015)
      PathPoint MF_m2_laminar_l_P2: lumbar2 (-0.01908512 -0.003180853 -0.008508328)
    DeGrooteFregly2016Muscle MF_m3_laminar_l: max_isometric_force=35.77736 optimal_fiber_length=0.02145455
        tendon_slack_length=0.008166989 pennation_angle_at_optimal=0 activation_time_constant=0.015
        deactivation_time_constant=0.05 fiber_damping=0 passive_fiber_strain_at_one_norm_force=0.6
        tendon_strain_at_one_norm_force=0.04
      PathPoint MF_m3_laminar_l_P1: lumbar5 (-0.01166313 0.02067555 -0.01965424)
      PathPoint MF_m3_laminar_l_P2: lumbar3 (-0.0201454 0.0005301422 -0.007292853)
    DeGrooteFregly2016Muscle MF_m4_laminar_l: max_isometric_force=25.94666 optimal_fiber_length=0.02234682
        tendon_slack_length=0.008516123 pennation_angle_at_optimal=0 activation_time_constant=0.015
        deactivation_time_constant=0.05 fiber_damping=0 passive_fiber_strain_at_one_norm_force=0.6
        tendon_strain_at_one_norm_force=0.04
      PathPoint MF_m4_laminar_l_P1: sacrum (-0.06785821 0.04107961 -0.02187856)
      PathPoint MF_m4_laminar_l_P2: lumbar4 (-0.01802484 0.00308195 -0.0084354)
    DeGrooteFregly2016Muscle MF_m5_laminar_l: max_isometric_force=55.93696 optimal_fiber_length=0.03031204
        tendon_slack_length=0.01148542 pennation_angle_at_optimal=0 activation_time_constant=0.015
        deactivation_time_constant=0.05 fiber_damping=0 passive_fiber_strain_at_one_norm_force=0.6
        tendon_strain_at_one_norm_force=0.04
      PathPoint MF_m5_laminar_l_P1: pelvis (-0.0370409 0.01207855 -0.003797106)
      PathPoint MF_m5_laminar_l_P2: lumbar5 (-0.01537412 0.00954256 -0.006855282)
    DeGrooteFregly2016Muscle IL_L1_r: max_isometric_force=147.4443 optimal_fiber_length=0.03725678
        tendon_slack_length=0.08444871 pennation_angle_at_optimal=0.2408554 activation_time_constant=0.015
        deactivation_time_constant=0.05 fiber_damping=0 passive_fiber_strain_at_one_norm_force=0.6
        tendon_strain_at_one_norm_force=0.04
      PathPoint IL_L1_r_P1: pelvis (-0.03864949 0.01046811 0.01543137)
      PathPoint IL_L1_r_P2: lumbar1 (-0.01643441 0.009012418 0.03524879)
    DeGrooteFregly2016Muscle IL_L2_r: max_isometric_force=183.2164 optimal_fiber_length=0.03008687
        tendon_slack_length=0.06827119 pennation_angle_at_optimal=0.2408554 activation_time_constant=0.015
        deactivation_time_constant=0.05 fiber_damping=0 passive_fiber_strain_at_one_norm_force=0.6
        tendon_strain_at_one_norm_force=0.04
      PathPoint IL_L2_r_P1: pelvis (-0.03650407 0.01503109 0.01686921)
      PathPoint IL_L2_r_P2: lumbar2 (-0.01720312 0.006845727 0.03767974)
      PathWrap: wrap_object=Cylinder method=hybrid
    DeGrooteFregly2016Muscle IL_L3_r: max_isometric_force=216.7631 optimal_fiber_length=0.02366418
        tendon_slack_length=0.05375023 pennation_angle_at_optimal=0.2408554 activation_time_constant=0.015
        deactivation_time_constant=0.05 fiber_damping=0 passive_fiber_strain_at_one_norm_force=0.6
        tendon_strain_at_one_norm_force=0.04
      PathPoint IL_L3_r_P1: pelvis (-0.0327463 0.01825204 0.01840277)
      PathPoint IL_L3_r_P2: lumbar3 (-0.01679899 0.01162819 0.03784857)
      PathWrap: wrap_object=Cylinder method=hybrid
    DeGrooteFregly2016Muscle IL_L4_r: max_isometric_force=414.9096 optimal_fiber_length=0.01904325
        tendon_slack_length=0.04317827 pennation_angle_at_optimal=0.2408554 activation_time_constant=0.015
        deactivation_time_constant=0.05 fiber_damping=0 passive_fiber_strain_at_one_norm_force=0.6
        tendon_strain_at_one_norm_force=0.04
      PathPoint IL_L4_r_P1: pelvis (-0.03140424 0.0174468 0.01717592)
      PathPoint IL_L4_r_P2: lumbar4 (-0.01259968 0.01461273 0.03767974)
      PathWrap: wrap_object=Cylinder method=hybrid
    DeGrooteFregly2016Muscle IL_L1_l: max_isometric_force=147.4443 optimal_fiber_length=0.03727184
        tendon_slack_length=0.08448283 pennation_angle_at_optimal=0.2408554 activation_time_constant=0.015
        deactivation_time_constant=0.05 fiber_damping=0 passive_fiber_strain_at_one_norm_force=0.6
        tendon_strain_at_one_norm_force=0.04
      PathPoint IL_L1_l_P1: pelvis (-0.03865137 0.01046808 -0.01533564)
      PathPoint IL_L1_l_P2: lumbar1 (-0.01643441 0.009012418 -0.03524879)
    DeGrooteFregly2016Muscle IL_L2_l: max_isometric_force=183.2164 optimal_fiber_length=0.03003316
        tendon_slack_length=0.06814931 pennation_angle_at_optimal=0.2408554 activation_time_constant=0.015
        deactivation_time_constant=0.05 fiber_damping=0 passive_fiber_strain_at_one_norm_force=0.6
        tendon_strain_at_one_norm_force=0.04
      PathPoint IL_L2_l_P1: pelvis (-0.03650407 0.01503109 -0.01686921)
      PathPoint IL_L2_l_P2: lumbar2 (-0.01696455 0.006891849 -0.03767974)
      PathWrap: wrap_object=Cylinder method=hybrid
    DeGrooteFregly2016Muscle IL_L3_l: max_isometric_force=216.7631 optimal_fiber_length=0.02356074
        tendon_slack_length=0.05351528 pennation_angle_at_optimal=0.2408554 activation_time_constant=0.015
        deactivation_time_constant=0.05 fiber_damping=0 passive_fiber_strain_at_one_norm_force=0.6
        tendon_strain_at_one_norm_force=0.04
      PathPoint IL_L3_l_P1: pelvis (-0.0327463 0.01825204 -0.01840277)
      PathPoint IL_L3_l_P2: lumbar3 (-0.01696455 0.01166313 -0.03711953)
      PathWrap: wrap_object=Cylinder method=hybrid
    DeGrooteFregly2016Muscle IL_L4_l: max_isometric_force=414.9096 optimal_fiber_length=0.01901736
        tendon_slack_length=0.04311957 pennation_angle_at_optimal=0.2408554 activation_time_constant=0.015
        deactivation_time_constant=0.05 fiber_damping=0 passive_fiber_strain_at_one_norm_force=0.6
        tendon_strain_at_one_norm_force=0.04
      PathPoint IL_L4_l_P1: pelvis (-0.03140424 0.0174468 -0.01717592)
      PathPoint IL_L4_l_P2: lumbar4 (-0.01272341 0.01484398 -0.03767974)
      PathWrap: wrap_object=Cylinder method=hybrid
    DeGrooteFregly2016Muscle IL_R5_r: max_isometric_force=57.32231 optimal_fiber_length=0.1177588
        tendon_slack_length=0.1648751 pennation_angle_at_optimal=0.2408554 activation_time_constant=0.015
        deactivation_time_constant=0.05 fiber_damping=0 passive_fiber_strain_at_one_norm_force=0.6
        tendon_strain_at_one_norm_force=0.04
      PathPoint IL_r5_R_P1: pelvis (-0.03650407 0.01181014 0.01502893)
      PathPoint IL_r5_R_P2: lumbar2 (-0.02631085 0.001060284 0.06806663)
      PathPoint IL_r5_R_P3: torso (-0.04188124 0.09118446 0.0692821)
      PathPoint IL_r5_R_P4: torso (-0.04241138 0.1060284 0.0692821)
      PathPoint IL_r5_R_P5: torso (-0.04294152 0.1256437 0.07049758)
      PathPoint IL_r5_R_P6: torso (-0.04188124 0.1404877 0.07171305)
      PathPoint IL_r5_R_P7: torso (-0.04029081 0.1521508 0.07171305)
      PathPoint IL_r5_R_P8: torso (-0.03710996 0.1632838 0.07292853)
    DeGrooteFregly2016Muscle IL_R6_r: max_isometric_force=72.69179 optimal_fiber_length=0.1201877
        tendon_slack_length=0.1451792 pennation_angle_at_optimal=0.2408554 activation_time_constant=0.015
        deactivation_time_constant=0.05 fiber_damping=0 passive_fiber_strain_at_one_norm_force=0.6
        tendon_strain_at_one_norm_force=0.04
      PathPoint IL_r6_R_P1: pelvis (-0.03462519 0.01583633 0.01625578)
      PathPoint IL_r6_R_P2: lumbar2 (-0.02609058 0.00125438 0.07049758)
      PathPoint IL_r6_R_P3: torso (-0.04188124 0.09065432 0.07292853)
      PathPoint IL_r6_R_P4: torso (-0.04241138 0.1070887 0.07292853)
      PathPoint IL_r6_R_P5: torso (-0.04294152 0.1272341 0.074144)
      PathPoint IL_r6_R_P6: torso (-0.04082095 0.1420781 0.07535948)
      PathPoint IL_r6_R_P7: torso (-0.0376401 0.1495001 0.07657495)
    DeGrooteFregly2016Muscle IL_R7_r: max_isometric_force=87.65739 optimal_fiber_length=0.1233715
        tendon_slack_length=0.129628 pennation_angle_at_optimal=0.2408554 activation_time_constant=0.015
        deactivation_time_constant=0.05 fiber_damping=0 passive_fiber_strain_at_one_norm_force=0.6
        tendon_strain_at_one_norm_force=0.04
      PathPoint IL_r7_R_P1: pelvis (-0.03194106 0.01852045 0.01778935)
      PathPoint IL_r7_R_P2: lumbar2 (-0.02579932 0.001258489 0.074144)
      PathPoint IL_r7_R_P3: torso (-0.04241138 0.09118446 0.07657495)
      PathPoint IL_r7_R_P4: torso (-0.04241138 0.1065586 0.07657495)
      PathPoint IL_r7_R_P5: torso (-0.04294152 0.126704 0.07779043)
      PathPoint IL_r7_R_P6: torso (-0.03976067 0.1383671 0.0790059)
    DeGrooteFregly2016Muscle IL_R8_r: max_isometric_force=77.91768 optimal_fiber_length=0.118396
        tendon_slack_length=0.1195704 pennation_angle_at_optimal=0.2408554 activation_time_constant=0.015
        deactivation_time_constant=0.05 fiber_damping=0 passive_fiber_strain_at_one_norm_force=0.6
        tendon_strain_at_one_norm_force=0.04
      PathPoint IL_r8_R_P1: pelvis (-0.03247789 0.01905727 0.01840277)
      PathPoint IL_r8_R_P2: lumbar2 (-0.02544683 0.001590427 0.07779043)
      PathPoint IL_r8_R_P3: torso (-0.04188124 0.08853375 0.0790059)
      PathPoint IL_r8_R_P4: torso (-0.04299777 0.1065586 0.0790059)
      PathPoint IL_r8_R_P5: torso (-0.04188124 0.1214026 0.08022138)
    DeGrooteFregly2016Muscle IL_R9_r: max_isometric_force=95.91499 optimal_fiber_length=0.1456194
        tendon_slack_length=0.08568147 pennation_angle_at_optimal=0.2408554 activation_time_constant=0.015
        deactivation_time_constant=0.05 fiber_damping=0 passive_fiber_strain_at_one_norm_force=0.6
        tendon_strain_at_one_norm_force=0.04
      PathPoint IL_r9_R_P1: pelvis (-0.03194106 0.02013092 0.01840277)
      PathPoint IL_r9_R_P2: lumbar2 (-0.02544683 0.001590427 0.08022138)
      PathPoint IL_r9_R_P3: torso (-0.04241138 0.08959404 0.08265233)
      PathPoint IL_r9_R_P4: torso (-0.04029081 0.1023175 0.08265233)
    DeGrooteFregly2016Muscle IL_R10_r: max_isometric_force=191.842 optimal_fiber_length=0.1358934
        tendon_slack_length=0.07998157 pennation_angle_at_optimal=0.2408554 activation_time_constant=0.015
        deactivation_time_constant=0.05 fiber_damping=0 passive_fiber_strain_at_one_norm_force=0.6
        tendon_strain_at_one_norm_force=0.04
      PathPoint IL_r10_R_P1: pelvis (-0.03140424 0.01932569 0.0190162)
      PathPoint IL_r10_R_P2: lumbar2 (-0.02549364 0.001392599 0.08386781)
      PathPoint IL_r10_R_P3: torso (-0.03976067 0.08217205 0.08508328)
    DeGrooteFregly2016Muscle IL_R11_r: max_isometric_force=235.1806 optimal_fiber_length=0.128561
        tendon_slack_length=0.06437489 pennation_angle_at_optimal=0.2408554 activation_time_constant=0.015
        deactivation_time_constant=0.05 fiber_damping=0 passive_fiber_strain_at_one_norm_force=0.6
        tendon_strain_at_one_norm_force=0.04
      PathPoint IL_r11_R_P1: pelvis (-0.03033059 0.02120457 0.01962962)
      PathPoint IL_r11_R_P2: lumbar2 (-0.02541878 0.001433171 0.08751423)
      PathPoint IL_r11_R_P3: torso (-0.03286882 0.06626778 0.08994518)
    DeGrooteFregly2016Muscle IL_R12_r: max_isometric_force=206.1732 optimal_fiber_length=0.1018158
        tendon_slack_length=0.05095845 pennation_angle_at_optimal=0.2408554 activation_time_constant=0.015
        deactivation_time_constant=0.05 fiber_damping=0 passive_fiber_strain_at_one_norm_force=0.6
        tendon_strain_at_one_norm_force=0.04
      PathPoint IL_r12_R_P1: pelvis (-0.02979377 0.02200981 0.02054976)
      PathPoint IL_r12_R_P2: torso (-0.01696455 0.05036351 0.08143686)
    DeGrooteFregly2016Muscle IL_R5_l: max_isometric_force=57.32231 optimal_fiber_length=0.1177367
        tendon_slack_length=0.1648442 pennation_angle_at_optimal=0.2408554 activation_time_constant=0.015
        deactivation_time_constant=0.05 fiber_damping=0 passive_fiber_strain_at_one_norm_force=0.6
        tendon_strain_at_one_norm_force=0.04
      PathPoint IL_r5_L_P1: pelvis (-0.03647938 0.01176663 -0.01502418)
      PathPoint IL_r5_L_P2: lumbar2 (-0.02631085 0.001119311 -0.06806663)
      PathPoint IL_r5_L_P3: torso (-0.04135109 0.09118446 -0.0692821)
      PathPoint IL_r5_L_P4: torso (-0.04241138 0.1060284 -0.0692821)
      PathPoint IL_r5_L_P5: torso (-0.04294152 0.1256437 -0.07049758)
      PathPoint IL_r5_L_P6: torso (-0.04188124 0.1404877 -0.07171305)
      PathPoint IL_r5_L_P7: torso (-0.04029081 0.1521508 -0.07171305)
      PathPoint IL_r5_L_P8: torso (-0.03710996 0.1632838 -0.07292853)
    DeGrooteFregly2016Muscle IL_R6_l: max_isometric_force=72.6918 optimal_fiber_length=0.1201569
        tendon_slack_length=0.145142 pennation_angle_at_optimal=0.2408554 activation_time_constant=0.015
        deactivation_time_constant=0.05 fiber_damping=0 passive_fiber_strain_at_one_norm_force=0.6
        tendon_strain_at_one_norm_force=0.04
      PathPoint IL_r6_L_P1: pelvis (-0.03455057 0.01574547 -0.01624821)
      PathPoint IL_r6_L_P2: lumbar2 (-0.02609058 0.001060284 -0.07049758)
      PathPoint IL_r6_L_P3: torso (-0.04188124 0.09113145 -0.07292853)
      PathPoint IL_r6_L_P4: torso (-0.04188124 0.1070887 -0.07292853)
      PathPoint IL_r6_L_P5: torso (-0.04241138 0.1272341 -0.074144)
      PathPoint IL_r6_L_P6: torso (-0.04082095 0.1420781 -0.07535948)
      PathPoint IL_r6_L_P7: torso (-0.0376401 0.1495001 -0.07657495)
    DeGrooteFregly2016Muscle IL_R7_l: max_isometric_force=87.65739 optimal_fiber_length=0.123444
        tendon_slack_length=0.1297041 pennation_angle_at_optimal=0.2408554 activation_time_constant=0.015
        deactivation_time_constant=0.05 fiber_damping=0 passive_fiber_strain_at_one_norm_force=0.6
        tendon_strain_at_one_norm_force=0.04
      PathPoint IL_r7_L_P1: pelvis (-0.03191691 0.01859179 -0.01781238)
      PathPoint IL_r7_L_P2: lumbar2 (-0.02579932 0.001258489 -0.074144)
      PathPoint IL_r7_L_P3: torso (-0.04241138 0.09118446 -0.07657495)
      PathPoint IL_r7_L_P4: torso (-0.04241138 0.1065586 -0.07657495)
      PathPoint IL_r7_L_P5: torso (-0.04294152 0.126704 -0.07779043)
      PathPoint IL_r7_L_P6: torso (-0.03976067 0.1383671 -0.0790059)
    DeGrooteFregly2016Muscle IL_R8_l: max_isometric_force=77.91768 optimal_fiber_length=0.1184129
        tendon_slack_length=0.1195875 pennation_angle_at_optimal=0.2408554 activation_time_constant=0.015
        deactivation_time_constant=0.05 fiber_damping=0 passive_fiber_strain_at_one_norm_force=0.6
        tendon_strain_at_one_norm_force=0.04
      PathPoint IL_r8_L_P1: pelvis (-0.03247789 0.01905727 -0.01840277)
      PathPoint IL_r8_L_P2: lumbar2 (-0.02544683 0.001513683 -0.07779043)
      PathPoint IL_r8_L_P3: torso (-0.04188124 0.08853375 -0.0790059)
      PathPoint IL_r8_L_P4: torso (-0.04294152 0.1065586 -0.0790059)
      PathPoint IL_r8_L_P5: torso (-0.04188124 0.1214026 -0.08022138)
    DeGrooteFregly2016Muscle IL_R9_l: max_isometric_force=95.915 optimal_fiber_length=0.1458601
        tendon_slack_length=0.0858231 pennation_angle_at_optimal=0.2408554 activation_time_constant=0.015
        deactivation_time_constant=0.05 fiber_damping=0 passive_fiber_strain_at_one_norm_force=0.6
        tendon_strain_at_one_norm_force=0.04
      PathPoint IL_r9_L_P1: pelvis (-0.03194106 0.02013092 -0.01840277)
      PathPoint IL_r9_L_P2: lumbar2 (-0.02563365 0.001407321 -0.08022138)
      PathPoint IL_r9_L_P3: torso (-0.04135109 0.08694333 -0.08265233)
      PathPoint IL_r9_L_P4: torso (-0.04029081 0.1023175 -0.08265233)
    DeGrooteFregly2016Muscle IL_R10_l: max_isometric_force=191.842 optimal_fiber_length=0.1381213
        tendon_slack_length=0.08129281 pennation_angle_at_optimal=0.2408554 activation_time_constant=0.015
        deactivation_time_constant=0.05 fiber_damping=0 passive_fiber_strain_at_one_norm_force=0.6
        tendon_strain_at_one_norm_force=0.04
      PathPoint IL_r10_L_P1: pelvis (-0.03113583 0.02039934 -0.0190162)
      PathPoint IL_r10_L_P2: lumbar2 (-0.02549364 0.001392599 -0.08386781)
      PathPoint IL_r10_L_P3: torso (-0.03973814 0.08217205 -0.08508328)
    DeGrooteFregly2016Muscle IL_R11_l: max_isometric_force=235.1806 optimal_fiber_length=0.1285034
        tendon_slack_length=0.06434606 pennation_angle_at_optimal=0.2408554 activation_time_constant=0.015
        deactivation_time_constant=0.05 fiber_damping=0 passive_fiber_strain_at_one_norm_force=0.6
        tendon_strain_at_one_norm_force=0.04
      PathPoint IL_r11_L_P1: pelvis (-0.03033059 0.02120457 -0.01962962)
      PathPoint IL_r11_L_P2: lumbar2 (-0.02541878 0.001433171 -0.08751423)
      PathPoint IL_r11_L_P3: torso (-0.03310192 0.06626778 -0.08994518)
    DeGrooteFregly2016Muscle IL_R12_l: max_isometric_force=206.1732 optimal_fiber_length=0.101644
        tendon_slack_length=0.05087248 pennation_angle_at_optimal=0.2408554 activation_time_constant=0.015
        deactivation_time_constant=0.05 fiber_damping=0 passive_fiber_strain_at_one_norm_force=0.6
        tendon_strain_at_one_norm_force=0.04
      PathPoint IL_r12_L_P1: pelvis (-0.02979377 0.02199497 -0.02041567)
      PathPoint IL_r12_L_P2: torso (-0.01697102 0.05055431 -0.08143686)
    DeGrooteFregly2016Muscle LTpT_T1_r: max_isometric_force=325.8947 optimal_fiber_length=0.06173358
        tendon_slack_length=0.1462111 pennation_angle_at_optimal=0.2199115 activation_time_constant=0.015
        deactivation_time_constant=0.05 fiber_damping=0 passive_fiber_strain_at_one_norm_force=0.6
        tendon_strain_at_one_norm_force=0.04
      PathPoint LTpT_t1_R_P1: lumbar1 (-0.02544683 -0.006891849 0.003901676)
      PathPoint LTpT_t1_R_P2: torso (-0.02650711 0.2147076 0.03178468)
      PathWrap: wrap_object=Chest_r method=hybrid
    DeGrooteFregly2016Muscle LTpT_T2_r: max_isometric_force=240.6609 optimal_fiber_length=0.06499067
        tendon_slack_length=0.1562254 pennation_angle_at_optimal=0.2199115 activation_time_constant=0.015
        deactivation_time_constant=0.05 fiber_damping=0 passive_fiber_strain_at_one_norm_force=0.6
        tendon_strain_at_one_norm_force=0.04
      PathPoint LTpT_t2_R_P1: lumbar2 (-0.02491669 -0.007952134 0.004655271)
      PathPoint LTpT_t2_R_P2: torso (-0.02915782 0.2046349 0.03225872)
      PathWrap: wrap_object=Chest_r method=hybrid
    DeGrooteFregly2016Muscle LTpT_T3_r: max_isometric_force=172.5042 optimal_fiber_length=0.0608153
        tendon_slack_length=0.1462686 pennation_angle_at_optimal=0.2199115 activation_time_constant=0.015
        deactivation_time_constant=0.05 fiber_damping=0 passive_fiber_strain_at_one_norm_force=0.6
        tendon_strain_at_one_norm_force=0.04
      PathPoint LTpT_t3_R_P1: lumbar3 (-0.02650711 -0.002120569 0.004861902)
      PathPoint LTpT_t3_R_P2: lumbar1 (-0.01967358 -0.007432594 0.006077377)
      PathPoint LTpT_t3_R_P3: torso (-0.03256266 0.1935475 0.03102428)
      PathWrap: wrap_object=Chest_r method=hybrid
    DeGrooteFregly2016Muscle LTpT_T4_r: max_isometric_force=60.57609 optimal_fiber_length=0.06274508
        tendon_slack_length=0.1509201 pennation_angle_at_optimal=0.2199115 activation_time_constant=0.015
        deactivation_time_constant=0.05 fiber_damping=0 passive_fiber_strain_at_one_norm_force=0.6
        tendon_strain_at_one_norm_force=0.04
      PathPoint LTpT_t4_R_P1: lumbar4 (-0.02597697 0.003710996 0.003427641)
      PathPoint LTpT_t4_R_P2: lumbar1 (-0.01967512 -0.007421991 0.00743871)
      PathPoint LTpT_t4_R_P3: torso (-0.03710996 0.1818388 0.03178468)
      PathWrap: wrap_object=Chest_r method=hybrid
    DeGrooteFregly2016Muscle LTpT_T5_r: max_isometric_force=57.01232 optimal_fiber_length=0.05902289
        tendon_slack_length=0.1419027 pennation_angle_at_optimal=0.2199115 activation_time_constant=0.015
        deactivation_time_constant=0.05 fiber_damping=0 passive_fiber_strain_at_one_norm_force=0.6
        tendon_strain_at_one_norm_force=0.04
      PathPoint LTpT_t5_R_P1: lumbar4 (-0.02597697 0.002120569 -0.0005259921)
      PathPoint LTpT_t5_R_P2: lumbar2 (-0.02332626 0.002332626 0.007779043)
      PathPoint LTpT_t5_R_P3: torso (-0.03920863 0.1696455 0.03403331)
      PathWrap: wrap_object=Chest_r method=hybrid
    DeGrooteFregly2016Muscle LTpT_T6_r: max_isometric_force=81.40657 optimal_fiber_length=0.06179673
        tendon_slack_length=0.1412266 pennation_angle_at_optimal=0.2199115 activation_time_constant=0.015
        deactivation_time_constant=0.05 fiber_damping=0 passive_fiber_strain_at_one_norm_force=0.6
        tendon_strain_at_one_norm_force=0.04
      PathPoint LTpT_t6_R_P1: lumbar5 (-0.0201454 0.00954256 0.0002595769)
      PathPoint LTpT_t6_R_P2: lumbar2 (-0.02332626 0.002332626 0.01093928)
      PathPoint LTpT_t6_R_P3: torso (-0.03868374 0.1007472 0.01853928)
      PathPoint LTpT_t6_R_P4: torso (-0.04241138 0.1558618 0.03362005)
    DeGrooteFregly2016Muscle LTpT_T7_r: max_isometric_force=79.70635 optimal_fiber_length=0.07010189
        tendon_slack_length=0.1326237 pennation_angle_at_optimal=0.2199115 activation_time_constant=0.015
        deactivation_time_constant=0.05 fiber_damping=0 passive_fiber_strain_at_one_norm_force=0.6
        tendon_strain_at_one_norm_force=0.04
      PathPoint LTpT_t7_R_P1: sacrum (-0.06961669 0.03208034 0.0003365165)
      PathPoint LTpT_t7_R_P2: lumbar2 (-0.02332096 0.002332626 0.01337023)
      PathPoint LTpT_t7_R_P3: torso (-0.03852162 0.1010881 0.02363857)
      PathPoint LTpT_t7_R_P4: torso (-0.04241138 0.141548 0.03217364)
    DeGrooteFregly2016Muscle LTpT_T8_r: max_isometric_force=79.70635 optimal_fiber_length=0.07477677
        tendon_slack_length=0.1181054 pennation_angle_at_optimal=0.2199115 activation_time_constant=0.015
        deactivation_time_constant=0.05 fiber_damping=0 passive_fiber_strain_at_one_norm_force=0.6
        tendon_strain_at_one_norm_force=0.04
      PathPoint LTpT_t8_R_P1: sacrum (-0.07575786 0.02663731 0.0004552077)
      PathPoint LTpT_t8_R_P2: lumbar4 (-0.02490285 0.009566046 0.00687637)
      PathPoint LTpT_t8_R_P3: lumbar3 (-0.02478404 0.007181254 0.01010833)
      PathPoint LTpT_t8_R_P4: lumbar2 (-0.02402387 0.001644241 0.0132973)
      PathPoint LTpT_t8_R_P5: torso (-0.04188124 0.1277643 0.03099462)
    DeGrooteFregly2016Muscle LTpT_T9_r: max_isometric_force=139.4342 optimal_fiber_length=0.07340676
        tendon_slack_length=0.1243837 pennation_angle_at_optimal=0.2199115 activation_time_constant=0.015
        deactivation_time_constant=0.05 fiber_damping=0 passive_fiber_strain_at_one_norm_force=0.6
        tendon_strain_at_one_norm_force=0.04
      PathPoint LTpT_t9_R_P1: sacrum (-0.08790925 0.01422647 0)
      PathPoint LTpT_t9_R_P2: lumbar4 (-0.02476825 0.009521355 0.009091756)
      PathPoint LTpT_t9_R_P3: lumbar3 (-0.02461424 0.007344272 0.01177793)
      PathPoint LTpT_t9_R_P4: lumbar2 (-0.023706 0.001841205 0.01397797)
      PathPoint LTpT_t9_R_P5: torso (-0.03976067 0.1176916 0.02935385)
    DeGrooteFregly2016Muscle LTpT_T10_r: max_isometric_force=120.5072 optimal_fiber_length=0.0667556
        tendon_slack_length=0.1131712 pennation_angle_at_optimal=0.2199115 activation_time_constant=0.015
        deactivation_time_constant=0.05 fiber_damping=0 passive_fiber_strain_at_one_norm_force=0.6
        tendon_strain_at_one_norm_force=0.04
      PathPoint LTpT_t10_R_P1: sacrum (-0.08718878 0.01302088 0.0130299)
      PathPoint LTpT_t10_R_P2: lumbar4 (-0.02476825 0.009521355 0.01526637)
      PathPoint LTpT_t10_R_P3: lumbar3 (-0.02443956 0.007437896 0.017515)
      PathPoint LTpT_t10_R_P4: lumbar2 (-0.02332626 0.001791881 0.018536)
      PathPoint LTpT_t10_R_P5: torso (-0.03604967 0.1023175 0.02200011)
    DeGrooteFregly2016Muscle LTpT_T11_r: max_isometric_force=115.0784 optimal_fiber_length=0.05797939
        tendon_slack_length=0.09822515 pennation_angle_at_optimal=0.2199115 activation_time_constant=0.015
        deactivation_time_constant=0.05 fiber_damping=0 passive_fiber_strain_at_one_norm_force=0.6
        tendon_strain_at_one_norm_force=0.04
      PathPoint LTpT_t11_R_P1: sacrum (-0.08357639 0.01628035 0.02922003)
      PathPoint LTpT_t11_R_P2: lumbar4 (-0.02476825 0.009012418 0.02666753)
      PathPoint LTpT_t11_R_P3: lumbar3 (-0.02658568 0.007150983 0.0253852)
      PathPoint LTpT_t11_R_P4: lumbar2 (-0.02438654 0.001791881 0.02410288)
      PathPoint LTpT_t11_R_P5: torso (-0.03127839 0.08573354 0.02141668)
    DeGrooteFregly2016Muscle LTpT_T12_r: max_isometric_force=94.29293 optimal_fiber_length=0.04601481
        tendon_slack_length=0.07795324 pennation_angle_at_optimal=0.2199115 activation_time_constant=0.015
        deactivation_time_constant=0.05 fiber_damping=0 passive_fiber_strain_at_one_norm_force=0.6
        tendon_strain_at_one_norm_force=0.04
      PathPoint LTpT_t12_R_P1: sacrum (-0.07674339 0.02587094 0.03394823)
      PathPoint LTpT_t12_R_P2: lumbar4 (-0.02476825 0.009012418 0.0306786)
      PathPoint LTpT_t12_R_P3: lumbar3 (-0.02617174 0.007451891 0.0290467)
      PathPoint LTpT_t12_R_P4: lumbar2 (-0.024282 0.002111731 0.0274142)
      PathPoint LTpT_t12_R_P5: torso (-0.02703725 0.07050892 0.02170098)
    DeGrooteFregly2016Muscle LTpT_R4_r: max_isometric_force=60.49967 optimal_fiber_length=0.08201503
        tendon_slack_length=0.1389865 pennation_angle_at_optimal=0.2199115 activation_time_constant=0.015
        deactivation_time_constant=0.05 fiber_damping=0 passive_fiber_strain_at_one_norm_force=0.6
        tendon_strain_at_one_norm_force=0.04
      PathPoint LTpT_r4_R_P1: lumbar4 (-0.02650711 0.00374273 0.003427799)
      PathPoint LTpT_r4_R_P2: lumbar2 (-0.02650711 0.002892573 0.01395111)
      PathPoint LTpT_r4_R_P3: torso (-0.03870038 0.100727 0.03159677)
      PathPoint LTpT_r4_R_P4: torso (-0.03923053 0.1139806 0.03474412)
      PathPoint LTpT_r4_R_P5: torso (-0.03923053 0.1288246 0.03782633)
      PathPoint LTpT_r4_R_P6: torso (-0.03870038 0.1447288 0.04074213)
      PathPoint LTpT_r4_R_P7: torso (-0.03445925 0.1813086 0.04666575)
    DeGrooteFregly2016Muscle LTpT_R5_r: max_isometric_force=56.96222 optimal_fiber_length=0.07797854
        tendon_slack_length=0.1322126 pennation_angle_at_optimal=0.2199115 activation_time_constant=0.015
        deactivation_time_constant=0.05 fiber_damping=0 passive_fiber_strain_at_one_norm_force=0.6
        tendon_strain_at_one_norm_force=0.04
      PathPoint LTpT_r5_R_P1: lumbar4 (-0.02597697 0.002120569 9.723804e-5)
      PathPoint LTpT_r5_R_P2: lumbar2 (-0.02597697 0.002455979 0.01725513)
      PathPoint LTpT_r5_R_P3: torso (-0.04029081 0.09966674 0.03635098)
      PathPoint LTpT_r5_R_P4: torso (-0.03976067 0.1134504 0.03885656)
      PathPoint LTpT_r5_R_P5: torso (-0.04029081 0.1288246 0.04210954)
      PathPoint LTpT_r5_R_P6: torso (-0.03923053 0.1436685 0.04497259)
      PathPoint LTpT_r5_R_P7: torso (-0.03445925 0.1659345 0.04763837)
    DeGrooteFregly2016Muscle LTpT_R6_r: max_isometric_force=81.40657 optimal_fiber_length=0.08382201
        tendon_slack_length=0.1283953 pennation_angle_at_optimal=0.2199115 activation_time_constant=0.015
        deactivation_time_constant=0.05 fiber_damping=0 passive_fiber_strain_at_one_norm_force=0.6
        tendon_strain_at_one_norm_force=0.04
      PathPoint LTpT_r6_R_P1: lumbar5 (-0.0201454 0.01060284 0.0002552498)
      PathPoint LTpT_r6_R_P2: lumbar3 (-0.02650711 0.007810904 0.01318062)
      PathPoint LTpT_r6_R_P3: lumbar2 (-0.02438654 0.002332626 0.01701666)
      PathPoint LTpT_r6_R_P4: torso (-0.04029081 0.0991366 0.03768861)
      PathPoint LTpT_r6_R_P5: torso (-0.04029081 0.1129203 0.04212935)
      PathPoint LTpT_r6_R_P6: torso (-0.04082095 0.1282944 0.045394)
      PathPoint LTpT_r6_R_P7: torso (-0.03870038 0.1436685 0.04861902)
      PathPoint LTpT_r6_R_P8: torso (-0.03657981 0.1537412 0.04861902)
    DeGrooteFregly2016Muscle LTpT_R7_r: max_isometric_force=79.70635 optimal_fiber_length=0.07969238
        tendon_slack_length=0.1332606 pennation_angle_at_optimal=0.2199115 activation_time_constant=0.015
        deactivation_time_constant=0.05 fiber_damping=0 passive_fiber_strain_at_one_norm_force=0.6
        tendon_strain_at_one_norm_force=0.04
      PathPoint LTpT_r7_R_P1: sacrum (-0.06961828 0.03207891 0.0003403331)
      PathPoint LTpT_r7_R_P2: lumbar4 (-0.02476835 0.00998226 0.009881293)
      PathPoint LTpT_r7_R_P3: lumbar3 (-0.02443982 0.007511797 0.0156253)
      PathPoint LTpT_r7_R_P4: lumbar2 (-0.02332096 0.002287733 0.02099418)
      PathPoint LTpT_r7_R_P5: torso (-0.04135109 0.09807631 0.04313759)
      PathPoint LTpT_r7_R_P6: torso (-0.04188124 0.11186 0.04811897)
      PathPoint LTpT_r7_R_P7: torso (-0.04082095 0.1288246 0.05135238)
      PathPoint LTpT_r7_R_P8: torso (-0.03923053 0.1426083 0.05266983)
    DeGrooteFregly2016Muscle LTpT_R8_r: max_isometric_force=130.0205 optimal_fiber_length=0.06704221
        tendon_slack_length=0.1367461 pennation_angle_at_optimal=0.2199115 activation_time_constant=0.015
        deactivation_time_constant=0.05 fiber_damping=0 passive_fiber_strain_at_one_norm_force=0.6
        tendon_strain_at_one_norm_force=0.04
      PathPoint LTpT_r8_R_P1: sacrum (-0.07575733 0.02663965 0.0004497259)
      PathPoint LTpT_r8_R_P2: lumbar4 (-0.02466688 0.009608086 0.0138484)
      PathPoint LTpT_r8_R_P3: lumbar3 (-0.02434668 0.007421991 0.01949562)
      PathPoint LTpT_r8_R_P4: lumbar2 (-0.02332096 0.002056952 0.02496757)
      PathPoint LTpT_r8_R_P5: torso (-0.04188124 0.09807631 0.04948553)
      PathPoint LTpT_r8_R_P6: torso (-0.04188124 0.1107997 0.05313645)
      PathPoint LTpT_r8_R_P7: torso (-0.04029081 0.1261739 0.05634178)
    DeGrooteFregly2016Muscle LTpT_R9_r: max_isometric_force=110.6761 optimal_fiber_length=0.05899993
        tendon_slack_length=0.1441356 pennation_angle_at_optimal=0.2199115 activation_time_constant=0.015
        deactivation_time_constant=0.05 fiber_damping=0 passive_fiber_strain_at_one_norm_force=0.6
        tendon_strain_at_one_norm_force=0.04
      PathPoint LTpT_r9_R_P1: sacrum (-0.08790819 0.01422902 0)
      PathPoint LTpT_r9_R_P2: lumbar4 (-0.02476835 0.009373657 0.01809855)
      PathPoint LTpT_r9_R_P3: lumbar3 (-0.02443982 0.006904307 0.02380156)
      PathPoint LTpT_r9_R_P4: lumbar2 (-0.02332122 0.002087016 0.02940041)
      PathPoint LTpT_r9_R_P5: torso (-0.04188124 0.09701603 0.0527018)
      PathPoint LTpT_r9_R_P6: torso (-0.04082095 0.1076189 0.05683551)
    DeGrooteFregly2016Muscle LTpT_R10_r: max_isometric_force=120.4203 optimal_fiber_length=0.06918354
        tendon_slack_length=0.1188989 pennation_angle_at_optimal=0.2199115 activation_time_constant=0.015
        deactivation_time_constant=0.05 fiber_damping=0 passive_fiber_strain_at_one_norm_force=0.6
        tendon_strain_at_one_norm_force=0.04
      PathPoint LTpT_r10_R_P1: sacrum (-0.08718719 0.01302029 0.0130299)
      PathPoint LTpT_r10_R_P2: lumbar4 (-0.0247393 0.008940372 0.02362775)
      PathPoint LTpT_r10_R_P3: lumbar3 (-0.02441061 0.006719023 0.02850776)
      PathPoint LTpT_r10_R_P4: lumbar2 (-0.02329212 0.001933127 0.03322259)
      PathPoint LTpT_r10_R_P5: torso (-0.04082095 0.09330503 0.05698963)
    DeGrooteFregly2016Muscle LTpT_R11_r: max_isometric_force=115.3854 optimal_fiber_length=0.06350002
        tendon_slack_length=0.09044434 pennation_angle_at_optimal=0.2199115 activation_time_constant=0.015
        deactivation_time_constant=0.05 fiber_damping=0 passive_fiber_strain_at_one_norm_force=0.6
        tendon_strain_at_one_norm_force=0.04
      PathPoint LTpT_r11_R_P1: sacrum (-0.08357692 0.01628067 0.02922003)
      PathPoint LTpT_r11_R_P2: lumbar4 (-0.02443956 0.009521355 0.03575783)
      PathPoint LTpT_r11_R_P3: lumbar3 (-0.02443956 0.007386896 0.03959691)
      PathPoint LTpT_r11_R_P4: lumbar2 (-0.02333888 0.002375037 0.04323859)
      PathPoint LTpT_r11_R_P5: torso (-0.0344707 0.07827868 0.05537098)
    DeGrooteFregly2016Muscle LTpT_R12_r: max_isometric_force=94.32635 optimal_fiber_length=0.03989591
        tendon_slack_length=0.07756936 pennation_angle_at_optimal=0.2199115 activation_time_constant=0.015
        deactivation_time_constant=0.05 fiber_damping=0 passive_fiber_strain_at_one_norm_force=0.6
        tendon_strain_at_one_norm_force=0.04
      PathPoint LTpT_r12_R_P1: sacrum (-0.07674339 0.02587094 0.03394823)
      PathPoint LTpT_r12_R_P2: lumbar4 (-0.02476825 0.009318098 0.04072718)
      PathPoint LTpT_r12_R_P3: lumbar3 (-0.02443956 0.007233208 0.04360348)
      PathPoint LTpT_r12_R_P4: lumbar2 (-0.02332626 0.002332626 0.04717904)
      PathPoint LTpT_r12_R_P5: torso (-0.02387501 0.06361707 0.05665914)
    DeGrooteFregly2016Muscle LTpT_T1_l: max_isometric_force=325.8947 optimal_fiber_length=0.06173358
        tendon_slack_length=0.1462111 pennation_angle_at_optimal=0.2199115 activation_time_constant=0.015
        deactivation_time_constant=0.05 fiber_damping=0 passive_fiber_strain_at_one_norm_force=0.6
        tendon_strain_at_one_norm_force=0.04
      PathPoint LTpT_t1_L_P1: lumbar1 (-0.02544683 -0.006891849 -0.003901676)
      PathPoint LTpT_t1_L_P2: torso (-0.02650711 0.2147076 -0.03178468)
      PathWrap: wrap_object=Chest_l method=hybrid
    DeGrooteFregly2016Muscle LTpT_T2_l: max_isometric_force=240.6609 optimal_fiber_length=0.06500972
        tendon_slack_length=0.1562712 pennation_angle_at_optimal=0.2199115 activation_time_constant=0.015
        deactivation_time_constant=0.05 fiber_damping=0 passive_fiber_strain_at_one_norm_force=0.6
        tendon_strain_at_one_norm_force=0.04
      PathPoint LTpT_t2_L_P1: lumbar2 (-0.02491669 -0.007421991 -0.004861902)
      PathPoint LTpT_t2_L_P2: torso (-0.02915782 0.2046349 -0.03225872)
      PathWrap: wrap_object=Chest_l method=hybrid
    DeGrooteFregly2016Muscle LTpT_T3_l: max_isometric_force=172.5042 optimal_fiber_length=0.06079254
        tendon_slack_length=0.1462138 pennation_angle_at_optimal=0.2199115 activation_time_constant=0.015
        deactivation_time_constant=0.05 fiber_damping=0 passive_fiber_strain_at_one_norm_force=0.6
        tendon_strain_at_one_norm_force=0.04
      PathPoint LTpT_t3_L_P1: lumbar3 (-0.02597697 -0.002120569 -0.004946985)
      PathPoint LTpT_t3_L_P2: lumbar1 (-0.01967358 -0.007432594 -0.006077377)
      PathPoint LTpT_t3_L_P3: torso (-0.03233868 0.1935019 -0.03157805)
      PathWrap: wrap_object=Chest_l method=hybrid
    DeGrooteFregly2016Muscle LTpT_T4_l: max_isometric_force=60.57609 optimal_fiber_length=0.06274519
        tendon_slack_length=0.1509204 pennation_angle_at_optimal=0.2199115 activation_time_constant=0.015
        deactivation_time_constant=0.05 fiber_damping=0 passive_fiber_strain_at_one_norm_force=0.6
        tendon_strain_at_one_norm_force=0.04
      PathPoint LTpT_t4_L_P1: lumbar4 (-0.02597697 0.00374273 -0.003427641)
      PathPoint LTpT_t4_L_P2: lumbar1 (-0.01967512 -0.007435086 -0.00743871)
      PathPoint LTpT_t4_L_P3: torso (-0.03710996 0.1818388 -0.03178468)
      PathWrap: wrap_object=Chest_l method=hybrid
    DeGrooteFregly2016Muscle LTpT_T5_l: max_isometric_force=57.01232 optimal_fiber_length=0.05899159
        tendon_slack_length=0.1418274 pennation_angle_at_optimal=0.2199115 activation_time_constant=0.015
        deactivation_time_constant=0.05 fiber_damping=0 passive_fiber_strain_at_one_norm_force=0.6
        tendon_strain_at_one_norm_force=0.04
      PathPoint LTpT_t5_L_P1: lumbar4 (-0.02507578 0.002104479 -9.723804e-5)
      PathPoint LTpT_t5_L_P2: lumbar2 (-0.02332626 0.002332626 -0.007779043)
      PathPoint LTpT_t5_L_P3: torso (-0.03923053 0.1696455 -0.03413055)
      PathWrap: wrap_object=Chest_l method=hybrid
    DeGrooteFregly2016Muscle LTpT_T6_l: max_isometric_force=81.40657 optimal_fiber_length=0.06178555
        tendon_slack_length=0.141201 pennation_angle_at_optimal=0.2199115 activation_time_constant=0.015
        deactivation_time_constant=0.05 fiber_damping=0 passive_fiber_strain_at_one_norm_force=0.6
        tendon_strain_at_one_norm_force=0.04
      PathPoint LTpT_t6_L_P1: lumbar5 (-0.0201454 0.00954256 -0.0002552498)
      PathPoint LTpT_t6_L_P2: lumbar2 (-0.02332626 0.002332626 -0.01093928)
      PathPoint LTpT_t6_L_P3: torso (-0.03870038 0.100727 -0.01880341)
      PathPoint LTpT_t6_L_P4: torso (-0.04241138 0.1558618 -0.03362005)
    DeGrooteFregly2016Muscle LTpT_T7_l: max_isometric_force=79.70635 optimal_fiber_length=0.07007563
        tendon_slack_length=0.1325741 pennation_angle_at_optimal=0.2199115 activation_time_constant=0.015
        deactivation_time_constant=0.05 fiber_damping=0 passive_fiber_strain_at_one_norm_force=0.6
        tendon_strain_at_one_norm_force=0.04
      PathPoint LTpT_t7_L_P1: sacrum (-0.06961669 0.03208034 -0.0003403331)
      PathPoint LTpT_t7_L_P2: lumbar2 (-0.02332096 0.002332626 -0.01337023)
      PathPoint LTpT_t7_L_P3: torso (-0.03870038 0.1012572 -0.02309403)
      PathPoint LTpT_t7_L_P4: torso (-0.04241138 0.141548 -0.03160236)
    DeGrooteFregly2016Muscle LTpT_T8_l: max_isometric_force=120.4665 optimal_fiber_length=0.07477702
        tendon_slack_length=0.1181058 pennation_angle_at_optimal=0.2199115 activation_time_constant=0.015
        deactivation_time_constant=0.05 fiber_damping=0 passive_fiber_strain_at_one_norm_force=0.6
        tendon_strain_at_one_norm_force=0.04
      PathPoint LTpT_t8_L_P1: sacrum (-0.07575786 0.02663731 -0.0004497259)
      PathPoint LTpT_t8_L_P2: lumbar4 (-0.02490285 0.009566046 -0.006879591)
      PathPoint LTpT_t8_L_P3: lumbar3 (-0.02478404 0.007181254 -0.01011276)
      PathPoint LTpT_t8_L_P4: lumbar2 (-0.02402387 0.001644241 -0.0132973)
      PathPoint LTpT_t8_L_P5: torso (-0.04188124 0.1277643 -0.03099462)
    DeGrooteFregly2016Muscle LTpT_T9_l: max_isometric_force=139.4342 optimal_fiber_length=0.07339906
        tendon_slack_length=0.1243706 pennation_angle_at_optimal=0.2199115 activation_time_constant=0.015
        deactivation_time_constant=0.05 fiber_damping=0 passive_fiber_strain_at_one_norm_force=0.6
        tendon_strain_at_one_norm_force=0.04
      PathPoint LTpT_t9_L_P1: sacrum (-0.08790925 0.01422647 0)
      PathPoint LTpT_t9_L_P2: lumbar4 (-0.02476825 0.009521355 -0.009091756)
      PathPoint LTpT_t9_L_P3: lumbar3 (-0.02461424 0.007344272 -0.01177796)
      PathPoint LTpT_t9_L_P4: lumbar2 (-0.023706 0.001841205 -0.01458571)
      PathPoint LTpT_t9_L_P5: torso (-0.03976067 0.1176916 -0.02917141)
    DeGrooteFregly2016Muscle LTpT_T10_l: max_isometric_force=120.5072 optimal_fiber_length=0.06675357
        tendon_slack_length=0.1131677 pennation_angle_at_optimal=0.2199115 activation_time_constant=0.015
        deactivation_time_constant=0.05 fiber_damping=0 passive_fiber_strain_at_one_norm_force=0.6
        tendon_strain_at_one_norm_force=0.04
      PathPoint LTpT_t10_L_P1: sacrum (-0.08718878 0.01302088 -0.0130299)
      PathPoint LTpT_t10_L_P2: lumbar4 (-0.02476825 0.009521355 -0.01526637)
      PathPoint LTpT_t10_L_P3: lumbar3 (-0.02443956 0.007437896 -0.017515)
      PathPoint LTpT_t10_L_P4: lumbar2 (-0.02332626 0.001791881 -0.018536)
      PathPoint LTpT_t10_L_P5: torso (-0.03604967 0.1023175 -0.02187856)
    DeGrooteFregly2016Muscle LTpT_T11_l: max_isometric_force=115.0784 optimal_fiber_length=0.05797911
        tendon_slack_length=0.09822468 pennation_angle_at_optimal=0.2199115 activation_time_constant=0.015
        deactivation_time_constant=0.05 fiber_damping=0 passive_fiber_strain_at_one_norm_force=0.6
        tendon_strain_at_one_norm_force=0.04
      PathPoint LTpT_t11_L_P1: sacrum (-0.08357639 0.01628035 -0.02922003)
      PathPoint LTpT_t11_L_P2: lumbar4 (-0.02476825 0.009012418 -0.02666753)
      PathPoint LTpT_t11_L_P3: lumbar3 (-0.02658568 0.007150983 -0.02537913)
      PathPoint LTpT_t11_L_P4: lumbar2 (-0.02438654 0.001791881 -0.02410288)
      PathPoint LTpT_t11_L_P5: torso (-0.03227453 0.08573354 -0.02141668)
    DeGrooteFregly2016Muscle LTpT_T12_l: max_isometric_force=94.29293 optimal_fiber_length=0.04601803
        tendon_slack_length=0.0779587 pennation_angle_at_optimal=0.2199115 activation_time_constant=0.015
        deactivation_time_constant=0.05 fiber_damping=0 passive_fiber_strain_at_one_norm_force=0.6
        tendon_strain_at_one_norm_force=0.04
      PathPoint LTpT_t12_L_P1: sacrum (-0.07674339 0.02587094 -0.03403331)
      PathPoint LTpT_t12_L_P2: lumbar4 (-0.02476825 0.009012418 -0.03038689)
      PathPoint LTpT_t12_L_P3: lumbar3 (-0.02617174 0.007451891 -0.02917141)
      PathPoint LTpT_t12_L_P4: lumbar2 (-0.024282 0.002111731 -0.02795594)
      PathPoint LTpT_t12_L_P5: torso (-0.02703725 0.07050892 -0.02187856)
    DeGrooteFregly2016Muscle LTpT_R4_l: max_isometric_force=60.49968 optimal_fiber_length=0.08201505
        tendon_slack_length=0.1389865 pennation_angle_at_optimal=0.2199115 activation_time_constant=0.015
        deactivation_time_constant=0.05 fiber_damping=0 passive_fiber_strain_at_one_norm_force=0.6
        tendon_strain_at_one_norm_force=0.04
      PathPoint LTpT_r4_L_P1: lumbar4 (-0.02650711 0.003710996 -0.003427641)
      PathPoint LTpT_r4_L_P2: lumbar2 (-0.02650711 0.002650711 -0.01395366)
      PathPoint LTpT_r4_L_P3: torso (-0.03870038 0.100727 -0.03160236)
      PathPoint LTpT_r4_L_P4: torso (-0.03923053 0.1139806 -0.03473829)
      PathPoint LTpT_r4_L_P5: torso (-0.03923053 0.1288246 -0.0378256)
      PathPoint LTpT_r4_L_P6: torso (-0.03870038 0.1447288 -0.04074274)
      PathPoint LTpT_r4_L_P7: torso (-0.03445925 0.1813086 -0.0466621)
    DeGrooteFregly2016Muscle LTpT_R5_l: max_isometric_force=56.96222 optimal_fiber_length=0.07788866
        tendon_slack_length=0.1320602 pennation_angle_at_optimal=0.2199115 activation_time_constant=0.015
        deactivation_time_constant=0.05 fiber_damping=0 passive_fiber_strain_at_one_norm_force=0.6
        tendon_strain_at_one_norm_force=0.04
      PathPoint LTpT_r5_L_P1: lumbar4 (-0.02597697 0.002104479 -9.723804e-5)
      PathPoint LTpT_r5_L_P2: lumbar2 (-0.02597697 0.007421991 -0.01725975)
      PathPoint LTpT_r5_L_P3: torso (-0.04029081 0.09966674 -0.03635487)
      PathPoint LTpT_r5_L_P4: torso (-0.03976067 0.1129203 -0.03885875)
      PathPoint LTpT_r5_L_P5: torso (-0.04029081 0.1288246 -0.04210407)
      PathPoint LTpT_r5_L_P6: torso (-0.03923053 0.1436685 -0.04438916)
      PathPoint LTpT_r5_L_P7: torso (-0.03445925 0.1659345 -0.04763448)
    DeGrooteFregly2016Muscle LTpT_R6_l: max_isometric_force=81.40657 optimal_fiber_length=0.08378989
        tendon_slack_length=0.1283461 pennation_angle_at_optimal=0.2199115 activation_time_constant=0.015
        deactivation_time_constant=0.05 fiber_damping=0 passive_fiber_strain_at_one_norm_force=0.6
        tendon_strain_at_one_norm_force=0.04
      PathPoint LTpT_r6_L_P1: lumbar5 (-0.0201454 0.01060284 -0.0002552498)
      PathPoint LTpT_r6_L_P2: lumbar3 (-0.02650711 0.007810904 -0.01317575)
      PathPoint LTpT_r6_L_P3: lumbar2 (-0.02438654 0.002332626 -0.01701666)
      PathPoint LTpT_r6_L_P4: torso (-0.04029081 0.0991366 -0.03767974)
      PathPoint LTpT_r6_L_P5: torso (-0.04029081 0.1129203 -0.04212838)
      PathPoint LTpT_r6_L_P6: torso (-0.04082095 0.1282944 -0.04539801)
      PathPoint LTpT_r6_L_P7: torso (-0.03870038 0.1436685 -0.04803559)
      PathPoint LTpT_r6_L_P8: torso (-0.03657981 0.1537412 -0.04874057)
    DeGrooteFregly2016Muscle LTpT_R7_l: max_isometric_force=79.70635 optimal_fiber_length=0.07970676
        tendon_slack_length=0.1332847 pennation_angle_at_optimal=0.2199115 activation_time_constant=0.015
        deactivation_time_constant=0.05 fiber_damping=0 passive_fiber_strain_at_one_norm_force=0.6
        tendon_strain_at_one_norm_force=0.04
      PathPoint LTpT_r7_L_P1: sacrum (-0.06961828 0.03233868 -0.0003403331)
      PathPoint LTpT_r7_L_P2: lumbar4 (-0.02476835 0.0100727 -0.009723804)
      PathPoint LTpT_r7_L_P3: lumbar3 (-0.02443982 0.007421991 -0.01563101)
      PathPoint LTpT_r7_L_P4: lumbar2 (-0.02332096 0.002120569 -0.02099126)
      PathPoint LTpT_r7_L_P5: torso (-0.04135109 0.09807631 -0.04313722)
      PathPoint LTpT_r7_L_P6: torso (-0.04188124 0.11186 -0.04812067)
      PathPoint LTpT_r7_L_P7: torso (-0.04082095 0.1288246 -0.05135384)
      PathPoint LTpT_r7_L_P8: torso (-0.03923053 0.1426083 -0.05266655)
    DeGrooteFregly2016Muscle LTpT_R8_l: max_isometric_force=130.0205 optimal_fiber_length=0.06704132
        tendon_slack_length=0.1367443 pennation_angle_at_optimal=0.2199115 activation_time_constant=0.015
        deactivation_time_constant=0.05 fiber_damping=0 passive_fiber_strain_at_one_norm_force=0.6
        tendon_strain_at_one_norm_force=0.04
      PathPoint LTpT_r8_L_P1: sacrum (-0.07575733 0.02663965 -0.0004497259)
      PathPoint LTpT_r8_L_P2: lumbar4 (-0.02466688 0.009608086 -0.01384427)
      PathPoint LTpT_r8_L_P3: lumbar3 (-0.02434668 0.007159412 -0.01949623)
      PathPoint LTpT_r8_L_P4: lumbar2 (-0.02332096 0.002056952 -0.02496587)
      PathPoint LTpT_r8_L_P5: torso (-0.04188124 0.09807631 -0.04948201)
      PathPoint LTpT_r8_L_P6: torso (-0.04188124 0.1107997 -0.05314059)
      PathPoint LTpT_r8_L_P7: torso (-0.04029081 0.1261739 -0.05633729)
    DeGrooteFregly2016Muscle LTpT_R9_l: max_isometric_force=110.6761 optimal_fiber_length=0.05902976
        tendon_slack_length=0.1442084 pennation_angle_at_optimal=0.2199115 activation_time_constant=0.015
        deactivation_time_constant=0.05 fiber_damping=0 passive_fiber_strain_at_one_norm_force=0.6
        tendon_strain_at_one_norm_force=0.04
      PathPoint LTpT_r9_L_P1: sacrum (-0.08790819 0.01422902 0)
      PathPoint LTpT_r9_L_P2: lumbar4 (-0.02476835 0.009373657 -0.01809843)
      PathPoint LTpT_r9_L_P3: lumbar3 (-0.02443982 0.006904307 -0.02379901)
      PathPoint LTpT_r9_L_P4: lumbar2 (-0.02332122 0.002087016 -0.02940235)
      PathPoint LTpT_r9_L_P5: torso (-0.04188124 0.09701603 -0.05270302)
      PathPoint LTpT_r9_L_P6: torso (-0.04082095 0.1076189 -0.05712735)
    DeGrooteFregly2016Muscle LTpT_R10_l: max_isometric_force=120.4203 optimal_fiber_length=0.06920076
        tendon_slack_length=0.1189285 pennation_angle_at_optimal=0.2199115 activation_time_constant=0.015
        deactivation_time_constant=0.05 fiber_damping=0 passive_fiber_strain_at_one_norm_force=0.6
        tendon_strain_at_one_norm_force=0.04
      PathPoint LTpT_r10_L_P1: sacrum (-0.08718719 0.01302029 -0.0130299)
      PathPoint LTpT_r10_L_P2: lumbar4 (-0.0247393 0.008940372 -0.02362884)
      PathPoint LTpT_r10_L_P3: lumbar3 (-0.02441061 0.006719023 -0.0285029)
      PathPoint LTpT_r10_L_P4: lumbar2 (-0.02329212 0.001933127 -0.03321894)
      PathPoint LTpT_r10_L_P5: torso (-0.04082095 0.09330503 -0.05712735)
    DeGrooteFregly2016Muscle LTpT_R11_l: max_isometric_force=115.3853 optimal_fiber_length=0.06350053
        tendon_slack_length=0.09044506 pennation_angle_at_optimal=0.2199115 activation_time_constant=0.015
        deactivation_time_constant=0.05 fiber_damping=0 passive_fiber_strain_at_one_norm_force=0.6
        tendon_strain_at_one_norm_force=0.04
      PathPoint LTpT_r11_L_P1: sacrum (-0.08357692 0.01628067 -0.02922003)
      PathPoint LTpT_r11_L_P2: lumbar4 (-0.02443956 0.009521355 -0.03575929)
      PathPoint LTpT_r11_L_P3: lumbar3 (-0.02443956 0.007386896 -0.03960019)
      PathPoint LTpT_r11_L_P4: lumbar2 (-0.02333888 0.002375037 -0.04323446)
      PathPoint LTpT_r11_L_P5: torso (-0.0344707 0.07827868 -0.05537706)
    DeGrooteFregly2016Muscle LTpT_R12_l: max_isometric_force=94.32651 optimal_fiber_length=0.03994036
        tendon_slack_length=0.07765579 pennation_angle_at_optimal=0.2199115 activation_time_constant=0.015
        deactivation_time_constant=0.05 fiber_damping=0 passive_fiber_strain_at_one_norm_force=0.6
        tendon_strain_at_one_norm_force=0.04
      PathPoint LTpT_r12_L_P1: sacrum (-0.07674339 0.02597697 -0.03403331)
      PathPoint LTpT_r12_L_P2: lumbar4 (-0.02491669 0.00954256 -0.04132617)
      PathPoint LTpT_r12_L_P3: lumbar3 (-0.02443956 0.007233208 -0.0435991)
      PathPoint LTpT_r12_L_P4: lumbar2 (-0.02332626 0.002332626 -0.04718476)
      PathPoint LTpT_r12_L_P5: torso (-0.02387501 0.06361707 -0.05712735)
    DeGrooteFregly2016Muscle LTpL_L5_r: max_isometric_force=157.7955 optimal_fiber_length=0.03527083
        tendon_slack_length=0.0006848705 pennation_angle_at_optimal=0.2199115 activation_time_constant=0.015
        deactivation_time_constant=0.05 fiber_damping=0 passive_fiber_strain_at_one_norm_force=0.6
        tendon_strain_at_one_norm_force=0.04
      PathPoint LTpL_L5_L_P1: sacrum (-0.07344113 0.03346708 0.05531738)
      PathPoint LTpL_L5_L_P2: lumbar5 (-0.006972961 0.01512708 0.03141068)
    DeGrooteFregly2016Muscle LTpL_L4_r: max_isometric_force=151.8409 optimal_fiber_length=0.03191177
        tendon_slack_length=0.0343946 pennation_angle_at_optimal=0.2199115 activation_time_constant=0.015
        deactivation_time_constant=0.05 fiber_damping=0 passive_fiber_strain_at_one_norm_force=0.6
        tendon_strain_at_one_norm_force=0.04
      PathPoint LTpL_L4_L_P1: pelvis (-0.03569884 0.0110049 0.01472222)
      PathPoint LTpL_L4_L_P2: lumbar4 (-0.01219327 0.01433399 0.03095366)
    DeGrooteFregly2016Muscle LTpL_L3_r: max_isometric_force=121.2841 optimal_fiber_length=0.03965044
        tendon_slack_length=0.04306627 pennation_angle_at_optimal=0.2199115 activation_time_constant=0.015
        deactivation_time_constant=0.05 fiber_damping=0 passive_fiber_strain_at_one_norm_force=0.6
        tendon_strain_at_one_norm_force=0.04
      PathPoint LTpL_L3_L_P1: pelvis (-0.03757772 0.0110049 0.01564236)
      PathPoint LTpL_L3_L_P2: lumbar3 (-0.01578265 0.01217413 0.02820122)
    DeGrooteFregly2016Muscle LTpL_L2_r: max_isometric_force=108.3816 optimal_fiber_length=0.04849594
        tendon_slack_length=0.05336475 pennation_angle_at_optimal=0.2199115 activation_time_constant=0.015
        deactivation_time_constant=0.05 fiber_damping=0 passive_fiber_strain_at_one_norm_force=0.6
        tendon_strain_at_one_norm_force=0.04
      PathPoint LTpL_L2_L_P1: pelvis (-0.03811455 0.009931255 0.01625578)
      PathPoint LTpL_L2_L_P2: lumbar2 (-0.01588794 0.007610298 0.02681302)
    DeGrooteFregly2016Muscle LTpL_L1_r: max_isometric_force=106.1599 optimal_fiber_length=0.05687425
        tendon_slack_length=0.06624844 pennation_angle_at_optimal=0.2199115 activation_time_constant=0.015
        deactivation_time_constant=0.05 fiber_damping=0 passive_fiber_strain_at_one_norm_force=0.6
        tendon_strain_at_one_norm_force=0.04
      PathPoint LTpL_L1_L_P1: pelvis (-0.03868385 0.009002334 0.01643181)
      PathPoint LTpL_L1_L_P2: lumbar1 (-0.01676352 0.008830526 0.02774031)
    DeGrooteFregly2016Muscle LTpL_L5_l: max_isometric_force=157.7955 optimal_fiber_length=0.03524985
        tendon_slack_length=0.0006844632 pennation_angle_at_optimal=0.2199115 activation_time_constant=0.015
        deactivation_time_constant=0.05 fiber_damping=0 passive_fiber_strain_at_one_norm_force=0.6
        tendon_strain_at_one_norm_force=0.04
      PathPoint LTpL_L5_l_P1: sacrum (-0.07368977 0.03339896 -0.05591187)
      PathPoint LTpL_L5_l_P2: lumbar5 (-0.006891849 0.01537412 -0.03160236)
    DeGrooteFregly2016Muscle LTpL_L4_l: max_isometric_force=151.8409 optimal_fiber_length=0.03178343
        tendon_slack_length=0.03425628 pennation_angle_at_optimal=0.2199115 activation_time_constant=0.015
        deactivation_time_constant=0.05 fiber_damping=0 passive_fiber_strain_at_one_norm_force=0.6
        tendon_strain_at_one_norm_force=0.04
      PathPoint LTpL_L4_l_P1: pelvis (-0.03569884 0.0110049 -0.01472222)
      PathPoint LTpL_L4_l_P2: lumbar4 (-0.01219327 0.01431384 -0.03038689)
    DeGrooteFregly2016Muscle LTpL_L3_l: max_isometric_force=121.2841 optimal_fiber_length=0.03965114
        tendon_slack_length=0.04306704 pennation_angle_at_optimal=0.2199115 activation_time_constant=0.015
        deactivation_time_constant=0.05 fiber_damping=0 passive_fiber_strain_at_one_norm_force=0.6
        tendon_strain_at_one_norm_force=0.04
      PathPoint LTpL_L3_l_P1: pelvis (-0.03757772 0.0110049 -0.01564236)
      PathPoint LTpL_L3_l_P2: lumbar3 (-0.01590427 0.01219327 -0.02795594)
    DeGrooteFregly2016Muscle LTpL_L2_l: max_isometric_force=108.3816 optimal_fiber_length=0.04851226
        tendon_slack_length=0.05338272 pennation_angle_at_optimal=0.2199115 activation_time_constant=0.015
        deactivation_time_constant=0.05 fiber_damping=0 passive_fiber_strain_at_one_norm_force=0.6
        tendon_strain_at_one_norm_force=0.04
      PathPoint LTpL_L2_l_P1: pelvis (-0.03811455 0.009931255 -0.01625578)
      PathPoint LTpL_L2_l_P2: lumbar2 (-0.01590427 0.007421991 -0.02674046)
    DeGrooteFregly2016Muscle LTpL_L1_l: max_isometric_force=106.1599 optimal_fiber_length=0.05698461
        tendon_slack_length=0.06637698 pennation_angle_at_optimal=0.2199115 activation_time_constant=0.015
        deactivation_time_constant=0.05 fiber_damping=0 passive_fiber_strain_at_one_norm_force=0.6
        tendon_strain_at_one_norm_force=0.04
      PathPoint LTpL_L1_l_P1: pelvis (-0.03865137 0.009126018 -0.0165625)
      PathPoint LTpL_L1_l_P2: lumbar1 (-0.01696455 0.009012418 -0.02795594)
    DeGrooteFregly2016Muscle EO1_r: max_isometric_force=111.744 optimal_fiber_length=0.03274096
        tendon_slack_length=0.05200143 pennation_angle_at_optimal=0 activation_time_constant=0.01
        deactivation_time_constant=0.04 fiber_damping=0.1 passive_fiber_strain_at_one_norm_force=0.7
        tendon_strain_at_one_norm_force=0.049
      PathPoint EO1_r_P1: Abdomen (0.003180853 0.02544683 0.02552498)
      PathPoint EO1_r_P2: torso (0.04930323 0.09224475 0.1130392)
    DeGrooteFregly2016Muscle EO2_r: max_isometric_force=132.3546 optimal_fiber_length=0.03581488
        tendon_slack_length=0.05209319 pennation_angle_at_optimal=0 activation_time_constant=0.01
        deactivation_time_constant=0.04 fiber_damping=0.1 passive_fiber_strain_at_one_norm_force=0.7
        tendon_strain_at_one_norm_force=0.049
      PathPoint EO2_r_P1: torso (0.04824294 0.07475006 0.1276249)
      PathPoint EO2_r_P2: Abdomen (0.004241138 0.01219327 0.04011069)
    DeGrooteFregly2016Muscle EO3_r: max_isometric_force=138.8978 optimal_fiber_length=0.0385893
        tendon_slack_length=0.04680317 pennation_angle_at_optimal=0 activation_time_constant=0.01
        deactivation_time_constant=0.04 fiber_damping=0.1 passive_fiber_strain_at_one_norm_force=0.7
        tendon_strain_at_one_norm_force=0.049
      PathPoint EO3_r_P1: torso (0.04162014 0.0532899 0.1380622)
      PathPoint EO3_r_P2: Abdomen (0.00358981 -0.004241138 0.04011069)
    DeGrooteFregly2016Muscle EO4_r: max_isometric_force=134.0928 optimal_fiber_length=0.03917723
        tendon_slack_length=0.04465192 pennation_angle_at_optimal=0 activation_time_constant=0.01
        deactivation_time_constant=0.04 fiber_damping=0.1 passive_fiber_strain_at_one_norm_force=0.7
        tendon_strain_at_one_norm_force=0.049
      PathPoint EO4_r_P1: torso (0.03695526 0.0441055 0.1363229)
      PathPoint default: Abdomen (0.003180853 -0.01272341 0.03767974)
    DeGrooteFregly2016Muscle EO5_r: max_isometric_force=155.945 optimal_fiber_length=0.05232085
        tendon_slack_length=0.05728827 pennation_angle_at_optimal=0 activation_time_constant=0.01
        deactivation_time_constant=0.04 fiber_damping=0.1 passive_fiber_strain_at_one_norm_force=0.7
        tendon_strain_at_one_norm_force=0.049
      PathPoint EO5_r_P1: torso (0.0005301422 0.05831565 0.1361333)
      PathPoint EO5_r_P2: pelvis (-0.01476268 0.02200981 0.03128471)
    DeGrooteFregly2016Muscle EO6_r: max_isometric_force=226.9645 optimal_fiber_length=0.07069874
        tendon_slack_length=0.07145623 pennation_angle_at_optimal=0 activation_time_constant=0.01
        deactivation_time_constant=0.04 fiber_damping=0.1 passive_fiber_strain_at_one_norm_force=0.7
        tendon_strain_at_one_norm_force=0.049
      PathPoint EO6_r_P1: torso (-0.005831565 0.04930323 0.1215475)
      PathPoint EO6_r_P2: pelvis (-0.01852045 0.02496234 0.03005786)
    DeGrooteFregly2016Muscle IO1_r: max_isometric_force=123.9794 optimal_fiber_length=0.04719447
        tendon_slack_length=0.005233446 pennation_angle_at_optimal=0 activation_time_constant=0.01
        deactivation_time_constant=0.04 fiber_damping=0.1 passive_fiber_strain_at_one_norm_force=0.7
        tendon_strain_at_one_norm_force=0.049
      PathPoint IO1_r_P1: Abdomen (0.001627277 -0.02491669 0.05348092)
      PathPoint IO1_r_P2: pelvis (-0.002415711 0.006710308 0.03864582)
    DeGrooteFregly2016Muscle IO2_r: max_isometric_force=150.0727 optimal_fiber_length=0.05876125
        tendon_slack_length=0.006553924 pennation_angle_at_optimal=0 activation_time_constant=0.01
        deactivation_time_constant=0.04 fiber_damping=0.1 passive_fiber_strain_at_one_norm_force=0.7
        tendon_strain_at_one_norm_force=0.049
      PathPoint IO2_r_P1: Abdomen (0.001590427 -0.01166313 0.06320472)
      PathPoint IO2_r_P2: pelvis (-0.006441895 0.0131522 0.03925925)
    DeGrooteFregly2016Muscle IO3_r: max_isometric_force=151.2072 optimal_fiber_length=0.07604535
        tendon_slack_length=0.008449483 pennation_angle_at_optimal=0 activation_time_constant=0.01
        deactivation_time_constant=0.04 fiber_damping=0.1 passive_fiber_strain_at_one_norm_force=0.7
        tendon_strain_at_one_norm_force=0.049
      PathPoint IO3_r_P1: Abdomen (0.002650711 0.003710996 0.0595583)
      PathPoint IO3_r_P2: pelvis (-0.01046808 0.01852045 0.03588541)
    DeGrooteFregly2016Muscle IO4_r: max_isometric_force=179.0459 optimal_fiber_length=0.1226596
        tendon_slack_length=0.01360278 pennation_angle_at_optimal=0 activation_time_constant=0.01
        deactivation_time_constant=0.04 fiber_damping=0.1 passive_fiber_strain_at_one_norm_force=0.7
        tendon_strain_at_one_norm_force=0.049
      PathPoint IO4_r_P1: torso (0.03498939 0.05725536 0.1470725)
      PathPoint IO4_r_P2: pelvis (-0.01422585 0.02200981 0.03067129)
    DeGrooteFregly2016Muscle IO5_r: max_isometric_force=157.0833 optimal_fiber_length=0.1452537
        tendon_slack_length=0.0161998 pennation_angle_at_optimal=0 activation_time_constant=0.01
        deactivation_time_constant=0.04 fiber_damping=0.1 passive_fiber_strain_at_one_norm_force=0.7
        tendon_strain_at_one_norm_force=0.049
      PathPoint IO5_r_P1: torso (0.01590427 0.05089365 0.1397797)
      PathPoint IO5_r_P2: pelvis (-0.01986251 0.02523076 0.02423032)
    DeGrooteFregly2016Muscle IO6_r: max_isometric_force=138.6115 optimal_fiber_length=0.1315238
        tendon_slack_length=0.01455547 pennation_angle_at_optimal=0 activation_time_constant=0.01
        deactivation_time_constant=0.04 fiber_damping=0.1 passive_fiber_strain_at_one_norm_force=0.7
        tendon_strain_at_one_norm_force=0.049
      PathPoint IO6_r_P1: torso (0 0.04559223 0.1215475)
      PathPoint IO6_r_P2: pelvis (-0.02415711 0.02362028 0.02024305)
    DeGrooteFregly2016Muscle EO1_l: max_isometric_force=111.744 optimal_fiber_length=0.03411038
        tendon_slack_length=0.05417643 pennation_angle_at_optimal=0 activation_time_constant=0.01
        deactivation_time_constant=0.04 fiber_damping=0.1 passive_fiber_strain_at_one_norm_force=0.7
        tendon_strain_at_one_norm_force=0.049
      PathPoint EO1_l_P1: Abdomen (0.003180853 0.02544683 -0.02552498)
      PathPoint EO1_l_P2: torso (0.04749672 0.09046453 -0.1205005)
    DeGrooteFregly2016Muscle EO2_l: max_isometric_force=132.3546 optimal_fiber_length=0.03577812
        tendon_slack_length=0.05203972 pennation_angle_at_optimal=0 activation_time_constant=0.01
        deactivation_time_constant=0.04 fiber_damping=0.1 passive_fiber_strain_at_one_norm_force=0.7
        tendon_strain_at_one_norm_force=0.049
      PathPoint EO2_l_P1: torso (0.04824294 0.07475006 -0.1273575)
      PathPoint EO2_l_P2: Abdomen (0.004241138 0.01219327 -0.04011069)
    DeGrooteFregly2016Muscle EO3_l: max_isometric_force=138.8978 optimal_fiber_length=0.03872146
        tendon_slack_length=0.04696346 pennation_angle_at_optimal=0 activation_time_constant=0.01
        deactivation_time_constant=0.04 fiber_damping=0.1 passive_fiber_strain_at_one_norm_force=0.7
        tendon_strain_at_one_norm_force=0.049
      PathPoint EO3_l_P1: torso (0.04188124 0.05354437 -0.1385642)
      PathPoint EO3_l_P2: Abdomen (0.003516412 -0.004045489 -0.03961247)
    DeGrooteFregly2016Muscle EO4_l: max_isometric_force=134.0928 optimal_fiber_length=0.03929044
        tendon_slack_length=0.04478096 pennation_angle_at_optimal=0 activation_time_constant=0.01
        deactivation_time_constant=0.04 fiber_damping=0.1 passive_fiber_strain_at_one_norm_force=0.7
        tendon_strain_at_one_norm_force=0.049
      PathPoint EO4_l_P1: torso (0.03710996 0.04400181 -0.1361333)
      PathPoint EO4_l_P2: Abdomen (0.003386071 -0.01249619 -0.03724265)
    DeGrooteFregly2016Muscle EO5_l: max_isometric_force=155.945 optimal_fiber_length=0.05196582
        tendon_slack_length=0.05689953 pennation_angle_at_optimal=0 activation_time_constant=0.01
        deactivation_time_constant=0.04 fiber_damping=0.1 passive_fiber_strain_at_one_norm_force=0.7
        tendon_strain_at_one_norm_force=0.049
      PathPoint EO5_l_P1: torso (0.0004269384 0.05839411 -0.1356422)
      PathPoint EO5_l_P2: pelvis (-0.01468296 0.02188435 -0.03133318)
    DeGrooteFregly2016Muscle EO6_l: max_isometric_force=226.9645 optimal_fiber_length=0.07140475
        tendon_slack_length=0.07216981 pennation_angle_at_optimal=0 activation_time_constant=0.01
        deactivation_time_constant=0.04 fiber_damping=0.1 passive_fiber_strain_at_one_norm_force=0.7
        tendon_strain_at_one_norm_force=0.049
      PathPoint EO6_l_P1: torso (-0.005831565 0.04930323 -0.1215475)
      PathPoint EO6_l_P2: pelvis (-0.01852045 0.02496234 -0.02729745)
    DeGrooteFregly2016Muscle IO1_l: max_isometric_force=123.9794 optimal_fiber_length=0.04717137
        tendon_slack_length=0.005230885 pennation_angle_at_optimal=0 activation_time_constant=0.01
        deactivation_time_constant=0.04 fiber_damping=0.1 passive_fiber_strain_at_one_norm_force=0.7
        tendon_strain_at_one_norm_force=0.049
      PathPoint IO1_l_P1: Abdomen (0.001590427 -0.02491669 -0.05348092)
      PathPoint IO1_l_P2: pelvis (-0.002425725 0.006615102 -0.03865165)
    DeGrooteFregly2016Muscle IO2_l: max_isometric_force=150.0727 optimal_fiber_length=0.05895745
        tendon_slack_length=0.006575807 pennation_angle_at_optimal=0 activation_time_constant=0.01
        deactivation_time_constant=0.04 fiber_damping=0.1 passive_fiber_strain_at_one_norm_force=0.7
        tendon_strain_at_one_norm_force=0.049
      PathPoint IO2_l_P1: Abdomen (0.001590427 -0.01166313 -0.06320472)
      PathPoint IO2_l_P2: pelvis (-0.006496195 0.01301926 -0.03908228)
    DeGrooteFregly2016Muscle IO3_l: max_isometric_force=151.2072 optimal_fiber_length=0.07620993
        tendon_slack_length=0.00846777 pennation_angle_at_optimal=0 activation_time_constant=0.01
        deactivation_time_constant=0.04 fiber_damping=0.1 passive_fiber_strain_at_one_norm_force=0.7
        tendon_strain_at_one_norm_force=0.049
      PathPoint IO3_l_P1: Abdomen (0.002650711 0.003710996 -0.0595583)
      PathPoint IO3_l_P2: pelvis (-0.01033471 0.01844511 -0.03581425)
    DeGrooteFregly2016Muscle IO4_l: max_isometric_force=179.0459 optimal_fiber_length=0.1229457
        tendon_slack_length=0.01363451 pennation_angle_at_optimal=0 activation_time_constant=0.01
        deactivation_time_constant=0.04 fiber_damping=0.1 passive_fiber_strain_at_one_norm_force=0.7
        tendon_strain_at_one_norm_force=0.049
      PathPoint IO4_l_P1: torso (0.03480803 0.05717849 -0.1474335)
      PathPoint IO4_l_P2: pelvis (-0.01411795 0.02195642 -0.03056593)
    DeGrooteFregly2016Muscle IO5_l: max_isometric_force=157.0833 optimal_fiber_length=0.1448184
        tendon_slack_length=0.01615126 pennation_angle_at_optimal=0 activation_time_constant=0.01
        deactivation_time_constant=0.04 fiber_damping=0.1 passive_fiber_strain_at_one_norm_force=0.7
        tendon_strain_at_one_norm_force=0.049
      PathPoint IO5_l_P1: torso (0.01605843 0.05088591 -0.1397736)
      PathPoint IO5_l_P2: pelvis (-0.01982917 0.02513249 -0.02424084)
    DeGrooteFregly2016Muscle IO6_l: max_isometric_force=138.6115 optimal_fiber_length=0.1315238
        tendon_slack_length=0.01455547 pennation_angle_at_optimal=0 activation_time_constant=0.01
        deactivation_time_constant=0.04 fiber_damping=0.1 passive_fiber_strain_at_one_norm_force=0.7
        tendon_strain_at_one_norm_force=0.049
      PathPoint IO6_l_P1: torso (0 0.04559223 -0.1215475)
      PathPoint IO6_l_P2: pelvis (-0.02415711 0.02362028 -0.02024305)
    DeGrooteFregly2016Muscle LD_L1_r: max_isometric_force=90.39921 optimal_fiber_length=0.2659149
        tendon_slack_length=0.05808626 pennation_angle_at_optimal=0 activation_time_constant=0.01
        deactivation_time_constant=0.04 fiber_damping=0.1 passive_fiber_strain_at_one_norm_force=0.7
        tendon_strain_at_one_norm_force=0.049
      PathPoint LD_L1_r_P1: lumbar1 (-0.0238564 -0.006891849 0.005265002)
      PathPoint LD_L1_r_P2: humerus_r (-0.007849026 -0.01261868 0.002224422)
      PathWrap: wrap_object=Chest_r method=hybrid
    DeGrooteFregly2016Muscle LD_L2_r: max_isometric_force=84.53986 optimal_fiber_length=0.265728
        tendon_slack_length=0.05804196 pennation_angle_at_optimal=0 activation_time_constant=0.01
        deactivation_time_constant=0.04 fiber_damping=0.1 passive_fiber_strain_at_one_norm_force=0.7
        tendon_strain_at_one_norm_force=0.049
      PathPoint LD_L2_r_P1: lumbar2 (-0.02279612 -0.007111752 0.005039167)
      PathPoint LD_L2_r_P2: humerus_r (-0.007851201 -0.01261652 0.002225472)
      PathWrap: wrap_object=Chest_r method=hybrid
    DeGrooteFregly2016Muscle LD_L3_r: max_isometric_force=104.5178 optimal_fiber_length=0.2707227
        tendon_slack_length=0.0590863 pennation_angle_at_optimal=0 activation_time_constant=0.01
        deactivation_time_constant=0.04 fiber_damping=0.1 passive_fiber_strain_at_one_norm_force=0.7
        tendon_strain_at_one_norm_force=0.049
      PathPoint LD_L3_r_P1: lumbar3 (-0.02438654 -0.002120569 0.004691383)
      PathPoint LD_L3_r_P2: humerus_r (-0.007851201 -0.01261652 0.003582266)
      PathWrap: wrap_object=Chest_r method=hybrid
    DeGrooteFregly2016Muscle LD_L4_r: max_isometric_force=100.7279 optimal_fiber_length=0.2751784
        tendon_slack_length=0.06006681 pennation_angle_at_optimal=0 activation_time_constant=0.01
        deactivation_time_constant=0.04 fiber_damping=0.1 passive_fiber_strain_at_one_norm_force=0.7
        tendon_strain_at_one_norm_force=0.049
      PathPoint LD_L4_r_P1: lumbar4 (-0.0238564 0.002650711 0.005618876)
      PathPoint LD_L4_r_P2: humerus_r (-0.007851201 -0.01261652 0.002225472)
      PathWrap: wrap_object=Chest_r method=hybrid
    DeGrooteFregly2016Muscle LD_L5_r: max_isometric_force=101.6877 optimal_fiber_length=0.2867327
        tendon_slack_length=0.05888567 pennation_angle_at_optimal=0 activation_time_constant=0.01
        deactivation_time_constant=0.04 fiber_damping=0.1 passive_fiber_strain_at_one_norm_force=0.7
        tendon_strain_at_one_norm_force=0.049
      PathPoint LD_L5_r_P1: lumbar5 (-0.01908512 0.01113299 0.004996491)
      PathPoint LD_L5_r_P2: humerus_r (-0.007851201 -0.01261652 0.002225472)
      PathWrap: wrap_object=Chest_r method=hybrid
    DeGrooteFregly2016Muscle LD_T12_r: max_isometric_force=53.70586 optimal_fiber_length=0.2355839
        tendon_slack_length=0.04839948 pennation_angle_at_optimal=0 activation_time_constant=0.01
        deactivation_time_constant=0.04 fiber_damping=0.1 passive_fiber_strain_at_one_norm_force=0.7
        tendon_strain_at_one_norm_force=0.049
      PathPoint LD_T12_r_P1: humerus_r (-0.007851201 -0.01261652 0.002225472)
      PathPoint LD_T12_r_P2: torso (-0.0275674 0.05407451 0.005303727)
      PathWrap: wrap_object=Chest_r method=hybrid range=(1 2)
    DeGrooteFregly2016Muscle LD_T11_r: max_isometric_force=62.91767 optimal_fiber_length=0.2298517
        tendon_slack_length=0.047201 pennation_angle_at_optimal=0 activation_time_constant=0.01
        deactivation_time_constant=0.04 fiber_damping=0.1 passive_fiber_strain_at_one_norm_force=0.7
        tendon_strain_at_one_norm_force=0.049
      PathPoint LD_T11_r_P1: humerus_r (-0.007851201 -0.01261652 0.002225472)
      PathPoint LD_T11_r_P2: torso (-0.03346332 0.06944863 0.003646426)
      PathWrap: wrap_object=Chest_r method=hybrid
    DeGrooteFregly2016Muscle LD_T10_r: max_isometric_force=64.47899 optimal_fiber_length=0.235396
        tendon_slack_length=0.0368488 pennation_angle_at_optimal=0 activation_time_constant=0.01
        deactivation_time_constant=0.04 fiber_damping=0.1 passive_fiber_strain_at_one_norm_force=0.7
        tendon_strain_at_one_norm_force=0.049
      PathPoint LD_T10_r_P1: humerus_r (-0.007851201 -0.01261652 0.002225472)
      PathPoint LD_T10_r_P2: torso (-0.03657981 0.08376247 0.004655162)
      PathWrap: wrap_object=Chest_r method=hybrid
    DeGrooteFregly2016Muscle LD_T9_r: max_isometric_force=40.62457 optimal_fiber_length=0.2187889
        tendon_slack_length=0.03424746 pennation_angle_at_optimal=0 activation_time_constant=0.01
        deactivation_time_constant=0.04 fiber_damping=0.1 passive_fiber_strain_at_one_norm_force=0.7
        tendon_strain_at_one_norm_force=0.049
      PathPoint LD_T9_r_P1: humerus_r (-0.007851201 -0.01261652 0.002225472)
      PathPoint LD_T9_r_P2: torso (-0.04188124 0.1028476 0.004954874)
      PathWrap: wrap_object=Chest_r method=hybrid
    DeGrooteFregly2016Muscle LD_T8_r: max_isometric_force=40.79471 optimal_fiber_length=0.2103238
        tendon_slack_length=0.04316611 pennation_angle_at_optimal=0 activation_time_constant=0.01
        deactivation_time_constant=0.04 fiber_damping=0.1 passive_fiber_strain_at_one_norm_force=0.7
        tendon_strain_at_one_norm_force=0.049
      PathPoint LD_T8_r_P1: humerus_r (-0.007851201 -0.01261652 0.002225472)
      PathPoint LD_T8_r_P2: torso (-0.04294152 0.1139806 0.005196692)
      PathWrap: wrap_object=Chest_r method=hybrid
    DeGrooteFregly2016Muscle LD_T7_r: max_isometric_force=37.075 optimal_fiber_length=0.2062226
        tendon_slack_length=0.04235424 pennation_angle_at_optimal=0 activation_time_constant=0.01
        deactivation_time_constant=0.04 fiber_damping=0.1 passive_fiber_strain_at_one_norm_force=0.7
        tendon_strain_at_one_norm_force=0.049
      PathPoint LD_T7_r_P1: humerus_r (-0.007851201 -0.01261652 0.002225472)
      PathPoint LD_T7_r_P2: torso (-0.0477128 0.1245834 0.004951288)
      PathWrap: wrap_object=Chest_r method=hybrid
    DeGrooteFregly2016Muscle LD_R12_r: max_isometric_force=42.9003 optimal_fiber_length=0.200766
        tendon_slack_length=0.04122414 pennation_angle_at_optimal=0 activation_time_constant=0.01
        deactivation_time_constant=0.04 fiber_damping=0.1 passive_fiber_strain_at_one_norm_force=0.7
        tendon_strain_at_one_norm_force=0.049
      PathPoint LD_R12_r_P1: humerus_r (-0.007851201 -0.01261652 0.002225472)
      PathPoint LD_R12_r_P2: torso (-0.0238564 0.06445416 0.05380448)
    DeGrooteFregly2016Muscle LD_R11_r: max_isometric_force=63.33357 optimal_fiber_length=0.1649175
        tendon_slack_length=0.03388053 pennation_angle_at_optimal=0 activation_time_constant=0.01
        deactivation_time_constant=0.04 fiber_damping=0.1 passive_fiber_strain_at_one_norm_force=0.7
        tendon_strain_at_one_norm_force=0.049
      PathPoint LD_R11_r_P1: humerus_r (-0.007851201 -0.01261652 0.003582266)
      PathPoint LD_R11_r_P2: torso (-0.03604967 0.07421991 0.07657495)
      PathWrap: wrap_object=Chest_r method=hybrid
    DeGrooteFregly2016Muscle LD_Il_r: max_isometric_force=65.36625 optimal_fiber_length=0.3346829
        tendon_slack_length=0.01446694 pennation_angle_at_optimal=0 activation_time_constant=0.01
        deactivation_time_constant=0.04 fiber_damping=0.1 passive_fiber_strain_at_one_norm_force=0.7
        tendon_strain_at_one_norm_force=0.049
      PathPoint LD_Il_r_P1: pelvis (-0.03388061 0.01476268 0.0149317)
      PathPoint LD_Il_r_P2: humerus_r (-0.007851201 -0.01261652 0.002225472)
      PathWrap: wrap_object=Chest_r method=hybrid
    DeGrooteFregly2016Muscle LD_L1_l: max_isometric_force=90.39872 optimal_fiber_length=0.2659153
        tendon_slack_length=0.05808634 pennation_angle_at_optimal=0 activation_time_constant=0.01
        deactivation_time_constant=0.04 fiber_damping=0.1 passive_fiber_strain_at_one_norm_force=0.7
        tendon_strain_at_one_norm_force=0.049
      PathPoint LD_L1_l_P1: lumbar1 (-0.0238564 -0.006891849 -0.005263009)
      PathPoint LD_L1_l_P2: humerus_l (-0.007849026 -0.01261652 -0.002225472)
      PathWrap: wrap_object=Chest_l method=hybrid
    DeGrooteFregly2016Muscle LD_L2_l: max_isometric_force=84.53965 optimal_fiber_length=0.2657275
        tendon_slack_length=0.05804185 pennation_angle_at_optimal=0 activation_time_constant=0.01
        deactivation_time_constant=0.04 fiber_damping=0.1 passive_fiber_strain_at_one_norm_force=0.7
        tendon_strain_at_one_norm_force=0.049
      PathPoint LD_L2_l_P1: lumbar2 (-0.02279612 -0.007109207 -0.005044223)
      PathPoint LD_L2_l_P2: humerus_l (-0.007851201 -0.01261652 -0.002225472)
      PathWrap: wrap_object=Chest_l method=hybrid
    DeGrooteFregly2016Muscle LD_L3_l: max_isometric_force=104.5179 optimal_fiber_length=0.2707225
        tendon_slack_length=0.05908627 pennation_angle_at_optimal=0 activation_time_constant=0.01
        deactivation_time_constant=0.04 fiber_damping=0.1 passive_fiber_strain_at_one_norm_force=0.7
        tendon_strain_at_one_norm_force=0.049
      PathPoint LD_L3_l_P1: lumbar3 (-0.02438654 -0.002120569 -0.004691735)
      PathPoint LD_L3_l_P2: humerus_l (-0.007851201 -0.01261652 -0.003582266)
      PathWrap: wrap_object=Chest_l method=hybrid
    DeGrooteFregly2016Muscle LD_L4_l: max_isometric_force=100.7277 optimal_fiber_length=0.27518
        tendon_slack_length=0.06006714 pennation_angle_at_optimal=0 activation_time_constant=0.01
        deactivation_time_constant=0.04 fiber_damping=0.1 passive_fiber_strain_at_one_norm_force=0.7
        tendon_strain_at_one_norm_force=0.049
      PathPoint LD_L4_l_P1: lumbar4 (-0.0238564 0.002650711 -0.005615497)
      PathPoint LD_L4_l_P2: humerus_l (-0.007851201 -0.01261652 -0.002225472)
      PathWrap: wrap_object=Chest_l method=hybrid
    DeGrooteFregly2016Muscle LD_L5_l: max_isometric_force=101.6877 optimal_fiber_length=0.2867331
        tendon_slack_length=0.05888575 pennation_angle_at_optimal=0 activation_time_constant=0.01
        deactivation_time_constant=0.04 fiber_damping=0.1 passive_fiber_strain_at_one_norm_force=0.7
        tendon_strain_at_one_norm_force=0.049
      PathPoint LD_L5_l_P1: lumbar5 (-0.01908512 0.01113299 -0.004995604)
      PathPoint LD_L5_l_P2: humerus_l (-0.007851201 -0.01261652 -0.002225472)
      PathWrap: wrap_object=Chest_l method=hybrid
    DeGrooteFregly2016Muscle LD_T12_l: max_isometric_force=53.70584 optimal_fiber_length=0.2355856
        tendon_slack_length=0.04839982 pennation_angle_at_optimal=0 activation_time_constant=0.01
        deactivation_time_constant=0.04 fiber_damping=0.1 passive_fiber_strain_at_one_norm_force=0.7
        tendon_strain_at_one_norm_force=0.049
      PathPoint LD_T12_l_P1: humerus_l (-0.007851201 -0.01261652 -0.002225472)
      PathPoint LD_T12_l_P2: torso (-0.0275674 0.05407451 -0.005299473)
      PathWrap: wrap_object=Chest_l method=hybrid
    DeGrooteFregly2016Muscle LD_T11_l: max_isometric_force=62.91771 optimal_fiber_length=0.2296324
        tendon_slack_length=0.04715597 pennation_angle_at_optimal=0 activation_time_constant=0.01
        deactivation_time_constant=0.04 fiber_damping=0.1 passive_fiber_strain_at_one_norm_force=0.7
        tendon_strain_at_one_norm_force=0.049
      PathPoint LD_T11_l_P1: humerus_l (-0.007851201 -0.01261652 -0.002225472)
      PathPoint LD_T11_l_P2: torso (-0.03346332 0.06944863 -0.004205545)
      PathWrap: wrap_object=Chest_l method=hybrid
    DeGrooteFregly2016Muscle LD_T10_l: max_isometric_force=64.47901 optimal_fiber_length=0.2353959
        tendon_slack_length=0.03684879 pennation_angle_at_optimal=0 activation_time_constant=0.01
        deactivation_time_constant=0.04 fiber_damping=0.1 passive_fiber_strain_at_one_norm_force=0.7
        tendon_strain_at_one_norm_force=0.049
      PathPoint LD_T10_l_P1: humerus_l (-0.007851201 -0.01261652 -0.002225472)
      PathPoint LD_T10_l_P2: torso (-0.03657981 0.08376247 -0.004655271)
      PathWrap: wrap_object=Chest_l method=hybrid
    DeGrooteFregly2016Muscle LD_T9_l: max_isometric_force=40.62456 optimal_fiber_length=0.2187874
        tendon_slack_length=0.03424722 pennation_angle_at_optimal=0 activation_time_constant=0.01
        deactivation_time_constant=0.04 fiber_damping=0.1 passive_fiber_strain_at_one_norm_force=0.7
        tendon_strain_at_one_norm_force=0.049
      PathPoint LD_T9_l_P1: humerus_l (-0.007851201 -0.01261652 -0.002225472)
      PathPoint LD_T9_l_P2: torso (-0.04188124 0.1028476 -0.00495914)
      PathWrap: wrap_object=Chest_l method=hybrid
    DeGrooteFregly2016Muscle LD_T8_l: max_isometric_force=40.79465 optimal_fiber_length=0.2103219
        tendon_slack_length=0.04316573 pennation_angle_at_optimal=0 activation_time_constant=0.01
        deactivation_time_constant=0.04 fiber_damping=0.1 passive_fiber_strain_at_one_norm_force=0.7
        tendon_strain_at_one_norm_force=0.049
      PathPoint LD_T8_l_P1: humerus_l (-0.007851201 -0.01261652 -0.002225472)
      PathPoint LD_T8_l_P2: torso (-0.04294152 0.1139806 -0.005202235)
      PathWrap: wrap_object=Chest_l method=hybrid
    DeGrooteFregly2016Muscle LD_T7_l: max_isometric_force=37.07495 optimal_fiber_length=0.2062238
        tendon_slack_length=0.04235449 pennation_angle_at_optimal=0 activation_time_constant=0.01
        deactivation_time_constant=0.04 fiber_damping=0.1 passive_fiber_strain_at_one_norm_force=0.7
        tendon_strain_at_one_norm_force=0.049
      PathPoint LD_T7_l_P1: humerus_l (-0.007851201 -0.01261652 -0.002225472)
      PathPoint LD_T7_l_P2: torso (-0.0477128 0.1245834 -0.004946985)
      PathWrap: wrap_object=Chest_l method=hybrid
    DeGrooteFregly2016Muscle LD_R12_l: max_isometric_force=42.9003 optimal_fiber_length=0.2007639
        tendon_slack_length=0.04122372 pennation_angle_at_optimal=0 activation_time_constant=0.01
        deactivation_time_constant=0.04 fiber_damping=0.1 passive_fiber_strain_at_one_norm_force=0.7
        tendon_strain_at_one_norm_force=0.049
      PathPoint LD_l12_l_P1: humerus_l (-0.007851201 -0.01261652 -0.002225472)
      PathPoint LD_l12_l_P2: torso (-0.0238564 0.06445416 -0.0538091)
      PathWrap: wrap_object=Chest_l method=hybrid
    DeGrooteFregly2016Muscle LD_R11_l: max_isometric_force=63.33359 optimal_fiber_length=0.1649175
        tendon_slack_length=0.03388053 pennation_angle_at_optimal=0 activation_time_constant=0.01
        deactivation_time_constant=0.04 fiber_damping=0.1 passive_fiber_strain_at_one_norm_force=0.7
        tendon_strain_at_one_norm_force=0.049
      PathPoint LD_l11_l_P1: humerus_l (-0.007851201 -0.01261652 -0.003582266)
      PathPoint LD_l11_l_P2: torso (-0.03604967 0.07421991 -0.07657495)
      PathWrap: wrap_object=Chest_l method=hybrid
    DeGrooteFregly2016Muscle LD_Il_l: max_isometric_force=65.36622 optimal_fiber_length=0.345569
        tendon_slack_length=0.0149375 pennation_angle_at_optimal=0 activation_time_constant=0.01
        deactivation_time_constant=0.04 fiber_damping=0.1 passive_fiber_strain_at_one_norm_force=0.7
        tendon_strain_at_one_norm_force=0.049
      PathPoint LD_Il_l_P1: pelvis (-0.03056465 0.01989757 -0.01650707)
      PathPoint LD_Il_l_P2: humerus_l (-0.007851201 -0.01261652 -0.002225472)
      PathWrap: wrap_object=Chest_l method=hybrid
  MarkerSet:
    Marker r.ASIS_study: pelvis (0.007515545 0.002684123 0.03925925)
    Marker L.ASIS_study: pelvis (0.007515545 0.002684123 -0.03925925)
    Marker r.PSIS_study: pelvis (-0.04133549 0.006710308 0.01533564)
    Marker L.PSIS_study: pelvis (-0.04133549 0.006710308 -0.01533564)
    Marker r_knee_study: femur_r (0.0002803889 -0.01415964 0.001927674)
    Marker r_mknee_study: femur_r (0.0003855347 -0.01405449 -0.001927674)
    Marker r_ankle_study: tibia_r (-0.001250145 -0.0240653 0.003312885)
    Marker r_mankle_study: tibia_r (0.0003750436 -0.02375276 -0.002375276)
    Marker r_toe_study: calcn_r (0.02024551 0.0009065567 0.0005706211)
    Marker r_5meta_study: calcn_r (0.01516972 0.0005417758 0.007043086)
    Marker r_calc_study: calcn_r (-0.003484865 0.003529052 -0.001210273)
    Marker L_knee_study: femur_l (0.0006340525 -0.03201965 -0.004359111)
    Marker L_mknee_study: femur_l (0.0008718221 -0.03178188 0.004359111)
    Marker L_ankle_study: tibia_l (-0.001396787 -0.02688814 -0.003701485)
    Marker L_mankle_study: tibia_l (0.000419036 -0.02653895 0.002653895)
    Marker L_toe_study: calcn_l (0.02024551 0.0009065567 -0.0005706211)
    Marker L_calc_study: calcn_l (-0.003484865 0.003529052 0.001210273)
    Marker L_5meta_study: calcn_l (0.01516972 0.0005417758 -0.007043086)
    Marker r_shoulder_study: torso (0 0.2215995 0.1725975)
    Marker L_shoulder_study: torso (0 0.2215995 -0.1725975)
    Marker C7_study: torso (-0.04241138 0.2226597 0.003646426)
    Marker r_lelbow_study: humerus_r (0.0124097 -0.2316477 0.03309252) fixed=true
    Marker r_melbow_study: humerus_r (0.001861455 -0.2366116 -0.04136566) fixed=true
    Marker r_lwrist_study: radius_r (0.0003664015 -0.1648807 0.03664015) fixed=true
    Marker r_mwrist_study: radius_r (-0.01612167 -0.1648807 -0.01612167) fixed=true
    Marker L_lelbow_study: humerus_l (0.0124097 -0.2316477 -0.03309252) fixed=true
    Marker L_melbow_study: humerus_l (0.001861455 -0.2366116 0.04136566) fixed=true
    Marker L_lwrist_study: radius_l (0.0003664015 -0.1648807 -0.03664015) fixed=true
    Marker L_mwrist_study: radius_l (-0.01612167 -0.1648807 0.01612167) fixed=true
    Marker r_thigh1_study: femur_r (0.003154375 -0.005257292 0.002453403)
    Marker r_thigh2_study: femur_r (0.001927674 -0.008762153 0.002979132)
    Marker r_thigh3_study: femur_r (-0.0007009722 -0.004906806 0.003504861)
    Marker L_thigh1_study: femur_l (0.00713309 -0.01188848 -0.005547959)
    Marker L_thigh2_study: femur_l (0.004359111 -0.01981414 -0.006736807)
    Marker L_thigh3_study: femur_l (-0.001585131 -0.01109592 -0.007925656)
    Marker r_sh1_study: tibia_r (0 -0.007188336 0.004375509)
    Marker r_sh2_study: tibia_r (0.001625189 -0.01437667 0.005000581)
    Marker r_sh3_study: tibia_r (-0.003125363 -0.0137516 0.005000581)
    Marker L_sh1_study: tibia_l (0 -0.008031523 -0.004888753)
    Marker L_sh2_study: tibia_l (0.001815823 -0.01606305 -0.005587147)
    Marker L_sh3_study: tibia_l (-0.003491967 -0.01536465 -0.005587147)
    Marker RHJC_study: pelvis (-0.01510517 -0.02106768 0.02369664)
    Marker LHJC_study: pelvis (-0.01510517 -0.02106768 -0.02369664)
    Marker RThumb: hand_r (0.01165201 -0.03922702 0.03313706)
    Marker RIndex: hand_r (0.002285092 -0.06053752 0.01174632)
    Marker RPinky: hand_r (0.002281304 -0.05408841 -0.02384878)
    Marker LThumb: hand_l (0.01165201 -0.03922699 -0.03313706)
    Marker LIndex: hand_l (0.002285095 -0.06053752 -0.01174629)
    Marker LPinky: hand_l (0.002281303 -0.05408843 0.02384878)
    Marker Nose: head (0.06163752 0.006684882 0.000185828) fixed=true
    Marker REye: head (0.04477793 0.02399418 0.03780967) fixed=true
    Marker LEye: head (0.04477793 0.02399418 -0.03780967) fixed=true
    Marker RShoulder: torso (-0.00676017 0.1941948 0.2450085) fixed=true
    Marker LShoulder: torso (-0.00676017 0.1941948 -0.2450085) fixed=true
    Marker RElbow: humerus_r (0.02068283 -0.2465017 -0.007228775) fixed=true
    Marker LElbow: humerus_l (0.02068283 -0.2465017 0.007228775) fixed=true
  ContactGeometrySet:
    ContactHalfSpace floor: socket_frame=/ground location=(0 0 0) orientation=(0 0 -1.570796)
    ContactSphere s1_r: socket_frame=/bodyset/calcn_r location=(0.002080214 -0.01 -0.004186676) radius=0.032
    ContactSphere s2_r: socket_frame=/bodyset/calcn_r location=(0.1623619 -0.01 -0.03141774) radius=0.032
    ContactSphere s3_r: socket_frame=/bodyset/calcn_r location=(0.1455276 -0.01 0.0564995) radius=0.032
    ContactSphere s4_r: socket_frame=/bodyset/calcn_r location=(0.07247284 -0.01 0.02884721) radius=0.032
    ContactSphere s5_r: socket_frame=/bodyset/toes_r location=(0.06565097 -0.01 -0.02052721) radius=0.032
    ContactSphere s6_r: socket_frame=/bodyset/toes_r location=(0.04923823 -0.01 0.06768282) radius=0.032
    ContactSphere s1_l: socket_frame=/bodyset/calcn_l location=(0.002080214 -0.01 0.004186676) radius=0.032
    ContactSphere s2_l: socket_frame=/bodyset/calcn_l location=(0.1623619 -0.01 0.03141774) radius=0.032
    ContactSphere s3_l: socket_frame=/bodyset/calcn_l location=(0.1455276 -0.01 -0.0564995) radius=0.032
    ContactSphere s4_l: socket_frame=/bodyset/calcn_l location=(0.07247284 -0.01 -0.02884721) radius=0.032
    ContactSphere s5_l: socket_frame=/bodyset/toes_l location=(0.06565097 -0.01 0.02052721) radius=0.032
    ContactSphere s6_l: socket_frame=/bodyset/toes_l location=(0.04923823 -0.01 -0.06768282) radius=0.032
